<?xml version="1.0"?>
<?xml-stylesheet type="text/xsl" href="/JSBSim.xsl"?>
<fdm_config name="Mirage2000" version="2.0" release="DEVELOPMENT"
   xmlns:xsi="http://www.w3.org/2001/XMLSchema-instance"
   xsi:noNamespaceSchemaLocation="http://jsbsim.sourceforge.net/JSBSim.xsd">

    <fileheader>
        <author>Richard Harrison</author>
        <filecreationdate>2018-05-09</filecreationdate>
        <version>1.0</version>
        <copyright>Copyright (C) 2017 Richard Harrison, All rights reserved</copyright>
        <description>Dassault Mirage2000 Aerodynamic data built from vspaero; CG (7.9, 0, 0.6)M, 2018-05-09 20:08</description>
        <note>Built using VSPAERO. VSPAero control sub surfaces are used for the elevons, slats and rudder. These are all then processed and this data is built from the results (together with the -stab to get the derivatives)</note>
        <note>Aircraft origin for measurements is the nose</note>
        <note>VSPAERO notes: Rudder deflection is LE right. Elevator is TE down.</note>
        <note>Cl max 1.6</note>
        <note>Built with AeroTool 1.0.0.0: Options: AeroDetail=Medium, Gear, Flaps, WakeIterations=2</note>
        <limitation></limitation>
        <reference
            refID="ZDAT/AED/2017/09-08"
            author="Richard Harrison, rjh@zaretto.com"
            title="Mirage 2000 Aerodynamic data built from vspaero; CG (7.9, 0, 0.6)M"
            date="September, 2017"
            URL="http://www.zaretto.com/sites/zaretto.com/files/Mirage2000-data-data/rjh-zaretto-Mirage2000-aerodynamic-data-vspaero.pdf"
        />
        <reference
            refID="VSPAERO"
            author="Brandon Litherland"
            title="Using VSPAERO"
            date=" 2015/07/01 06:56"
            URL="http://www.openvsp.org/wiki/doku.php?id=vspaerotutorial"
        />
    </fileheader>
<metrics>
  <wingarea unit="M2">37.843</wingarea>
  <wing_incidence unit="DEG">-1</wing_incidence>
  <wingspan unit="M">9.174</wingspan>
  <chord unit="M">4.774</chord>
  <location unit="IN" name="EYEPOINT">
    <x>197</x>
    <y>0</y>
    <z>-3.94</z>
  </location>
  <location unit="IN" name="VRP">
    <x>200</x>
    <y>0</y>
    <z>0</z>
  </location>
  <location unit="M" name="AERORP">
    <x>7.9</x>
    <y>0</y>
    <z>0.6167</z>
  </location>
</metrics>

<mass_balance>
  <location unit="M" name="CG">
    <x>7.9</x>
    <y>0</y>
    <z>0.6</z>
  </location>
  <ixx unit="KG*M2">6262</ixx>
  <iyy unit="KG*M2">75686</iyy>
  <izz unit="KG*M2">78802</izz>
  <ixz unit="KG*M2">2141</ixz>
  <emptywt unit="LBS">28000</emptywt>
</mass_balance>

<ground_reactions>
  <contact type="BOGEY" name="NOSE_LG">
    <location unit="M">
      <x>3.69</x>
      <y>0</y>
      <z>-2.7261</z>
    </location>
    <static_friction>1.0</static_friction>
    <dynamic_friction>0.5</dynamic_friction>
    <rolling_friction>0.02</rolling_friction>
    <spring_coeff unit="LBS/FT">48000</spring_coeff>
    <damping_coeff unit="LBS/FT/SEC">4800</damping_coeff>
    <max_steer unit="DEG">1</max_steer>
    <!--0: NOSE_LG-->
    <brake_group>NOSE</brake_group>
    <retractable>1</retractable>
  </contact>
  <contact type="BOGEY" name="LEFT_MLG">
    <location unit="M">
      <x>8.2</x>
      <y>-1.8</y>
      <z>-2.65</z>
    </location>
    <static_friction>1.0</static_friction>
    <dynamic_friction>0.5</dynamic_friction>
    <rolling_friction>0.02</rolling_friction>
    <spring_coeff unit="LBS/FT">48000</spring_coeff>
    <damping_coeff unit="LBS/FT/SEC">4800</damping_coeff>
    <max_steer unit="DEG">0</max_steer>
    <!--1: LEFT_MLG-->
    <brake_group>LEFT</brake_group>
    <retractable>1</retractable>
  </contact>
  <contact type="BOGEY" name="RIGHT_MLG">
    <location unit="M">
      <x>8.2</x>
      <y>1.8</y>
      <z>-2.65</z>
    </location>
    <static_friction>1.0</static_friction>
    <dynamic_friction>0.5</dynamic_friction>
    <rolling_friction>0.02</rolling_friction>
    <spring_coeff unit="LBS/FT">48000</spring_coeff>
    <damping_coeff unit="LBS/FT/SEC">4800</damping_coeff>
    <max_steer unit="DEG">0</max_steer>
    <!--2: RIGHT_MLG-->
    <brake_group>RIGHT</brake_group>
    <retractable>1</retractable>
  </contact>

  <contact type="STRUCTURE" name="LEFT_WING_TIP">
    <!--3: LEFT_WING_TIP-->
    <location unit="M">
      <x>4.87059</x>
      <y>-4.52724</y>
      <z>-1.306</z>
    </location>
    <static_friction>1.2</static_friction>
    <dynamic_friction>1.212</dynamic_friction>
    <rolling_friction>1.413</rolling_friction>
      <spring_coeff unit="LBS/FT"> 10000 </spring_coeff>
      <damping_coeff unit="LBS/FT/SEC"> 2000 </damping_coeff>
      <damping_coeff_rebound unit="LBS/FT/SEC"> 40000 </damping_coeff_rebound>
  </contact>

  <contact type="STRUCTURE" name="RIGHT_WING_TIP">
    <!--4: RIGHT_WING_TIP-->
    <location unit="M">
      <x>4.87059</x>
      <y>4.52724</y>
      <z>-1.306</z>
    </location>
    <static_friction>1.2</static_friction>
    <dynamic_friction>1.212</dynamic_friction>
    <rolling_friction>1.413</rolling_friction>
      <spring_coeff unit="LBS/FT"> 10000 </spring_coeff>
      <damping_coeff unit="LBS/FT/SEC"> 2000 </damping_coeff>
      <damping_coeff_rebound unit="LBS/FT/SEC"> 40000 </damping_coeff_rebound>
  </contact>

  <contact type="STRUCTURE" name="CANOPY">
    <!--5: CANOPY-->
    <location unit="M">
      <x>-2.57101</x>
      <y>-0.000001</y>
      <z>0.404312</z>
    </location>
    <static_friction>1.2</static_friction>
    <dynamic_friction>1.212</dynamic_friction>
    <rolling_friction>1.413</rolling_friction>
      <spring_coeff unit="LBS/FT"> 10000 </spring_coeff>
      <damping_coeff unit="LBS/FT/SEC"> 2000 </damping_coeff>
      <damping_coeff_rebound unit="LBS/FT/SEC"> 40000 </damping_coeff_rebound>
  </contact>

  <contact type="STRUCTURE" name="REAR_CANOPY">
    <!--5: CANOPY-->
    <location unit="M">
      <x>-1.78563</x>
      <y>-0.000001</y>
      <z>0.516629</z>
    </location>
    <static_friction>1.2</static_friction>
    <dynamic_friction>1.212</dynamic_friction>
    <rolling_friction>1.413</rolling_friction>
      <spring_coeff unit="LBS/FT"> 10000 </spring_coeff>
      <damping_coeff unit="LBS/FT/SEC"> 2000 </damping_coeff>
      <damping_coeff_rebound unit="LBS/FT/SEC"> 40000 </damping_coeff_rebound>
  </contact>

  <contact type="STRUCTURE" name="RADOME_FRONT">
    <!--6: RADOME_FRONT-->
    <location unit="M">
      <x>-6.84357</x>
      <y>0</y>
      <z>-1.05949</z>
    </location>
    <static_friction>1.2</static_friction>
    <dynamic_friction>1.212</dynamic_friction>
    <rolling_friction>1.413</rolling_friction>
      <spring_coeff unit="LBS/FT"> 10000 </spring_coeff>
      <damping_coeff unit="LBS/FT/SEC"> 2000 </damping_coeff>
      <damping_coeff_rebound unit="LBS/FT/SEC"> 40000 </damping_coeff_rebound>
  </contact>

  <contact type="STRUCTURE" name="VERTICAL_TAIL_FRONT">
    <!--7: VERTICAL_TAIL-->
    <location unit="M">
      <x>6.21865</x>
      <y>-0.0000080</y>
      <z>2.57433</z>
    </location>
    <static_friction>1.2</static_friction>
    <dynamic_friction>1.212</dynamic_friction>
    <rolling_friction>1.413</rolling_friction>
      <spring_coeff unit="LBS/FT"> 10000 </spring_coeff>
      <damping_coeff unit="LBS/FT/SEC"> 2000 </damping_coeff>
      <damping_coeff_rebound unit="LBS/FT/SEC"> 40000 </damping_coeff_rebound>
  </contact>

  <contact type="STRUCTURE" name="VERTICAL_TAIL_REAR">
    <!--7: VERTICAL_TAIL-->
    <location unit="M">
      <x>6.88113</x>
      <y>-0.001008</y>
      <z>2.47668</z>
    </location>
    <static_friction>1.2</static_friction>
    <dynamic_friction>1.212</dynamic_friction>
    <rolling_friction>1.413</rolling_friction>
      <spring_coeff unit="LBS/FT"> 10000 </spring_coeff>
      <damping_coeff unit="LBS/FT/SEC"> 2000 </damping_coeff>
      <damping_coeff_rebound unit="LBS/FT/SEC"> 40000 </damping_coeff_rebound>
  </contact>

  <contact type="STRUCTURE" name="REAR_BODY_LEFT">
    <!--8: REAR_BODY_LEFT-->
    <location unit="M">
      <x>6.78815</x>
      <y>-0.503984</y>
      <z>-0.525499</z>
    </location>
    <static_friction>1.2</static_friction>
    <dynamic_friction>1.212</dynamic_friction>
    <rolling_friction>1.413</rolling_friction>
      <spring_coeff unit="LBS/FT"> 10000 </spring_coeff>
      <damping_coeff unit="LBS/FT/SEC"> 2000 </damping_coeff>
      <damping_coeff_rebound unit="LBS/FT/SEC"> 40000 </damping_coeff_rebound>
  </contact>

  <contact type="STRUCTURE" name="REAR_BODY_RIGHT">
    <!--9: REAR_BODY_RIGHT-->
    <location unit="M">
        <x>6.78815</x>
        <y>0.503984</y>
        <z>-0.525499</z>
    </location>
    <static_friction>1.2</static_friction>
    <dynamic_friction>1.212</dynamic_friction>
    <rolling_friction>1.413</rolling_friction>
      <spring_coeff unit="LBS/FT"> 10000 </spring_coeff>
      <damping_coeff unit="LBS/FT/SEC"> 2000 </damping_coeff>
      <damping_coeff_rebound unit="LBS/FT/SEC"> 40000 </damping_coeff_rebound>
  </contact>

  <contact type="STRUCTURE" name="LOWER_REAR_BODY">
    <!--9: REAR_BODY_RIGHT-->
    <location unit="M">
        <x>6.79036</x>
        <y>-0.000001</y>
        <z>-1.02817</z>
    </location>
    <static_friction>1.2</static_friction>
    <dynamic_friction>1.212</dynamic_friction>
    <rolling_friction>1.413</rolling_friction>
      <spring_coeff unit="LBS/FT"> 10000 </spring_coeff>
      <damping_coeff unit="LBS/FT/SEC"> 2000 </damping_coeff>
      <damping_coeff_rebound unit="LBS/FT/SEC"> 40000 </damping_coeff_rebound>
  </contact>

  <contact type="STRUCTURE" name="LOWER_MID_REAR_BODY">
    <!--9: REAR_BODY_RIGHT-->
    <location unit="M">
        <x>4.72403</x>
        <y>-0.000001</y>
        <z>-1.38454</z>
    </location>
    <static_friction>1.2</static_friction>
    <dynamic_friction>1.212</dynamic_friction>
    <rolling_friction>1.413</rolling_friction>
      <spring_coeff unit="LBS/FT"> 10000 </spring_coeff>
      <damping_coeff unit="LBS/FT/SEC"> 2000 </damping_coeff>
      <damping_coeff_rebound unit="LBS/FT/SEC"> 40000 </damping_coeff_rebound>
  </contact>

  <contact type="STRUCTURE" name="REFUEL_PROBE">
    <!--9: REAR_BODY_RIGHT-->
    <location unit="M">
        <x>-5.31455</x>
        <y>0.546533</y>
        <z>0.108819</z>
    </location>
    <static_friction>1.2</static_friction>
    <dynamic_friction>1.212</dynamic_friction>
    <rolling_friction>1.413</rolling_friction>
      <spring_coeff unit="LBS/FT"> 10000 </spring_coeff>
      <damping_coeff unit="LBS/FT/SEC"> 2000 </damping_coeff>
      <damping_coeff_rebound unit="LBS/FT/SEC"> 40000 </damping_coeff_rebound>
  </contact>

  <contact type="STRUCTURE" name="LEFT_STRAKE">
    <!--9: REAR_BODY_RIGHT-->
    <location unit="M">
        <x>-1.62712</x>
        <y>-1.12741</y>
        <z>-0.416566</z>
    </location>
    <static_friction>1.2</static_friction>
    <dynamic_friction>1.212</dynamic_friction>
    <rolling_friction>1.413</rolling_friction>
      <spring_coeff unit="LBS/FT"> 10000 </spring_coeff>
      <damping_coeff unit="LBS/FT/SEC"> 2000 </damping_coeff>
      <damping_coeff_rebound unit="LBS/FT/SEC"> 40000 </damping_coeff_rebound>
  </contact>

  <contact type="STRUCTURE" name="RIGHT_STRAKE">
    <!--9: REAR_BODY_RIGHT-->
    <location unit="M">
        <x>-1.62712</x>
        <y>1.12741</y>
        <z>-0.416566</z>
    </location>
    <static_friction>1.2</static_friction>
    <dynamic_friction>1.212</dynamic_friction>
    <rolling_friction>1.413</rolling_friction>
      <spring_coeff unit="LBS/FT"> 10000 </spring_coeff>
      <damping_coeff unit="LBS/FT/SEC"> 2000 </damping_coeff>
      <damping_coeff_rebound unit="LBS/FT/SEC"> 40000 </damping_coeff_rebound>
  </contact>

  <contact type="STRUCTURE" name="FRONT_LOWER_ANTENNA">
    <!--9: REAR_BODY_RIGHT-->
    <location unit="M">
        <x>-4.49058</x>
        <y>-0.001498</y>
        <z>-1.44783</z>
    </location>
    <static_friction>1.2</static_friction>
    <dynamic_friction>1.212</dynamic_friction>
    <rolling_friction>1.413</rolling_friction>
      <spring_coeff unit="LBS/FT"> 10000 </spring_coeff>
      <damping_coeff unit="LBS/FT/SEC"> 2000 </damping_coeff>
      <damping_coeff_rebound unit="LBS/FT/SEC"> 40000 </damping_coeff_rebound>
  </contact>

  <contact type="STRUCTURE" name="VSTAB_FRONT_ANTENNA">
    <!--9: REAR_BODY_RIGHT-->
    <location unit="M">
        <x>5.14014</x>
        <y>-0.000001</y>
        <z>1.99953</z>
    </location>
    <static_friction>1.2</static_friction>
    <dynamic_friction>1.212</dynamic_friction>
    <rolling_friction>1.413</rolling_friction>
      <spring_coeff unit="LBS/FT"> 10000 </spring_coeff>
      <damping_coeff unit="LBS/FT/SEC"> 2000 </damping_coeff>
      <damping_coeff_rebound unit="LBS/FT/SEC"> 40000 </damping_coeff_rebound>
  </contact>

  <contact type="STRUCTURE" name="VSTAB_REAR_ANTENNA">
    <!--9: REAR_BODY_RIGHT-->
    <location unit="M">
        <x>6.90465</x>
        <y>-0.0</y>
        <z>1.91854</z>
    </location>
    <static_friction>1.2</static_friction>
    <dynamic_friction>1.212</dynamic_friction>
    <rolling_friction>1.413</rolling_friction>
      <spring_coeff unit="LBS/FT"> 10000 </spring_coeff>
      <damping_coeff unit="LBS/FT/SEC"> 2000 </damping_coeff>
      <damping_coeff_rebound unit="LBS/FT/SEC"> 40000 </damping_coeff_rebound>
  </contact>

  <contact type="STRUCTURE" name="CHUTE">
    <!--9: REAR_BODY_RIGHT-->
    <location unit="M">
        <x>6.98654</x>
        <y>0.0</y>
        <z>0.147787</z>
    </location>
    <static_friction>1.2</static_friction>
    <dynamic_friction>1.212</dynamic_friction>
    <rolling_friction>1.413</rolling_friction>
      <spring_coeff unit="LBS/FT"> 10000 </spring_coeff>
      <damping_coeff unit="LBS/FT/SEC"> 2000 </damping_coeff>
      <damping_coeff_rebound unit="LBS/FT/SEC"> 40000 </damping_coeff_rebound>
  </contact>
</ground_reactions>

<propulsion>
  <engine file="SNECMA_M53-P2">
    <location unit="M">
      <x>17.45</x>
      <y>0</y>
      <z>0.6</z>
    </location>
    <orient unit="DEG">
      <roll>0</roll>
      <pitch>0</pitch>
      <yaw>0</yaw>
    </orient>
    <feed>0</feed>
    <feed>1</feed>
    <feed>2</feed>
    <feed>3</feed>
    <feed>4</feed>
    <thruster file="direct">
      <location unit="M">
        <x>17.45</x>
        <y>0</y>
        <z>0.6</z>
      </location>
      <orient unit="DEG">
        <roll>0</roll>
        <pitch>0</pitch>
        <yaw>0</yaw>
      </orient>
    </thruster>
  </engine>
  <tank number="0" type="FUEL">
    <!--0: Main Tank-->
    <location unit="M">
      <x>7.9</x>
      <y>0</y>
      <z>0.6</z>
    </location>
    <capacity unit="KG">2128</capacity>
    <standpipe unit="KG">50</standpipe>
    <contents unit="KG">2128</contents>
    <priority>4</priority>
  </tank>
  <tank number="1" type="FUEL">
    <!--1: Right Wing Tank-->
    <location unit="M">
      <x>7.9</x>
      <y>4</y>
      <z>0.2</z>
    </location>
    <capacity unit="LBS">385</capacity>
    <standpipe unit="LBS">100</standpipe>
    <contents unit="LBS">385</contents>
    <priority>3</priority>
  </tank>
  <tank number="2" type="FUEL">
    <!--2: Left Wing Tank-->
    <location unit="M">
      <x>7.9</x>
      <y>-4</y>
      <z>0.2</z>
    </location>
    <capacity unit="LBS">385</capacity>
    <standpipe unit="LBS">100</standpipe>
    <contents unit="LBS">385</contents>
    <priority>3</priority>
  </tank>
  <tank number="3" type="FUEL">
    <!--3: External Tank-->
    <location unit="M">
      <x>7.9</x>
      <y>0</y>
      <z>0.008</z>
    </location>
    <capacity unit="KG">1200</capacity>
    <standpipe unit="KG">50</standpipe>
    <contents unit="KG">1200</contents>
    <priority>2</priority>
  </tank>
  <tank number="4" type="FUEL">
    <!--4: Feed line-->
    <location unit="M">
      <x>7.9</x>
      <y>0</y>
      <z>0.6</z>
    </location>
    <capacity unit="LBS">10</capacity>
    <contents unit="LBS">10</contents>
    <priority>1</priority>
  </tank>
</propulsion>

<external_reactions>
  <force name="catapult" frame="BODY">
    <location unit="IN">
      <x>667</x>
      <y>0</y>
      <z>0</z>
    </location>
    <direction>
      <x>1</x>
      <y>0</y>
      <z>0</z>
    </direction>
  </force>
  <force name="holdback" frame="BODY">
    <location unit="IN">
      <x>667</x>
      <y>0</y>
      <z>0</z>
    </location>
    <direction>
      <x>-1</x>
      <y>0</y>
      <z>0</z>
    </direction>
  </force>
  <force name="hook" frame="BODY">
    <location unit="IN">
      <x>300</x>
      <y>0</y>
      <z>0</z>
    </location>
    <direction>
      <x>-0.9995</x>
      <y>0</y>
      <z>0.01</z>
    </direction>
  </force>
</external_reactions>

<flight_control name="Mirage2000-FCS">
       <property value="7.9">metrics/cg-x-m</property>
       <property value="0.6">metrics/cg-z-m</property>
  <channel name="extra-aero">
        <!-- need %Cg in chord for moments [Xcg - Xref)/100] -->
        <summer name="cg-x-offset-chord-in">
            <input> inertia/cg-x-in</input>
            <input> -metrics/aero-rp-x-in</input>
            <output>inertia/cg-x-offset-chord-in</output>
        </summer>

        <!-- figure out the factor for the fuel tank aero -->
        <pure_gain name="cg-x-chord-percent">
            <description>Percent offset of the CoP from the CG</description>
            <input>inertia/cg-x-offset-chord-in</input>
            <gain> -0.01</gain>
            <clipto>
                <min> -1 </min>
                <max> 1 </max>
            </clipto>
            <output> inertia/cg-x-mac-percent </output>
        </pure_gain>

        <fcs_function name="pb">
            <description>PB Denormalization</description>
            <function>
                    <product>
                        <property>aero/bi2vel</property>
                        <property>velocities/p-aero-rad_sec</property>
                    </product>
            </function>
            <output>aero/pb</output>
        </fcs_function>

        <fcs_function name="cbarq-2vo">
            <description>For denormalization</description>
            <function>
                    <product>
                        <property>aero/ci2vel</property>
                        <property>velocities/q-aero-rad_sec</property>
                    </product>
            </function>
            <output>aero/qb</output>
        </fcs_function>

        <fcs_function name="rb-2vo">
            <description>For denormalization</description>
            <function>
                <product>
                        <property>aero/bi2vel</property>
                        <property>velocities/r-aero-rad_sec</property>
                    </product>
            </function>
            <output>aero/rb</output>
        </fcs_function>


        <fcs_function name="aero-cos-alpha">
            <function>
                <product>
                    <cos>
                        <property>aero/alpha-rad</property>
                    </cos>
                </product>
            </function>
            <output>aero/cos-alpha</output>
        </fcs_function>

        <fcs_function name="aero-sin-alpha">
            <function>
                <product>
                    <sin>
                        <property>aero/alpha-rad</property>
                    </sin>
                </product>
            </function>
            <output>aero/sin-alpha</output>
        </fcs_function>
       </channel>
</flight_control>
<system file="Mirage-2000-hydraulics"/>
<system file="Mirage-2000-electrics"/>
<system file="Mirage-2000-avionics"/>
<system file="Mirage-2000-ecs"/>
<system file="Mirage2000-engines-Snecma-M53"/>
<system file="Mirage-2000-fcs"/>
<aerodynamics>
    <function name="aero/c/CFXB">
    <description>BASIC DRAG</description>
    <product>
          <table>
            <independentVar lookup="row">aero/alpha-deg</independentVar>
            <tableData>
                    -20		    0.18009
                    -10		    0.08904
                     -5		    0.05235
                      0		    0.02865
                      5		    0.02227
                     10		    0.03102
                     12		    0.03828
                     15		    0.05395
                     17		    0.06716
                     20		    0.09194
                     25		    0.12772
                     30		    0.15547
                     40		    0.19471
                     50		    0.21836
            </tableData>
          </table>
       </product>
    </function>
    <function name="aero/c/CFXDED1L">
    <description>DRAG DUE TO ELEVON 1L</description>
    <product>
          <table>
            <independentVar lookup="row">aero/alpha-deg</independentVar>
            <independentVar lookup="column">aero/beta-deg</independentVar>
            <independentVar lookup="table">fcs/elevon-1L-pos-deg</independentVar>
              <tableData breakPoint="-16">
                              -10	         0	        10
                    -20	    0.01833	    0.01720	    0.01400
                    -10	    0.01656	    0.01620	    0.01357
                     -5	    0.01323	    0.01539	    0.01337
                      0	    0.00697	    0.01122	    0.01150
                      5	    0.00154	    0.00457	    0.00599
                     10	  -0.00385	  -0.00169	    0.00059
                     12	  -0.00621	  -0.00398	  -0.00178
                     15	  -0.01053	  -0.00770	  -0.00521
                     17	  -0.01269	  -0.00983	  -0.00729
                     20	  -0.01428	  -0.01259	  -0.00924
                     25	  -0.01457	  -0.01084	  -0.00928
                     30	  -0.01535	  -0.01138	  -0.00827
                     40	  -0.01561	  -0.01036	  -0.00818
                     50	  -0.01225	  -0.00937	  -0.00562
              </tableData>
              <tableData breakPoint="-13">
                              -10	         0	        10
                    -20	    0.01512	    0.01423	    0.01163
                    -10	    0.01343	    0.01333	    0.01116
                     -5	    0.01044	    0.01230	    0.01089
                      0	    0.00518	    0.00858	    0.00914
                      5	    0.00069	    0.00304	    0.00432
                     10	  -0.00378	  -0.00211	  -0.00011
                     12	  -0.00574	  -0.00399	  -0.00210
                     15	  -0.00930	  -0.00698	  -0.00489
                     17	  -0.01100	  -0.00870	  -0.00660
                     20	  -0.01211	  -0.01082	  -0.00802
                     25	  -0.01232	  -0.00877	  -0.00784
                     30	  -0.01282	  -0.00957	  -0.00701
                     40	  -0.01215	  -0.00860	  -0.00686
                     50	  -0.00993	  -0.00758	  -0.00473
              </tableData>
              <tableData breakPoint="-10">
                              -10	         0	        10
                    -20	    0.01174	    0.01109	    0.00914
                    -10	    0.01028	    0.01020	    0.00865
                     -5	    0.00775	    0.00921	    0.00826
                      0	    0.00356	    0.00612	    0.00665
                      5	    0.00007	    0.00176	    0.00285
                     10	  -0.00341	  -0.00221	  -0.00056
                     12	  -0.00497	  -0.00363	  -0.00216
                     15	  -0.00773	  -0.00595	    0.00124
                     17	  -0.00889	  -0.00725	  -0.00559
                     20	  -0.00972	  -0.00883	  -0.00651
                     25	  -0.00989	  -0.00682	  -0.00624
                     30	  -0.00996	  -0.00772	  -0.00557
                     40	  -0.00941	  -0.00641	  -0.00530
                     50	  -0.00773	  -0.00587	  -0.00359
              </tableData>
              <tableData breakPoint="-5">
                              -10	         0	        10
                    -20	    0.00591	    0.00563	    0.00449
                    -10	    0.00491	    0.00521	    0.00439
                     -5	    0.00362	    0.00438	    0.00402
                      0	    0.00139	    0.00262	    0.00295
                      5	  -0.00037	    0.00037	    0.00099
                     10	  -0.00218	  -0.00162	  -0.00075
                     12	  -0.00294	  -0.00233	  -0.00160
                     15	  -0.00428	  -0.00338	  -0.00257
                     17	  -0.00488	  -0.00400	  -0.00322
                     20	  -0.00509	  -0.00482	  -0.00347
                     25	  -0.00543	  -0.00320	  -0.00331
                     30	  -0.00506	  -0.00406	  -0.00287
                     40	  -0.00474	  -0.00300	  -0.00267
                     50	    0.03051	  -0.00291	  -0.00186
              </tableData>
              <tableData breakPoint="0">
                              -10	         0	        10
                    -20	    0.00000	    0.00000	    0.00000
                    -10	    0.00000	    0.00000	    0.00000
                     -5	    0.00000	    0.00000	    0.00000
                      0	    0.00000	    0.00000	    0.00000
                      5	    0.00000	    0.00000	    0.00000
                     10	    0.00000	  -0.00001	    0.00000
                     12	    0.00000	    0.00002	  -0.00014
                     15	    0.00000	  -0.00001	    0.00000
                     17	    0.00000	  -0.00003	    0.00000
                     20	    0.00000	  -0.00016	    0.00000
                     25	    0.00000	    0.00038	    0.00000
                     30	    0.00024	  -0.00004	    0.00000
                     40	    0.00000	    0.00001	    0.00000
                     50	    0.00000	    0.00005	    0.00000
              </tableData>
              <tableData breakPoint="5">
                              -10	         0	        10
                    -20	  -0.00583	  -0.00529	  -0.00449
                    -10	  -0.00441	  -0.00469	  -0.00407
                     -5	  -0.00280	  -0.00377	  -0.00353
                      0	  -0.00054	  -0.00155	  -0.00213
                      5	    0.00120	    0.00068	  -0.00012
                     10	    0.00299	    0.00253	    0.00160
                     12	    0.00377	    0.00313	    0.00220
                     15	    0.00504	    0.00418	    0.00346
                     17	    0.00526	    0.00461	    0.00385
                     20	    0.00535	    0.00427	    0.00373
                     25	    0.00519	    0.00511	    0.00375
                     30	    0.00589	    0.00396	    0.00289
                     40	    0.00450	    0.00406	    0.00261
                     50	    0.00396	    0.00252	    0.00193
              </tableData>
              <tableData breakPoint="10">
                              -10	         0	        10
                    -20	  -0.01125	  -0.01029	  -0.00872
                    -10	  -0.00793	  -0.00894	  -0.00767
                     -5	  -0.00460	  -0.00650	  -0.00638
                      0	  -0.00026	  -0.00208	  -0.00333
                      5	    0.00317	    0.00236	    0.00063
                     10	    0.00667	    0.00593	    0.00578
                     12	    0.00822	    0.00709	    0.00536
                     15	    0.01030	    0.00854	    0.00743
                     17	    0.01083	    0.00916	    0.00793
                     20	    0.01073	    0.00876	    0.00760
                     25	    0.01046	    0.00874	    0.00645
                     30	    0.01135	    0.01079	    0.00582
                     40	    0.00833	    0.00775	    0.00488
                     50	    0.03583	    0.00507	    0.00333
              </tableData>
              <tableData breakPoint="15">
                              -10	         0	        10
                    -20	  -0.01610	  -0.01500	  -0.01267
                    -10	  -0.01059	  -0.01243	  -0.01078
                     -5	  -0.00548	  -0.00817	  -0.00831
                      0	    0.00074	  -0.00166	  -0.00363
                      5	    0.00575	    0.00491	    0.00214
                     10	    0.01084	    0.00999	    0.00704
                     12	    0.01309	    0.01149	    0.00908
                     15	    0.01557	    0.01347	    0.01150
                     17	    0.01627	    0.01399	    0.01206
                     20	    0.01596	    0.01330	    0.01128
                     25	    0.01537	    0.01277	    0.00948
                     30	    0.01633	    0.01262	    0.00872
                     40	    0.01224	    0.01096	    0.00726
                     50	    0.01021	    0.00718	    0.00531
              </tableData>
              <tableData breakPoint="16">
                              -10	         0	        10
                    -20	  -0.01697	  -0.01589	  -0.01342
                    -10	  -0.01102	  -0.01300	  -0.01132
                     -5	  -0.00556	  -0.00838	  -0.00859
                      0	    0.00102	  -0.00147	  -0.00360
                      5	    0.00632	    0.00547	    0.00252
                     10	    0.01171	    0.01086	    0.00770
                     12	    0.01408	    0.01239	    0.00986
                     15	    0.01659	    0.01442	    0.01232
                     17	    0.01730	    0.01479	    0.01288
                     20	    0.01670	    0.01414	    0.01199
                     25	    0.01629	    0.01310	    0.01008
                     30	    0.01726	    0.01336	    0.00944
                     40	    0.01294	    0.01076	    0.00771
                     50	    0.01065	    0.00758	    0.00557
              </tableData>
              <tableData breakPoint="20">
                              -10	         0	        10
                    -20	  -0.02019	  -0.01896	  -0.01608
                    -10	  -0.01234	  -0.01497	  -0.01322
                     -5	  -0.00559	  -0.00887	  -0.00937
                      0	    0.00230	  -0.00044	  -0.00320
                      5	    0.00872	    0.00800	    0.00422
                     10	    0.01521	    0.01443	    0.01044
                     12	    0.01798	    0.01604	    0.01292
                     15	    0.02055	    0.01809	    0.01529
                     17	    0.02115	    0.01850	    0.01601
                     20	    0.01956	    0.01725	    0.01473
                     25	    0.01976	    0.01623	    0.01216
                     30	    0.02069	    0.01639	    0.01154
                     40	    0.01560	    0.01282	    0.00936
                     50	    0.01248	    0.00908	    0.00645
              </tableData>
              <tableData breakPoint="25">
                              -10	         0	        10
                    -20	  -0.02346	  -0.02228	  -0.01893
                    -10	  -0.01328	  -0.01664	  -0.01500
                     -5	  -0.00521	  -0.00886	  -0.00971
                      0	    0.00418	    0.00129	  -0.00222
                      5	    0.01181	    0.01137	    0.00660
                     10	    0.01949	    0.01878	    0.01396
                     12	    0.02238	    0.02436	    0.01649
                     15	    0.02512	    0.02234	    0.01886
                     17	    0.02554	    0.02259	    0.01948
                     20	    0.02340	    0.02089	    0.01783
                     25	    0.02368	    0.01967	    0.01449
                     30	    0.02446	    0.01935	    0.01386
                     40	    0.01869	    0.01522	    0.01117
                     50	    0.01417	    0.01020	    0.00711
              </tableData>
          </table>
       </product>
    </function>
    <function name="aero/c/CFXDED1R">
    <description>DRAG DUE TO ELEVON 1R</description>
    <product>
          <table>
            <independentVar lookup="row">aero/alpha-deg</independentVar>
            <independentVar lookup="column">aero/beta-deg</independentVar>
            <independentVar lookup="table">fcs/elevon-1R-pos-deg</independentVar>
              <tableData breakPoint="-16">
                              -10	         0	        10
                    -20	    0.01833	    0.01720	    0.01400
                    -10	    0.01656	    0.01620	    0.01357
                     -5	    0.01323	    0.01539	    0.01337
                      0	    0.00697	    0.01122	    0.01150
                      5	    0.00154	    0.00457	    0.00599
                     10	  -0.00385	  -0.00169	    0.00059
                     12	  -0.00621	  -0.00398	  -0.00178
                     15	  -0.01053	  -0.00770	  -0.00521
                     17	  -0.01269	  -0.00983	  -0.00729
                     20	  -0.01428	  -0.01259	  -0.00924
                     25	  -0.01457	  -0.01084	  -0.00928
                     30	  -0.01535	  -0.01138	  -0.00827
                     40	  -0.01561	  -0.01036	  -0.00818
                     50	  -0.01225	  -0.00937	  -0.00562
              </tableData>
              <tableData breakPoint="-13">
                              -10	         0	        10
                    -20	    0.01512	    0.01423	    0.01163
                    -10	    0.01343	    0.01333	    0.01116
                     -5	    0.01044	    0.01230	    0.01089
                      0	    0.00518	    0.00858	    0.00914
                      5	    0.00069	    0.00304	    0.00432
                     10	  -0.00378	  -0.00211	  -0.00011
                     12	  -0.00574	  -0.00399	  -0.00210
                     15	  -0.00930	  -0.00698	  -0.00489
                     17	  -0.01100	  -0.00870	  -0.00660
                     20	  -0.01211	  -0.01082	  -0.00802
                     25	  -0.01232	  -0.00877	  -0.00784
                     30	  -0.01282	  -0.00957	  -0.00701
                     40	  -0.01215	  -0.00860	  -0.00686
                     50	  -0.00993	  -0.00758	  -0.00473
              </tableData>
              <tableData breakPoint="-10">
                              -10	         0	        10
                    -20	    0.01174	    0.01109	    0.00914
                    -10	    0.01028	    0.01020	    0.00865
                     -5	    0.00775	    0.00921	    0.00826
                      0	    0.00356	    0.00612	    0.00665
                      5	    0.00007	    0.00176	    0.00285
                     10	  -0.00341	  -0.00221	  -0.00056
                     12	  -0.00497	  -0.00363	  -0.00216
                     15	  -0.00773	  -0.00595	    0.00124
                     17	  -0.00889	  -0.00725	  -0.00559
                     20	  -0.00972	  -0.00883	  -0.00651
                     25	  -0.00989	  -0.00682	  -0.00624
                     30	  -0.00996	  -0.00772	  -0.00557
                     40	  -0.00941	  -0.00641	  -0.00530
                     50	  -0.00773	  -0.00587	  -0.00359
              </tableData>
              <tableData breakPoint="-5">
                              -10	         0	        10
                    -20	    0.00591	    0.00563	    0.00449
                    -10	    0.00491	    0.00521	    0.00439
                     -5	    0.00362	    0.00438	    0.00402
                      0	    0.00139	    0.00262	    0.00295
                      5	  -0.00037	    0.00037	    0.00099
                     10	  -0.00218	  -0.00162	  -0.00075
                     12	  -0.00294	  -0.00233	  -0.00160
                     15	  -0.00428	  -0.00338	  -0.00257
                     17	  -0.00488	  -0.00400	  -0.00322
                     20	  -0.00509	  -0.00482	  -0.00347
                     25	  -0.00543	  -0.00320	  -0.00331
                     30	  -0.00506	  -0.00406	  -0.00287
                     40	  -0.00474	  -0.00300	  -0.00267
                     50	    0.03051	  -0.00291	  -0.00186
              </tableData>
              <tableData breakPoint="0">
                              -10	         0	        10
                    -20	    0.00000	    0.00000	    0.00000
                    -10	    0.00000	    0.00000	    0.00000
                     -5	    0.00000	    0.00000	    0.00000
                      0	    0.00000	    0.00000	    0.00000
                      5	    0.00000	    0.00000	    0.00000
                     10	    0.00000	  -0.00001	    0.00000
                     12	    0.00000	    0.00002	  -0.00014
                     15	    0.00000	  -0.00001	    0.00000
                     17	    0.00000	  -0.00003	    0.00000
                     20	    0.00000	  -0.00016	    0.00000
                     25	    0.00000	    0.00038	    0.00000
                     30	    0.00024	  -0.00004	    0.00000
                     40	    0.00000	    0.00001	    0.00000
                     50	    0.00000	    0.00005	    0.00000
              </tableData>
              <tableData breakPoint="5">
                              -10	         0	        10
                    -20	  -0.00583	  -0.00529	  -0.00449
                    -10	  -0.00441	  -0.00469	  -0.00407
                     -5	  -0.00280	  -0.00377	  -0.00353
                      0	  -0.00054	  -0.00155	  -0.00213
                      5	    0.00120	    0.00068	  -0.00012
                     10	    0.00299	    0.00253	    0.00160
                     12	    0.00377	    0.00313	    0.00220
                     15	    0.00504	    0.00418	    0.00346
                     17	    0.00526	    0.00461	    0.00385
                     20	    0.00535	    0.00427	    0.00373
                     25	    0.00519	    0.00511	    0.00375
                     30	    0.00589	    0.00396	    0.00289
                     40	    0.00450	    0.00406	    0.00261
                     50	    0.00396	    0.00252	    0.00193
              </tableData>
              <tableData breakPoint="10">
                              -10	         0	        10
                    -20	  -0.01125	  -0.01029	  -0.00872
                    -10	  -0.00793	  -0.00894	  -0.00767
                     -5	  -0.00460	  -0.00650	  -0.00638
                      0	  -0.00026	  -0.00208	  -0.00333
                      5	    0.00317	    0.00236	    0.00063
                     10	    0.00667	    0.00593	    0.00578
                     12	    0.00822	    0.00709	    0.00536
                     15	    0.01030	    0.00854	    0.00743
                     17	    0.01083	    0.00916	    0.00793
                     20	    0.01073	    0.00876	    0.00760
                     25	    0.01046	    0.00874	    0.00645
                     30	    0.01135	    0.01079	    0.00582
                     40	    0.00833	    0.00775	    0.00488
                     50	    0.03583	    0.00507	    0.00333
              </tableData>
              <tableData breakPoint="15">
                              -10	         0	        10
                    -20	  -0.01610	  -0.01500	  -0.01267
                    -10	  -0.01059	  -0.01243	  -0.01078
                     -5	  -0.00548	  -0.00817	  -0.00831
                      0	    0.00074	  -0.00166	  -0.00363
                      5	    0.00575	    0.00491	    0.00214
                     10	    0.01084	    0.00999	    0.00704
                     12	    0.01309	    0.01149	    0.00908
                     15	    0.01557	    0.01347	    0.01150
                     17	    0.01627	    0.01399	    0.01206
                     20	    0.01596	    0.01330	    0.01128
                     25	    0.01537	    0.01277	    0.00948
                     30	    0.01633	    0.01262	    0.00872
                     40	    0.01224	    0.01096	    0.00726
                     50	    0.01021	    0.00718	    0.00531
              </tableData>
              <tableData breakPoint="16">
                              -10	         0	        10
                    -20	  -0.01697	  -0.01589	  -0.01342
                    -10	  -0.01102	  -0.01300	  -0.01132
                     -5	  -0.00556	  -0.00838	  -0.00859
                      0	    0.00102	  -0.00147	  -0.00360
                      5	    0.00632	    0.00547	    0.00252
                     10	    0.01171	    0.01086	    0.00770
                     12	    0.01408	    0.01239	    0.00986
                     15	    0.01659	    0.01442	    0.01232
                     17	    0.01730	    0.01479	    0.01288
                     20	    0.01670	    0.01414	    0.01199
                     25	    0.01629	    0.01310	    0.01008
                     30	    0.01726	    0.01336	    0.00944
                     40	    0.01294	    0.01076	    0.00771
                     50	    0.01065	    0.00758	    0.00557
              </tableData>
              <tableData breakPoint="20">
                              -10	         0	        10
                    -20	  -0.02019	  -0.01896	  -0.01608
                    -10	  -0.01234	  -0.01497	  -0.01322
                     -5	  -0.00559	  -0.00887	  -0.00937
                      0	    0.00230	  -0.00044	  -0.00320
                      5	    0.00872	    0.00800	    0.00422
                     10	    0.01521	    0.01443	    0.01044
                     12	    0.01798	    0.01604	    0.01292
                     15	    0.02055	    0.01809	    0.01529
                     17	    0.02115	    0.01850	    0.01601
                     20	    0.01956	    0.01725	    0.01473
                     25	    0.01976	    0.01623	    0.01216
                     30	    0.02069	    0.01639	    0.01154
                     40	    0.01560	    0.01282	    0.00936
                     50	    0.01248	    0.00908	    0.00645
              </tableData>
              <tableData breakPoint="25">
                              -10	         0	        10
                    -20	  -0.02346	  -0.02228	  -0.01893
                    -10	  -0.01328	  -0.01664	  -0.01500
                     -5	  -0.00521	  -0.00886	  -0.00971
                      0	    0.00418	    0.00129	  -0.00222
                      5	    0.01181	    0.01137	    0.00660
                     10	    0.01949	    0.01878	    0.01396
                     12	    0.02238	    0.02436	    0.01649
                     15	    0.02512	    0.02234	    0.01886
                     17	    0.02554	    0.02259	    0.01948
                     20	    0.02340	    0.02089	    0.01783
                     25	    0.02368	    0.01967	    0.01449
                     30	    0.02446	    0.01935	    0.01386
                     40	    0.01869	    0.01522	    0.01117
                     50	    0.01417	    0.01020	    0.00711
              </tableData>
          </table>
       </product>
    </function>
    <function name="aero/c/CFXDED2L">
    <description>DRAG DUE TO ELEVON 2L</description>
    <product>
          <table>
            <independentVar lookup="row">aero/alpha-deg</independentVar>
            <independentVar lookup="column">aero/beta-deg</independentVar>
            <independentVar lookup="table">fcs/elevon-2L-pos-deg</independentVar>
              <tableData breakPoint="-16">
                              -10	         0	        10
                    -20	    0.03184	    0.03311	    0.02961
                    -10	    0.02078	    0.02251	    0.02322
                     -5	    0.01520	    0.01764	    0.01848
                      0	    0.00825	    0.01052	    0.01277
                      5	    0.00127	    0.00386	    0.00559
                     10	  -0.00525	  -0.00265	  -0.00127
                     12	  -0.00830	  -0.00537	  -0.00375
                     15	  -0.01239	  -0.00946	  -0.00805
                     17	  -0.01503	  -0.01169	  -0.01008
                     20	  -0.01783	  -0.01447	  -0.01222
                     25	  -0.02147	  -0.01654	  -0.01629
                     30	  -0.02632	  -0.01464	  -0.01799
                     40	  -0.02703	  -0.01855	  -0.01586
                     50	  -0.02105	  -0.01467	  -0.00844
              </tableData>
              <tableData breakPoint="-13">
                              -10	         0	        10
                    -20	    0.02595	    0.02713	    0.02385
                    -10	    0.01647	    0.01802	    0.01869
                     -5	    0.01178	    0.01392	    0.01460
                      0	    0.00610	    0.00795	    0.00991
                      5	    0.00041	    0.00246	    0.00395
                     10	  -0.00502	  -0.00290	  -0.00165
                     12	  -0.00756	  -0.00508	  -0.00385
                     15	  -0.01081	  -0.00858	  -0.00736
                     17	  -0.01306	  -0.01005	  -0.00893
                     20	  -0.01527	  -0.01249	  -0.01059
                     25	  -0.01801	  -0.01395	  -0.01382
                     30	  -0.02208	  -0.01355	  -0.01556
                     40	  -0.02265	  -0.01511	  -0.01318
                     50	  -0.01813	  -0.01171	  -0.00695
              </tableData>
              <tableData breakPoint="-10">
                              -10	         0	        10
                    -20	    0.01989	    0.02093	    0.01845
                    -10	    0.01233	    0.01344	    0.01424
                     -5	    0.00856	    0.01032	    0.01087
                      0	    0.00416	    0.00562	    0.00723
                      5	  -0.00020	    0.00132	    0.00251
                     10	  -0.00446	  -0.00282	  -0.00176
                     12	  -0.00640	  -0.00452	  -0.00363
                     15	  -0.00889	  -0.00714	  -0.00622
                     17	  -0.01061	  -0.00834	  -0.00740
                     20	  -0.01233	  -0.01034	  -0.00865
                     25	  -0.01477	  -0.01071	  -0.01104
                     30	  -0.01771	  -0.01114	  -0.01188
                     40	  -0.01815	  -0.01172	  -0.01046
                     50	  -0.01578	  -0.01043	  -0.00518
              </tableData>
              <tableData breakPoint="-5">
                              -10	         0	        10
                    -20	    0.00962	    0.01049	    0.00846
                    -10	    0.00576	    0.00654	    0.00718
                     -5	    0.00388	    0.00465	    0.00499
                      0	    0.00155	    0.00234	    0.00316
                      5	  -0.00056	    0.00015	    0.00078
                     10	  -0.00271	  -0.00203	  -0.00133
                     12	  -0.00370	  -0.00277	  -0.00232
                     15	  -0.00491	  -0.00402	  -0.00343
                     17	  -0.00561	  -0.00459	  -0.00436
                     20	  -0.00657	  -0.00583	  -0.00467
                     25	  -0.00781	  -0.00563	  -0.00575
                     30	  -0.00928	  -0.00612	  -0.00601
                     40	  -0.00940	  -0.00573	  -0.00568
                     50	  -0.00766	  -0.00567	  -0.00247
              </tableData>
              <tableData breakPoint="0">
                              -10	         0	        10
                    -20	  -0.00035	  -0.00013	  -0.00052
                    -10	  -0.00011	    0.00012	  -0.00009
                     -5	  -0.00004	  -0.00001	  -0.00004
                      0	    0.00002	    0.00002	  -0.00004
                      5	  -0.00001	    0.00000	  -0.00001
                     10	    0.00003	    0.00002	    0.00000
                     12	    0.00002	  -0.00002	  -0.00013
                     15	    0.00011	    0.00000	    0.00013
                     17	    0.00029	    0.00001	    0.00031
                     20	  -0.00002	    0.00004	    0.00003
                     25	  -0.00004	    0.00094	    0.00030
                     30	  -0.00004	  -0.00011	  -0.00027
                     40	    0.00003	    0.00068	  -0.00030
                     50	    0.00049	  -0.00021	    0.00016
              </tableData>
              <tableData breakPoint="5">
                              -10	         0	        10
                    -20	  -0.00983	  -0.00931	  -0.00883
                    -10	  -0.00510	  -0.00591	  -0.00644
                     -5	  -0.00307	  -0.00388	  -0.00422
                      0	  -0.00060	  -0.00133	  -0.00225
                      5	    0.00142	    0.00091	    0.00016
                     10	    0.00362	    0.00282	    0.00223
                     12	    0.00464	    0.00352	    0.00291
                     15	    0.00583	    0.00484	    0.00438
                     17	    0.00677	    0.00578	    0.00517
                     20	    0.00727	    0.00669	    0.00528
                     25	    0.00858	    0.00880	    0.00611
                     30	    0.01049	    0.00947	    0.00573
                     40	    0.00788	    0.00780	    0.00540
                     50	    0.00828	    0.00538	    0.00301
              </tableData>
              <tableData breakPoint="10">
                              -10	         0	        10
                    -20	  -0.01769	  -0.01805	  -0.01650
                    -10	  -0.00927	  -0.01058	  -0.01161
                     -5	  -0.00500	  -0.00670	  -0.00722
                      0	  -0.00041	  -0.00161	  -0.00338
                      5	    0.00373	    0.00280	    0.00130
                     10	    0.00798	    0.00668	    0.00522
                     12	    0.00992	    0.00805	    0.00664
                     15	    0.01204	    0.01055	    0.00930
                     17	    0.01372	    0.01236	    0.01073
                     20	    0.01465	    0.01325	    0.01090
                     25	    0.01795	    0.01716	    0.01179
                     30	    0.01986	    0.01936	    0.01249
                     40	    0.01594	    0.01526	    0.01077
                     50	    0.01458	    0.01009	    0.00550
              </tableData>
              <tableData breakPoint="15">
                              -10	         0	        10
                    -20	  -0.02495	  -0.02467	  -0.02344
                    -10	  -0.01239	  -0.01404	  -0.01572
                     -5	  -0.00590	  -0.00830	  -0.00915
                      0	    0.00077	  -0.00096	  -0.00345
                      5	    0.00669	    0.00550	    0.00334
                     10	    0.01290	    0.01109	    0.00877
                     12	    0.01566	    0.01299	    0.01121
                     15	    0.01883	    0.01646	    0.01457
                     17	    0.02105	    0.01937	    0.01649
                     20	    0.02326	    0.02040	    0.01664
                     25	    0.02697	    0.02563	    0.01760
                     30	    0.02856	    0.02918	    0.01896
                     40	    0.02350	    0.02161	    0.01517
                     50	    0.01929	    0.01448	    0.00737
              </tableData>
              <tableData breakPoint="16">
                              -10	         0	        10
                    -20	  -0.02609	  -0.02677	  -0.02472
                    -10	  -0.01296	  -0.01454	  -0.01640
                     -5	  -0.00599	  -0.00849	  -0.00944
                      0	    0.00110	  -0.00073	  -0.00335
                      5	    0.00734	    0.00612	    0.00384
                     10	    0.01390	    0.01201	    0.00954
                     12	    0.01682	    0.01395	    0.01217
                     15	    0.02017	    0.01769	    0.01566
                     17	    0.02249	    0.02066	    0.01762
                     20	    0.02502	    0.02171	    0.01775
                     25	    0.02874	    0.02735	    0.01866
                     30	    0.03022	    0.03086	    0.01983
                     40	    0.02483	    0.02288	    0.01612
                     50	    0.02018	    0.01529	    0.00781
              </tableData>
              <tableData breakPoint="20">
                              -10	         0	        10
                    -20	  -0.03012	  -0.03237	  -0.02931
                    -10	  -0.01452	  -0.01650	  -0.01869
                     -5	  -0.00598	  -0.00887	  -0.01018
                      0	    0.00261	    0.00047	  -0.00266
                      5	    0.01010	    0.00876	    0.00604
                     10	    0.01802	    0.01567	    0.01268
                     12	    0.02126	    0.01799	    0.01599
                     15	    0.02549	    0.02243	    0.01998
                     17	    0.02809	    0.02560	    0.02215
                     20	    0.03174	    0.02713	    0.02213
                     25	    0.03530	    0.03413	    0.02317
                     30	    0.03699	    0.03837	    0.02467
                     40	    0.02977	    0.02739	    0.02040
                     50	    0.02310	    0.01623	    0.01049
              </tableData>
              <tableData breakPoint="25">
                              -10	         0	        10
                    -20	  -0.03376	  -0.03670	  -0.03355
                    -10	  -0.01567	  -0.01810	  -0.02057
                     -5	  -0.00536	  -0.00857	  -0.01044
                      0	    0.00482	    0.00228	  -0.00130
                      5	    0.01362	    0.01225	    0.00900
                     10	    0.02307	    0.02023	    0.01656
                     12	    0.02684	    0.02317	    0.02047
                     15	    0.03182	    0.02819	    0.02503
                     17	    0.03458	    0.03139	    0.02758
                     20	    0.03914	    0.03324	    0.02724
                     25	    0.04273	    0.04166	    0.02829
                     30	    0.04536	    0.04707	    0.02964
                     40	    0.03514	    0.03157	    0.02417
                     50	    0.02513	    0.01917	    0.01150
              </tableData>
          </table>
       </product>
    </function>
    <function name="aero/c/CFXDED2R">
    <description>DRAG DUE TO ELEVON 2R</description>
    <product>
          <table>
            <independentVar lookup="row">aero/alpha-deg</independentVar>
            <independentVar lookup="column">aero/beta-deg</independentVar>
            <independentVar lookup="table">fcs/elevon-2R-pos-deg</independentVar>
              <tableData breakPoint="-16">
                              -10	         0	        10
                    -20	    0.03184	    0.03311	    0.02961
                    -10	    0.02078	    0.02251	    0.02322
                     -5	    0.01520	    0.01764	    0.01848
                      0	    0.00825	    0.01052	    0.01277
                      5	    0.00127	    0.00386	    0.00559
                     10	  -0.00525	  -0.00265	  -0.00127
                     12	  -0.00830	  -0.00537	  -0.00375
                     15	  -0.01239	  -0.00946	  -0.00805
                     17	  -0.01503	  -0.01169	  -0.01008
                     20	  -0.01783	  -0.01447	  -0.01222
                     25	  -0.02147	  -0.01654	  -0.01629
                     30	  -0.02632	  -0.01464	  -0.01799
                     40	  -0.02703	  -0.01855	  -0.01586
                     50	  -0.02105	  -0.01467	  -0.00844
              </tableData>
              <tableData breakPoint="-13">
                              -10	         0	        10
                    -20	    0.02595	    0.02713	    0.02385
                    -10	    0.01647	    0.01802	    0.01869
                     -5	    0.01178	    0.01392	    0.01460
                      0	    0.00610	    0.00795	    0.00991
                      5	    0.00041	    0.00246	    0.00395
                     10	  -0.00502	  -0.00290	  -0.00165
                     12	  -0.00756	  -0.00508	  -0.00385
                     15	  -0.01081	  -0.00858	  -0.00736
                     17	  -0.01306	  -0.01005	  -0.00893
                     20	  -0.01527	  -0.01249	  -0.01059
                     25	  -0.01801	  -0.01395	  -0.01382
                     30	  -0.02208	  -0.01355	  -0.01556
                     40	  -0.02265	  -0.01511	  -0.01318
                     50	  -0.01813	  -0.01171	  -0.00695
              </tableData>
              <tableData breakPoint="-10">
                              -10	         0	        10
                    -20	    0.01989	    0.02093	    0.01845
                    -10	    0.01233	    0.01344	    0.01424
                     -5	    0.00856	    0.01032	    0.01087
                      0	    0.00416	    0.00562	    0.00723
                      5	  -0.00020	    0.00132	    0.00251
                     10	  -0.00446	  -0.00282	  -0.00176
                     12	  -0.00640	  -0.00452	  -0.00363
                     15	  -0.00889	  -0.00714	  -0.00622
                     17	  -0.01061	  -0.00834	  -0.00740
                     20	  -0.01233	  -0.01034	  -0.00865
                     25	  -0.01477	  -0.01071	  -0.01104
                     30	  -0.01771	  -0.01114	  -0.01188
                     40	  -0.01815	  -0.01172	  -0.01046
                     50	  -0.01578	  -0.01043	  -0.00518
              </tableData>
              <tableData breakPoint="-5">
                              -10	         0	        10
                    -20	    0.00962	    0.01049	    0.00846
                    -10	    0.00576	    0.00654	    0.00718
                     -5	    0.00388	    0.00465	    0.00499
                      0	    0.00155	    0.00234	    0.00316
                      5	  -0.00056	    0.00015	    0.00078
                     10	  -0.00271	  -0.00203	  -0.00133
                     12	  -0.00370	  -0.00277	  -0.00232
                     15	  -0.00491	  -0.00402	  -0.00343
                     17	  -0.00561	  -0.00459	  -0.00436
                     20	  -0.00657	  -0.00583	  -0.00467
                     25	  -0.00781	  -0.00563	  -0.00575
                     30	  -0.00928	  -0.00612	  -0.00601
                     40	  -0.00940	  -0.00573	  -0.00568
                     50	  -0.00766	  -0.00567	  -0.00247
              </tableData>
              <tableData breakPoint="0">
                              -10	         0	        10
                    -20	  -0.00035	  -0.00013	  -0.00052
                    -10	  -0.00011	    0.00012	  -0.00009
                     -5	  -0.00004	  -0.00001	  -0.00004
                      0	    0.00002	    0.00002	  -0.00004
                      5	  -0.00001	    0.00000	  -0.00001
                     10	    0.00003	    0.00002	    0.00000
                     12	    0.00002	  -0.00002	  -0.00013
                     15	    0.00011	    0.00000	    0.00013
                     17	    0.00029	    0.00001	    0.00031
                     20	  -0.00002	    0.00004	    0.00003
                     25	  -0.00004	    0.00094	    0.00030
                     30	  -0.00004	  -0.00011	  -0.00027
                     40	    0.00003	    0.00068	  -0.00030
                     50	    0.00049	  -0.00021	    0.00016
              </tableData>
              <tableData breakPoint="5">
                              -10	         0	        10
                    -20	  -0.00983	  -0.00931	  -0.00883
                    -10	  -0.00510	  -0.00591	  -0.00644
                     -5	  -0.00307	  -0.00388	  -0.00422
                      0	  -0.00060	  -0.00133	  -0.00225
                      5	    0.00142	    0.00091	    0.00016
                     10	    0.00362	    0.00282	    0.00223
                     12	    0.00464	    0.00352	    0.00291
                     15	    0.00583	    0.00484	    0.00438
                     17	    0.00677	    0.00578	    0.00517
                     20	    0.00727	    0.00669	    0.00528
                     25	    0.00858	    0.00880	    0.00611
                     30	    0.01049	    0.00947	    0.00573
                     40	    0.00788	    0.00780	    0.00540
                     50	    0.00828	    0.00538	    0.00301
              </tableData>
              <tableData breakPoint="10">
                              -10	         0	        10
                    -20	  -0.01769	  -0.01805	  -0.01650
                    -10	  -0.00927	  -0.01058	  -0.01161
                     -5	  -0.00500	  -0.00670	  -0.00722
                      0	  -0.00041	  -0.00161	  -0.00338
                      5	    0.00373	    0.00280	    0.00130
                     10	    0.00798	    0.00668	    0.00522
                     12	    0.00992	    0.00805	    0.00664
                     15	    0.01204	    0.01055	    0.00930
                     17	    0.01372	    0.01236	    0.01073
                     20	    0.01465	    0.01325	    0.01090
                     25	    0.01795	    0.01716	    0.01179
                     30	    0.01986	    0.01936	    0.01249
                     40	    0.01594	    0.01526	    0.01077
                     50	    0.01458	    0.01009	    0.00550
              </tableData>
              <tableData breakPoint="15">
                              -10	         0	        10
                    -20	  -0.02495	  -0.02467	  -0.02344
                    -10	  -0.01239	  -0.01404	  -0.01572
                     -5	  -0.00590	  -0.00830	  -0.00915
                      0	    0.00077	  -0.00096	  -0.00345
                      5	    0.00669	    0.00550	    0.00334
                     10	    0.01290	    0.01109	    0.00877
                     12	    0.01566	    0.01299	    0.01121
                     15	    0.01883	    0.01646	    0.01457
                     17	    0.02105	    0.01937	    0.01649
                     20	    0.02326	    0.02040	    0.01664
                     25	    0.02697	    0.02563	    0.01760
                     30	    0.02856	    0.02918	    0.01896
                     40	    0.02350	    0.02161	    0.01517
                     50	    0.01929	    0.01448	    0.00737
              </tableData>
              <tableData breakPoint="16">
                              -10	         0	        10
                    -20	  -0.02609	  -0.02677	  -0.02472
                    -10	  -0.01296	  -0.01454	  -0.01640
                     -5	  -0.00599	  -0.00849	  -0.00944
                      0	    0.00110	  -0.00073	  -0.00335
                      5	    0.00734	    0.00612	    0.00384
                     10	    0.01390	    0.01201	    0.00954
                     12	    0.01682	    0.01395	    0.01217
                     15	    0.02017	    0.01769	    0.01566
                     17	    0.02249	    0.02066	    0.01762
                     20	    0.02502	    0.02171	    0.01775
                     25	    0.02874	    0.02735	    0.01866
                     30	    0.03022	    0.03086	    0.01983
                     40	    0.02483	    0.02288	    0.01612
                     50	    0.02018	    0.01529	    0.00781
              </tableData>
              <tableData breakPoint="20">
                              -10	         0	        10
                    -20	  -0.03012	  -0.03237	  -0.02931
                    -10	  -0.01452	  -0.01650	  -0.01869
                     -5	  -0.00598	  -0.00887	  -0.01018
                      0	    0.00261	    0.00047	  -0.00266
                      5	    0.01010	    0.00876	    0.00604
                     10	    0.01802	    0.01567	    0.01268
                     12	    0.02126	    0.01799	    0.01599
                     15	    0.02549	    0.02243	    0.01998
                     17	    0.02809	    0.02560	    0.02215
                     20	    0.03174	    0.02713	    0.02213
                     25	    0.03530	    0.03413	    0.02317
                     30	    0.03699	    0.03837	    0.02467
                     40	    0.02977	    0.02739	    0.02040
                     50	    0.02310	    0.01623	    0.01049
              </tableData>
              <tableData breakPoint="25">
                              -10	         0	        10
                    -20	  -0.03376	  -0.03670	  -0.03355
                    -10	  -0.01567	  -0.01810	  -0.02057
                     -5	  -0.00536	  -0.00857	  -0.01044
                      0	    0.00482	    0.00228	  -0.00130
                      5	    0.01362	    0.01225	    0.00900
                     10	    0.02307	    0.02023	    0.01656
                     12	    0.02684	    0.02317	    0.02047
                     15	    0.03182	    0.02819	    0.02503
                     17	    0.03458	    0.03139	    0.02758
                     20	    0.03914	    0.03324	    0.02724
                     25	    0.04273	    0.04166	    0.02829
                     30	    0.04536	    0.04707	    0.02964
                     40	    0.03514	    0.03157	    0.02417
                     50	    0.02513	    0.01917	    0.01150
              </tableData>
          </table>
       </product>
    </function>
    <function name="aero/c/CFXDSBL">
    <description>DRAG DUE TO LOWER SPEEDBRAKE DEFLECTION</description>
    <product>
          <table>
            <independentVar lookup="row">aero/alpha-deg</independentVar>
            <independentVar lookup="column">fcs/airbrake-upper</independentVar>
            <tableData>
                                  0	          5	         10	         15	         20	         25	         30	         35	         40	         45	         50	         55
                    -20	    0.00012	    0.00019	    0.00042	    0.00069	    0.00104	    0.00139	    0.00172	    0.00191	    0.00200	    0.00206	    0.00207	    0.00205
                    -10	    0.00018	    0.00033	    0.00041	    0.00057	    0.00102	    0.00138	    0.00172	    0.00191	    0.00184	    0.00185	    0.00187	    0.00184
                     -5	    0.00013	    0.00017	    0.00027	    0.00038	    0.00056	    0.00075	    0.00085	    0.00082	    0.00081	    0.00080	    0.00079	    0.00080
                      0	    0.00001	    0.00013	    0.00029	    0.00051	    0.00080	    0.00111	    0.00134	    0.00146	    0.00155	    0.00160	    0.00161	    0.00159
                      5	    0.00026	    0.00023	    0.00029	    0.00043	    0.00065	    0.00092	    0.00115	    0.00132	    0.00144	    0.00152	    0.00154	    0.00150
                     10	    0.00037	    0.00028	    0.00023	    0.00040	    0.00067	    0.00111	    0.00145	    0.00180	    0.00211	    0.00222	    0.00224	    0.00220
                     12	    0.00073	    0.00047	    0.00044	    0.00054	    0.00066	    0.00087	    0.00113	    0.00130	    0.00144	    0.00151	    0.00153	    0.00149
                     15	    0.00008	    0.00020	    0.00033	    0.00057	    0.00087	    0.00119	    0.00137	    0.00157	    0.00172	    0.00179	    0.00181	    0.00178
                     17	    0.00024	    0.00027	    0.00033	    0.00045	    0.00028	    0.00049	    0.00069	    0.00087	    0.00100	    0.00109	    0.00111	    0.00107
                     20	    0.00017	    0.00005	    0.00000	    0.00018	    0.00036	    0.00083	    0.00124	    0.00159	    0.00185	    0.00201	    0.00205	    0.00198
                     25	    0.00089	    0.00122	    0.00129	    0.00107	    0.00148	    0.00159	    0.00241	    0.00249	    0.00277	    0.00290	    0.00293	    0.00287
                     30	    0.00119	    0.00070	    0.00048	    0.00003	    0.00042	    0.00009	    0.00033	    0.00041	    0.00064	    0.00075	    0.00078	    0.00072
                     40	    0.00181	    0.00099	    0.00091	    0.00141	    0.00148	    0.00158	    0.00174	    0.00195	    0.00206	    0.00214	    0.00217	    0.00213
                     50	    0.00178	    0.00119	    0.00084	    0.00056	    0.00035	    0.00028	    0.00034	    0.00044	    0.00045	    0.00049	    0.00060	    0.00048
            </tableData>
          </table>
       </product>
    </function>
    <function name="aero/c/CFXDSBU">
    <description>DRAG DUE TO UPPER SPEEDBRAKE DEFLECTION</description>
    <product>
          <table>
            <independentVar lookup="row">aero/alpha-deg</independentVar>
            <independentVar lookup="column">fcs/airbrake-lower</independentVar>
            <tableData>
                                  0	          5	         11	         17	         22	         28	         34	         39	         45	         50	         56	         62	         67
                    -20	    0.00000	    0.00000	    0.00000	    0.00000	    0.00000	    0.00000	    0.00000	    0.00000	    0.00000	    0.00000	    0.00000	    0.00000	    0.00000
                    -10	    0.00000	    0.00000	    0.00000	    0.00000	    0.00000	    0.00000	    0.00000	    0.00000	    0.00000	    0.00000	    0.00049	    0.00000	    0.00000
                     -5	    0.00009	    0.00008	    0.00011	    0.00019	    0.00030	    0.00039	    0.00045	    0.00048	    0.00050	    0.00050	    0.00049	    0.00046	    0.00042
                      0	    0.00018	    0.00024	    0.00039	    0.00060	    0.00080	    0.00096	    0.00107	    0.00114	    0.00119	    0.00120	    0.00117	    0.00110	    0.00100
                      5	    0.00020	    0.00028	    0.00045	    0.00069	    0.00089	    0.00102	    0.00112	    0.00118	    0.00122	    0.00123	    0.00118	    0.00114	    0.00106
                     10	    0.00034	    0.00049	    0.00075	    0.00108	    0.00133	    0.00150	    0.00162	    0.00169	    0.00174	    0.00176	    0.00173	    0.00165	    0.00155
                     12	    0.00044	    0.00063	    0.00094	    0.00138	    0.00162	    0.00179	    0.00191	    0.00198	    0.00202	    0.00203	    0.00201	    0.00202	    0.00184
                     15	    0.00029	    0.00023	    0.00006	    0.00028	    0.00035	    0.00037	    0.00049	    0.00061	    0.00068	    0.00070	    0.00066	    0.00055	    0.00040
                     17	    0.00000	    0.00000	    0.00000	    0.00000	    0.00000	    0.00000	    0.00000	    0.00000	    0.00000	    0.00000	    0.00000	    0.00000	    0.00000
                     20	    0.00000	    0.00000	    0.00000	    0.00000	    0.00000	    0.00000	    0.00000	    0.00000	    0.00000	    0.00000	    0.00000	    0.00000	    0.00000
                     25	    0.00027	    0.00048	    0.00103	    0.00134	    0.00147	    0.00157	    0.00160	    0.00160	    0.00160	    0.00162	    0.00160	    0.00161	    0.00159
                     30	    0.00068	    0.00095	    0.00116	    0.00138	    0.00161	    0.00170	    0.00175	    0.00176	    0.00177	    0.00178	    0.00183	    0.00176	    0.00170
                     40	    0.00205	    0.00207	    0.00217	    0.00274	    0.00529	    0.00304	    0.00313	    0.00316	    0.00319	    0.00319	    0.00317	    0.00315	    0.00308
                     50	    0.00171	    0.00172	    0.00214	    0.00236	    0.00245	    0.00251	    0.00254	    0.00251	    0.00253	    0.00253	    0.00252	    0.00254	    0.00252
            </tableData>
          </table>
       </product>
    </function>
    <function name="aero/c/CFXDSD1L">
    <description>DRAG DUE TO LE SLAT 1L</description>
    <product>
          <table>
            <independentVar lookup="row">aero/alpha-deg</independentVar>
            <independentVar lookup="column">fcs/slat-1L-pos-deg</independentVar>
            <tableData>
                                -17	        -14	        -10	         -7	         -3	          0	          3	          7	         10	         14	         17
                    -20	    0.00035	    0.00031	    0.00021	    0.00012	    0.00000	    0.00000	    0.00000	    0.00000	    0.00000	    0.00000	    0.00000
                    -10	    0.00048	    0.00041	    0.00037	    0.00031	    0.00020	    0.00012	    0.00004	    0.00000	    0.00000	    0.00000	    0.00000
                     -5	    0.00022	    0.00018	    0.00013	    0.00009	    0.00003	    0.00000	    0.00000	    0.00000	    0.00000	    0.00000	    0.00000
                      0	    0.00009	    0.00008	    0.00006	    0.00003	    0.00003	    0.00002	    0.00000	    0.00000	    0.00000	    0.00000	    0.00000
                      5	    0.00002	    0.00002	    0.00001	    0.00001	    0.00000	    0.00000	    0.00000	    0.00000	    0.00000	    0.00000	    0.00000
                     10	    0.00000	    0.00000	    0.00000	    0.00000	    0.00001	    0.00002	    0.00002	    0.00003	    0.00004	    0.00006	    0.00006
                     12	    0.00000	    0.00000	    0.00000	    0.00000	    0.00000	    0.00000	    0.00000	    0.00003	    0.00005	    0.00007	    0.00009
                     15	    0.00000	    0.00000	    0.00000	    0.00000	    0.00000	    0.00000	    0.00004	    0.00009	    0.00013	    0.00018	    0.00022
                     17	    0.00000	    0.00000	    0.00000	    0.00000	    0.00000	    0.00000	    0.00006	    0.00013	    0.00019	    0.00027	    0.00032
                     20	    0.00000	    0.00000	    0.00000	    0.00000	    0.00000	    0.00004	    0.00011	    0.00024	    0.00032	    0.00043	    0.00051
                     25	    0.00045	    0.00046	    0.00064	    0.00077	    0.00086	    0.00094	    0.00106	    0.00118	    0.00125	    0.00136	    0.00150
                     30	    0.00000	    0.00000	    0.00000	    0.00000	    0.00000	    0.00000	    0.00000	    0.00000	    0.00000	    0.00000	    0.00000
                     40	    0.00121	    0.00113	    0.00099	    0.00090	    0.00077	    0.00068	    0.00060	    0.00050	    0.00043	    0.00035	    0.00029
                     50	    0.00039	    0.00028	    0.00013	    0.00002	    0.00000	    0.00000	    0.00000	    0.00000	    0.00000	    0.00000	    0.00000
            </tableData>
          </table>
       </product>
    </function>
    <function name="aero/c/CFXDSD1R">
    <description>DRAG DUE TO LE SLAT 1R</description>
    <product>
          <table>
            <independentVar lookup="row">aero/alpha-deg</independentVar>
            <independentVar lookup="column">fcs/slat-1R-pos-deg</independentVar>
            <tableData>
                                -17	        -14	        -10	         -7	         -3	          0	          3	          7	         10	         14	         17
                    -20	    0.00035	    0.00031	    0.00021	    0.00012	    0.00000	    0.00000	    0.00000	    0.00000	    0.00000	    0.00000	    0.00000
                    -10	    0.00048	    0.00041	    0.00037	    0.00031	    0.00020	    0.00012	    0.00004	    0.00000	    0.00000	    0.00000	    0.00000
                     -5	    0.00022	    0.00018	    0.00013	    0.00009	    0.00003	    0.00000	    0.00000	    0.00000	    0.00000	    0.00000	    0.00000
                      0	    0.00009	    0.00008	    0.00006	    0.00003	    0.00003	    0.00002	    0.00000	    0.00000	    0.00000	    0.00000	    0.00000
                      5	    0.00002	    0.00002	    0.00001	    0.00001	    0.00000	    0.00000	    0.00000	    0.00000	    0.00000	    0.00000	    0.00000
                     10	    0.00000	    0.00000	    0.00000	    0.00000	    0.00001	    0.00002	    0.00002	    0.00003	    0.00004	    0.00006	    0.00006
                     12	    0.00000	    0.00000	    0.00000	    0.00000	    0.00000	    0.00000	    0.00000	    0.00003	    0.00005	    0.00007	    0.00009
                     15	    0.00000	    0.00000	    0.00000	    0.00000	    0.00000	    0.00000	    0.00004	    0.00009	    0.00013	    0.00018	    0.00022
                     17	    0.00000	    0.00000	    0.00000	    0.00000	    0.00000	    0.00000	    0.00006	    0.00013	    0.00019	    0.00027	    0.00032
                     20	    0.00000	    0.00000	    0.00000	    0.00000	    0.00000	    0.00004	    0.00011	    0.00024	    0.00032	    0.00043	    0.00051
                     25	    0.00045	    0.00046	    0.00064	    0.00077	    0.00086	    0.00094	    0.00106	    0.00118	    0.00125	    0.00136	    0.00150
                     30	    0.00000	    0.00000	    0.00000	    0.00000	    0.00000	    0.00000	    0.00000	    0.00000	    0.00000	    0.00000	    0.00000
                     40	    0.00121	    0.00113	    0.00099	    0.00090	    0.00077	    0.00068	    0.00060	    0.00050	    0.00043	    0.00035	    0.00029
                     50	    0.00039	    0.00028	    0.00013	    0.00002	    0.00000	    0.00000	    0.00000	    0.00000	    0.00000	    0.00000	    0.00000
            </tableData>
          </table>
       </product>
    </function>
    <function name="aero/c/CFXDSD2L">
    <description>DRAG DUE TO LE SLAT 2L</description>
    <product>
          <table>
            <independentVar lookup="row">aero/alpha-deg</independentVar>
            <independentVar lookup="column">fcs/slat-2L-pos-deg</independentVar>
            <tableData>
                                -17	        -14	        -10	         -7	         -3	          0	          3	          7	         10	         14	         17
                    -20	    0.00000	    0.00000	    0.00000	    0.00000	    0.00000	    0.00000	    0.00000	    0.00000	    0.00000	    0.00000	    0.00000
                    -10	    0.00047	    0.00044	    0.00037	    0.00030	    0.00020	    0.00012	    0.00005	    0.00000	    0.00000	    0.00000	    0.00000
                     -5	    0.00035	    0.00029	    0.00021	    0.00014	    0.00006	    0.00000	    0.00000	    0.00000	    0.00000	    0.00000	    0.00000
                      0	    0.00013	    0.00011	    0.00008	    0.00006	    0.00004	    0.00002	    0.00000	    0.00000	    0.00000	    0.00000	    0.00000
                      5	    0.00000	    0.00000	    0.00000	    0.00000	    0.00000	    0.00000	    0.00000	    0.00000	    0.00000	    0.00000	    0.00000
                     10	    0.00000	    0.00000	    0.00000	    0.00000	    0.00000	    0.00002	    0.00003	    0.00005	    0.00007	    0.00009	    0.00011
                     12	    0.00000	    0.00000	    0.00000	    0.00000	    0.00000	    0.00000	    0.00002	    0.00007	    0.00011	    0.00016	    0.00020
                     15	    0.00000	    0.00000	    0.00000	    0.00000	    0.00000	    0.00000	    0.00008	    0.00019	    0.00028	    0.00038	    0.00045
                     17	    0.00000	    0.00000	    0.00000	    0.00000	    0.00000	    0.00001	    0.00011	    0.00024	    0.00034	    0.00045	    0.00054
                     20	    0.00000	    0.00000	    0.00000	    0.00000	    0.00000	    0.00004	    0.00007	    0.00016	    0.00023	    0.00032	    0.00034
                     25	    0.00095	    0.00096	    0.00093	    0.00093	    0.00094	    0.00094	    0.00094	    0.00095	    0.00114	    0.00095	    0.00104
                     30	    0.00002	    0.00001	    0.00000	    0.00000	    0.00000	    0.00000	    0.00000	    0.00000	    0.00000	    0.00000	    0.00000
                     40	    0.00079	    0.00077	    0.00074	    0.00073	    0.00070	    0.00068	    0.00067	    0.00064	    0.00063	    0.00061	    0.00059
                     50	    0.00000	    0.00000	    0.00000	    0.00000	    0.00000	    0.00000	    0.00000	    0.00000	    0.00000	    0.00000	    0.00000
            </tableData>
          </table>
       </product>
    </function>
    <function name="aero/c/CFXDSD2R">
    <description>DRAG DUE TO LE SLAT 2R</description>
    <product>
          <table>
            <independentVar lookup="row">aero/alpha-deg</independentVar>
            <independentVar lookup="column">fcs/slat-2R-pos-deg</independentVar>
            <tableData>
                                -17	        -14	        -10	         -7	         -3	          0	          3	          7	         10	         14	         17
                    -20	    0.00000	    0.00000	    0.00000	    0.00000	    0.00000	    0.00000	    0.00000	    0.00000	    0.00000	    0.00000	    0.00000
                    -10	    0.00047	    0.00044	    0.00037	    0.00030	    0.00020	    0.00012	    0.00005	    0.00000	    0.00000	    0.00000	    0.00000
                     -5	    0.00035	    0.00029	    0.00021	    0.00014	    0.00006	    0.00000	    0.00000	    0.00000	    0.00000	    0.00000	    0.00000
                      0	    0.00013	    0.00011	    0.00008	    0.00006	    0.00004	    0.00002	    0.00000	    0.00000	    0.00000	    0.00000	    0.00000
                      5	    0.00000	    0.00000	    0.00000	    0.00000	    0.00000	    0.00000	    0.00000	    0.00000	    0.00000	    0.00000	    0.00000
                     10	    0.00000	    0.00000	    0.00000	    0.00000	    0.00000	    0.00002	    0.00003	    0.00005	    0.00007	    0.00009	    0.00011
                     12	    0.00000	    0.00000	    0.00000	    0.00000	    0.00000	    0.00000	    0.00002	    0.00007	    0.00011	    0.00016	    0.00020
                     15	    0.00000	    0.00000	    0.00000	    0.00000	    0.00000	    0.00000	    0.00008	    0.00019	    0.00028	    0.00038	    0.00045
                     17	    0.00000	    0.00000	    0.00000	    0.00000	    0.00000	    0.00001	    0.00011	    0.00024	    0.00034	    0.00045	    0.00054
                     20	    0.00000	    0.00000	    0.00000	    0.00000	    0.00000	    0.00004	    0.00007	    0.00016	    0.00023	    0.00032	    0.00034
                     25	    0.00095	    0.00096	    0.00093	    0.00093	    0.00094	    0.00094	    0.00094	    0.00095	    0.00114	    0.00095	    0.00104
                     30	    0.00002	    0.00001	    0.00000	    0.00000	    0.00000	    0.00000	    0.00000	    0.00000	    0.00000	    0.00000	    0.00000
                     40	    0.00079	    0.00077	    0.00074	    0.00073	    0.00070	    0.00068	    0.00067	    0.00064	    0.00063	    0.00061	    0.00059
                     50	    0.00000	    0.00000	    0.00000	    0.00000	    0.00000	    0.00000	    0.00000	    0.00000	    0.00000	    0.00000	    0.00000
            </tableData>
          </table>
       </product>
    </function>
    <function name="aero/c/CFXGEAR">
    <description>DRAG INCREMENT DUE TO GEAR</description>
    <product>
          <property>gear/gear-pos-norm</property>
          <table>
            <independentVar lookup="row">aero/alpha-deg</independentVar>
            <tableData>
                    -20		    0.00062
                    -10		    0.00030
                     -5		    0.00023
                      0		    0.00023
                      5		    0.00027
                     10		    0.00035
                     12		    0.00037
                     15		    0.00046
                     17		    0.00030
                     20		    0.00055
                     25		    0.00136
                     30		    0.00157
                     40		    0.00217
            </tableData>
          </table>
       </product>
    </function>
    <function name="aero/c/CFZB">
    <description>BASIC LIFT</description>
    <product>
          <table>
            <independentVar lookup="row">aero/alpha-deg</independentVar>
            <tableData>
                    -20		  -1.20688
                    -10		  -0.80956
                     -5		  -0.50377
                      0		  -0.20859
                      5		    0.01902
                     10		    0.23118
                     12		    0.33151
                     15		    0.49928
                     17		    0.61271
                     20		    0.78872
                     25		    1.00333
                     30		    1.10723
                     40		    1.17018
                     50		    1.14774
            </tableData>
          </table>
       </product>
    </function>
    <function name="aero/c/CFZDE2L">
    <description>LIFT DUE TO LE SLAT 2L</description>
    <product>
          <table>
            <independentVar lookup="row">aero/alpha-deg</independentVar>
            <independentVar lookup="column">fcs/slat-2L-pos-deg</independentVar>
            <tableData>
                                -17	        -14	        -10	         -7	         -3	          0	          3	          7	         10	         14	         17
                    -20	  -0.00022	  -0.00015	  -0.00005	    0.00004	    0.00018	    0.00029	    0.00040	    0.00056	    0.00010	    0.00026	    0.00039
                    -10	  -0.00629	  -0.00565	  -0.00456	  -0.00351	  -0.00203	  -0.00088	    0.00030	  -0.00045	    0.00088	    0.00260	    0.00383
                     -5	  -0.00726	  -0.00599	  -0.00417	  -0.00274	  -0.00171	  -0.00013	    0.00146	    0.00354	    0.00504	    0.00695	    0.00828
                      0	  -0.00502	  -0.00425	  -0.00319	  -0.00237	  -0.00127	  -0.00046	    0.00034	    0.00135	    0.00206	    0.00293	    0.00353
                      5	  -0.00176	  -0.00146	  -0.00106	  -0.00077	  -0.00039	  -0.00013	    0.00012	    0.00042	    0.00064	    0.00095	    0.00118
                     10	  -0.00327	  -0.00286	  -0.00223	  -0.00170	  -0.00091	  -0.00027	    0.00040	    0.00136	    0.00208	    0.00306	    0.00378
                     12	  -0.00574	  -0.00505	  -0.00402	  -0.00317	  -0.00193	  -0.00094	    0.00008	    0.00149	    0.00256	    0.00398	    0.00501
                     15	  -0.00947	  -0.00827	  -0.00649	  -0.00504	  -0.00299	  -0.00137	    0.00029	    0.00254	    0.00422	    0.00539	    0.00686
                     17	  -0.01001	  -0.00869	  -0.00676	  -0.00520	  -0.00310	  -0.00142	    0.00032	    0.00264	    0.00436	    0.00530	    0.00679
                     20	  -0.00853	  -0.00700	  -0.00538	  -0.00449	  -0.00251	  -0.00116	  -0.00178	  -0.00022	    0.00092	    0.00238	    0.00103
                     25	  -0.00195	  -0.00167	  -0.00131	  -0.00103	  -0.00066	  -0.00041	  -0.00016	    0.00017	    0.00068	    0.00065	    0.00081
                     30	  -0.00219	  -0.00196	  -0.00165	  -0.00144	  -0.00121	  -0.00108	  -0.00094	  -0.00076	  -0.00061	  -0.00043	  -0.00036
                     40	    0.00012	    0.00029	    0.00051	    0.00067	    0.00087	    0.00101	    0.00113	    0.00129	    0.00140	    0.00156	    0.00167
                     50	  -0.00144	  -0.00132	  -0.00117	  -0.00107	  -0.00094	  -0.00084	  -0.00076	  -0.00063	  -0.00056	  -0.00045	  -0.00039
            </tableData>
          </table>
       </product>
    </function>
    <function name="aero/c/CFZDE2R">
    <description>LIFT DUE TO LE SLAT 2R</description>
    <product>
          <table>
            <independentVar lookup="row">aero/alpha-deg</independentVar>
            <independentVar lookup="column">fcs/slat-2R-pos-deg</independentVar>
            <tableData>
                                -17	        -14	        -10	         -7	         -3	          0	          3	          7	         10	         14	         17
                    -20	  -0.00022	  -0.00015	  -0.00005	    0.00004	    0.00018	    0.00029	    0.00040	    0.00056	    0.00010	    0.00026	    0.00039
                    -10	  -0.00629	  -0.00565	  -0.00456	  -0.00351	  -0.00203	  -0.00088	    0.00030	  -0.00045	    0.00088	    0.00260	    0.00383
                     -5	  -0.00726	  -0.00599	  -0.00417	  -0.00274	  -0.00171	  -0.00013	    0.00146	    0.00354	    0.00504	    0.00695	    0.00828
                      0	  -0.00502	  -0.00425	  -0.00319	  -0.00237	  -0.00127	  -0.00046	    0.00034	    0.00135	    0.00206	    0.00293	    0.00353
                      5	  -0.00176	  -0.00146	  -0.00106	  -0.00077	  -0.00039	  -0.00013	    0.00012	    0.00042	    0.00064	    0.00095	    0.00118
                     10	  -0.00327	  -0.00286	  -0.00223	  -0.00170	  -0.00091	  -0.00027	    0.00040	    0.00136	    0.00208	    0.00306	    0.00378
                     12	  -0.00574	  -0.00505	  -0.00402	  -0.00317	  -0.00193	  -0.00094	    0.00008	    0.00149	    0.00256	    0.00398	    0.00501
                     15	  -0.00947	  -0.00827	  -0.00649	  -0.00504	  -0.00299	  -0.00137	    0.00029	    0.00254	    0.00422	    0.00539	    0.00686
                     17	  -0.01001	  -0.00869	  -0.00676	  -0.00520	  -0.00310	  -0.00142	    0.00032	    0.00264	    0.00436	    0.00530	    0.00679
                     20	  -0.00853	  -0.00700	  -0.00538	  -0.00449	  -0.00251	  -0.00116	  -0.00178	  -0.00022	    0.00092	    0.00238	    0.00103
                     25	  -0.00195	  -0.00167	  -0.00131	  -0.00103	  -0.00066	  -0.00041	  -0.00016	    0.00017	    0.00068	    0.00065	    0.00081
                     30	  -0.00219	  -0.00196	  -0.00165	  -0.00144	  -0.00121	  -0.00108	  -0.00094	  -0.00076	  -0.00061	  -0.00043	  -0.00036
                     40	    0.00012	    0.00029	    0.00051	    0.00067	    0.00087	    0.00101	    0.00113	    0.00129	    0.00140	    0.00156	    0.00167
                     50	  -0.00144	  -0.00132	  -0.00117	  -0.00107	  -0.00094	  -0.00084	  -0.00076	  -0.00063	  -0.00056	  -0.00045	  -0.00039
            </tableData>
          </table>
       </product>
    </function>
    <function name="aero/c/CFZDED1L">
    <description>LIFT DUE TO ELEVON 1L</description>
    <product>
          <table>
            <independentVar lookup="row">aero/alpha-deg</independentVar>
            <independentVar lookup="column">aero/beta-deg</independentVar>
            <independentVar lookup="table">fcs/elevon-1L-pos-deg</independentVar>
              <tableData breakPoint="-16">
                              -10	         0	        10
                    -20	  -0.01674	  -0.01232	  -0.01614
                      0	  -0.08122	  -0.07784	  -0.06342
                     12	  -0.07533	  -0.07378	  -0.06920
                     20	  -0.06805	  -0.06117	  -0.05686
                     40	  -0.01350	  -0.01194	  -0.01132
                     50	  -0.00722	  -0.00941	  -0.00930
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              </tableData>
              <tableData breakPoint="-13">
                              -10	         0	        10
                    -20	  -0.01343	  -0.00967	  -0.01398
                      0	  -0.06669	  -0.06368	  -0.05395
                     12	  -0.06187	  -0.06067	  -0.05710
                     20	  -0.05419	  -0.04872	  -0.04501
                     40	  -0.01123	  -0.00954	  -0.00951
                     50	  -0.00525	  -0.00743	  -0.00754
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              </tableData>
              <tableData breakPoint="-10">
                              -10	         0	        10
                    -20	  -0.01031	  -0.00733	  -0.01103
                      0	  -0.05166	  -0.04924	  -0.04224
                     12	  -0.04789	  -0.04762	  -0.04451
                     20	  -0.04067	  -0.03652	  -0.03311
                     40	  -0.00862	  -0.00794	  -0.00723
                     50	  -0.00493	  -0.00572	  -0.00577
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              </tableData>
              <tableData breakPoint="-5">
                              -10	         0	        10
                    -20	  -0.00456	  -0.00171	  -0.00561
                      0	  -0.02601	  -0.02478	  -0.02239
                     12	  -0.02435	  -0.02395	  -0.02271
                     20	  -0.01942	  -0.01663	  -0.01525
                     40	  -0.00455	  -0.00316	  -0.00354
                     50	    0.02178	  -0.00313	  -0.00189
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              </tableData>
              <tableData breakPoint="0">
                              -10	         0	        10
                    -20	    0.00000	    0.00000	    0.00000
                      0	  -0.00002	    0.00002	    0.00000
                     12	    0.00000	  -0.00017	  -0.00030
                     20	    0.00000	    0.00019	    0.00000
                     40	    0.00000	    0.00001	    0.00000
                     50	    0.00000	  -0.00007	    0.00000
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              </tableData>
              <tableData breakPoint="5">
                              -10	         0	        10
                    -20	    0.00796	    0.00524	    0.00632
                      0	    0.02587	    0.02409	    0.02222
                     12	    0.02466	    0.02585	    0.02230
                     20	    0.01749	    0.01585	    0.01369
                     40	    0.00382	    0.00508	    0.00321
                     50	    0.00175	    0.00131	  -0.00082
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              </tableData>
              <tableData breakPoint="10">
                              -10	         0	        10
                    -20	    0.01639	    0.01134	    0.01256
                      0	    0.05114	    0.04780	    0.04388
                     12	    0.04893	    0.05074	    0.04486
                     20	    0.03304	    0.02920	    0.02645
                     40	    0.00718	    0.00790	    0.00568
                     50	    0.02665	    0.00353	    0.00065
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              </tableData>
              <tableData breakPoint="15">
                              -10	         0	        10
                    -20	    0.02622	    0.01795	    0.01876
                      0	    0.07503	    0.07026	    0.06445
                     12	    0.07094	    0.07306	    0.06627
                     20	    0.04690	    0.03982	    0.03687
                     40	    0.01022	    0.01070	    0.00851
                     50	    0.00570	    0.00514	    0.00239
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              </tableData>
              <tableData breakPoint="16">
                              -10	         0	        10
                    -20	    0.02830	    0.01948	    0.02011
                      0	    0.07957	    0.07455	    0.06837
                     12	    0.07527	    0.07673	    0.07009
                     20	    0.04930	    0.04177	    0.03883
                     40	    0.01077	    0.01209	    0.00900
                     50	    0.00600	    0.00547	    0.00267
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              </tableData>
              <tableData breakPoint="20">
                              -10	         0	        10
                    -20	    0.03686	    0.02520	    0.02534
                      0	    0.09685	    0.09085	    0.08327
                     12	    0.09001	    0.09100	    0.08377
                     20	    0.05854	    0.05005	    0.04618
                     40	    0.01284	    0.01431	    0.01065
                     50	    0.00618	    0.00664	    0.00369
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              </tableData>
              <tableData breakPoint="25">
                              -10	         0	        10
                    -20	    0.04812	    0.03123	    0.03159
                      0	    0.11606	    0.10896	    0.09996
                     12	    0.10621	    0.11904	    0.09789
                     20	    0.06892	    0.06007	    0.05421
                     40	    0.01442	    0.01691	    0.01244
                     50	    0.00748	    0.00790	    0.00383
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              </tableData>
          </table>
       </product>
    </function>
    <function name="aero/c/CFZDED1R">
    <description>LIFT DUE TO ELEVON 1R</description>
    <product>
          <table>
            <independentVar lookup="row">aero/alpha-deg</independentVar>
            <independentVar lookup="column">aero/beta-deg</independentVar>
            <independentVar lookup="table">fcs/elevon-1R-pos-deg</independentVar>
              <tableData breakPoint="-16">
                              -10	         0	        10
                    -20	  -0.01674	  -0.01232	  -0.01614
                      0	  -0.08122	  -0.07784	  -0.06342
                     12	  -0.07533	  -0.07378	  -0.06920
                     20	  -0.06805	  -0.06117	  -0.05686
                     40	  -0.01350	  -0.01194	  -0.01132
                     50	  -0.00722	  -0.00941	  -0.00930
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              </tableData>
              <tableData breakPoint="-13">
                              -10	         0	        10
                    -20	  -0.01343	  -0.00967	  -0.01398
                      0	  -0.06669	  -0.06368	  -0.05395
                     12	  -0.06187	  -0.06067	  -0.05710
                     20	  -0.05419	  -0.04872	  -0.04501
                     40	  -0.01123	  -0.00954	  -0.00951
                     50	  -0.00525	  -0.00743	  -0.00754
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              </tableData>
              <tableData breakPoint="-10">
                              -10	         0	        10
                    -20	  -0.01031	  -0.00733	  -0.01103
                      0	  -0.05166	  -0.04924	  -0.04224
                     12	  -0.04789	  -0.04762	  -0.04451
                     20	  -0.04067	  -0.03652	  -0.03311
                     40	  -0.00862	  -0.00794	  -0.00723
                     50	  -0.00493	  -0.00572	  -0.00577
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              </tableData>
              <tableData breakPoint="-5">
                              -10	         0	        10
                    -20	  -0.00456	  -0.00171	  -0.00561
                      0	  -0.02601	  -0.02478	  -0.02239
                     12	  -0.02435	  -0.02395	  -0.02271
                     20	  -0.01942	  -0.01663	  -0.01525
                     40	  -0.00455	  -0.00316	  -0.00354
                     50	    0.02178	  -0.00313	  -0.00189
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              </tableData>
              <tableData breakPoint="0">
                              -10	         0	        10
                    -20	    0.00000	    0.00000	    0.00000
                      0	  -0.00002	    0.00002	    0.00000
                     12	    0.00000	  -0.00017	  -0.00030
                     20	    0.00000	    0.00019	    0.00000
                     40	    0.00000	    0.00001	    0.00000
                     50	    0.00000	  -0.00007	    0.00000
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              </tableData>
              <tableData breakPoint="5">
                              -10	         0	        10
                    -20	    0.00796	    0.00524	    0.00632
                      0	    0.02587	    0.02409	    0.02222
                     12	    0.02466	    0.02585	    0.02230
                     20	    0.01749	    0.01585	    0.01369
                     40	    0.00382	    0.00508	    0.00321
                     50	    0.00175	    0.00131	  -0.00082
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              </tableData>
              <tableData breakPoint="10">
                              -10	         0	        10
                    -20	    0.01639	    0.01134	    0.01256
                      0	    0.05114	    0.04780	    0.04388
                     12	    0.04893	    0.05074	    0.04486
                     20	    0.03304	    0.02920	    0.02645
                     40	    0.00718	    0.00790	    0.00568
                     50	    0.02665	    0.00353	    0.00065
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              </tableData>
              <tableData breakPoint="15">
                              -10	         0	        10
                    -20	    0.02622	    0.01795	    0.01876
                      0	    0.07503	    0.07026	    0.06445
                     12	    0.07094	    0.07306	    0.06627
                     20	    0.04690	    0.03982	    0.03687
                     40	    0.01022	    0.01070	    0.00851
                     50	    0.00570	    0.00514	    0.00239
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              </tableData>
              <tableData breakPoint="16">
                              -10	         0	        10
                    -20	    0.02830	    0.01948	    0.02011
                      0	    0.07957	    0.07455	    0.06837
                     12	    0.07527	    0.07673	    0.07009
                     20	    0.04930	    0.04177	    0.03883
                     40	    0.01077	    0.01209	    0.00900
                     50	    0.00600	    0.00547	    0.00267
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              </tableData>
              <tableData breakPoint="20">
                              -10	         0	        10
                    -20	    0.03686	    0.02520	    0.02534
                      0	    0.09685	    0.09085	    0.08327
                     12	    0.09001	    0.09100	    0.08377
                     20	    0.05854	    0.05005	    0.04618
                     40	    0.01284	    0.01431	    0.01065
                     50	    0.00618	    0.00664	    0.00369
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              </tableData>
              <tableData breakPoint="25">
                              -10	         0	        10
                    -20	    0.04812	    0.03123	    0.03159
                      0	    0.11606	    0.10896	    0.09996
                     12	    0.10621	    0.11904	    0.09789
                     20	    0.06892	    0.06007	    0.05421
                     40	    0.01442	    0.01691	    0.01244
                     50	    0.00748	    0.00790	    0.00383
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              </tableData>
          </table>
       </product>
    </function>
    <function name="aero/c/CFZDEL">
    <description>LIFT DUE TO LOWER SPEEDBRAKE DEFLECTION</description>
    <product>
          <table>
            <independentVar lookup="row">aero/alpha-deg</independentVar>
            <independentVar lookup="column">fcs/airbrake-upper</independentVar>
            <tableData>
                                  0	          5	         10	         15	         20	         25	         30	         35	         40	         45	         50	         55
                    -20	    0.00082	  -0.00043	  -0.00146	  -0.00218	  -0.00295	  -0.00368	  -0.00425	  -0.00467	  -0.00455	  -0.00447	  -0.00445	  -0.00449
                      0	  -0.00201	  -0.00113	  -0.00023	    0.00026	  -0.00044	  -0.00131	  -0.00139	  -0.00106	  -0.00085	  -0.00074	  -0.00071	  -0.00077
                     12	    0.00325	    0.00124	    0.00167	    0.00308	    0.00581	    0.00850	    0.01111	    0.01312	    0.01464	    0.01559	    0.01585	    0.01535
                     20	  -0.00100	  -0.00062	    0.00088	    0.00138	    0.00186	    0.00226	    0.00233	    0.00345	    0.00436	    0.00502	    0.00519	    0.00486
                     40	    0.00600	    0.00363	    0.00209	    0.00185	    0.00014	  -0.00149	  -0.00295	  -0.00338	  -0.00335	  -0.00326	  -0.00324	  -0.00328
                     50	    0.00546	    0.00472	    0.00295	    0.00106	  -0.00087	  -0.00271	  -0.00424	  -0.00533	  -0.00580	  -0.00582	  -0.00457	  -0.00581
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            </tableData>
          </table>
       </product>
    </function>
    <function name="aero/c/CFZDSBU">
    <description>LIFT DUE TO UPPER SPEEDBRAKE DEFLECTION</description>
    <product>
          <table>
            <independentVar lookup="row">aero/alpha-deg</independentVar>
            <independentVar lookup="column">fcs/airbrake-lower</independentVar>
            <tableData>
                                  0	          5	         11	         17	         22	         28	         34	         39	         45	         50	         56	         62	         67
                    -20	    0.00076	    0.00088	    0.00179	    0.00280	    0.00461	    0.00544	    0.00829	    0.00816	    0.00806	    0.00804	    0.00809	    0.00823	    0.00559
                      0	  -0.00007	  -0.00028	  -0.00009	    0.00020	    0.00032	  -0.00037	  -0.00104	  -0.00145	  -0.00173	  -0.00179	  -0.00164	  -0.00122	  -0.00065
                     12	  -0.00058	  -0.00094	  -0.00077	  -0.00383	  -0.00049	  -0.00116	  -0.00177	  -0.00213	  -0.00237	  -0.00242	  -0.00233	  -0.00919	  -0.00141
                     20	  -0.00494	  -0.00543	  -0.00526	  -0.00448	  -0.00401	  -0.00497	  -0.00600	  -0.00642	  -0.00691	  -0.00701	  -0.00675	  -0.00615	  -0.00534
                     40	    0.00701	    0.00701	    0.00794	    0.00945	    0.01182	    0.01015	    0.01030	    0.01032	    0.01033	    0.01034	    0.01033	    0.01031	    0.01023
                     50	    0.00595	    0.00670	    0.00951	    0.01027	    0.01057	    0.01081	    0.01095	    0.01096	    0.01099	    0.01099	    0.01097	    0.01097	    0.01088
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            </tableData>
          </table>
       </product>
    </function>
    <function name="aero/c/CFZDSD1L">
    <description>LIFT DUE TO LE SLAT 1L</description>
    <product>
          <table>
            <independentVar lookup="row">aero/alpha-deg</independentVar>
            <independentVar lookup="column">fcs/slat-1L-pos-deg</independentVar>
            <tableData>
                                -17	        -14	        -10	         -7	         -3	          0	          3	          7	         10	         14	         17
                    -20	  -0.00436	  -0.00388	  -0.00301	  -0.00238	  -0.00091	    0.00029	    0.00096	    0.00247	    0.00384	    0.00566	    0.00669
                      0	  -0.00402	  -0.00343	  -0.00262	  -0.00157	  -0.00112	  -0.00046	    0.00017	    0.00102	    0.00154	    0.00223	    0.00270
                     12	  -0.00379	  -0.00340	  -0.00281	  -0.00230	  -0.00155	  -0.00095	  -0.00031	    0.00059	    0.00127	    0.00219	    0.00287
                     20	  -0.01261	  -0.01086	  -0.00831	  -0.00627	  -0.00339	  -0.00116	    0.00112	    0.00416	    0.00641	    0.00932	    0.01139
                     40	    0.00060	    0.00067	    0.00078	    0.00085	    0.00094	    0.00101	    0.00107	    0.00114	    0.00119	    0.00125	    0.00129
                     50	  -0.00069	  -0.00071	  -0.00075	  -0.00078	  -0.00081	  -0.00084	  -0.00087	  -0.00089	  -0.00091	  -0.00093	  -0.00094
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            </tableData>
          </table>
       </product>
    </function>
    <function name="aero/c/CFZDSD1R">
    <description>LIFT DUE TO LE SLAT 1R</description>
    <product>
          <table>
            <independentVar lookup="row">aero/alpha-deg</independentVar>
            <independentVar lookup="column">fcs/slat-1R-pos-deg</independentVar>
            <tableData>
                                -17	        -14	        -10	         -7	         -3	          0	          3	          7	         10	         14	         17
                    -20	  -0.00436	  -0.00388	  -0.00301	  -0.00238	  -0.00091	    0.00029	    0.00096	    0.00247	    0.00384	    0.00566	    0.00669
                      0	  -0.00402	  -0.00343	  -0.00262	  -0.00157	  -0.00112	  -0.00046	    0.00017	    0.00102	    0.00154	    0.00223	    0.00270
                     12	  -0.00379	  -0.00340	  -0.00281	  -0.00230	  -0.00155	  -0.00095	  -0.00031	    0.00059	    0.00127	    0.00219	    0.00287
                     20	  -0.01261	  -0.01086	  -0.00831	  -0.00627	  -0.00339	  -0.00116	    0.00112	    0.00416	    0.00641	    0.00932	    0.01139
                     40	    0.00060	    0.00067	    0.00078	    0.00085	    0.00094	    0.00101	    0.00107	    0.00114	    0.00119	    0.00125	    0.00129
                     50	  -0.00069	  -0.00071	  -0.00075	  -0.00078	  -0.00081	  -0.00084	  -0.00087	  -0.00089	  -0.00091	  -0.00093	  -0.00094
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            </tableData>
          </table>
       </product>
    </function>
    <function name="aero/c/CFZGEAR">
    <description>LIFT INCREMENT DUE TO GEAR</description>
    <product>
          <property>gear/gear-pos-norm</property>
          <table>
            <independentVar lookup="row">aero/alpha-deg</independentVar>
            <tableData>
                    -20		  -0.00227
                    -10		  -0.00237
                      0		    0.00024
                     10		    0.00135
                     15		    0.00164
                     20		    0.00242
                     30		    0.00846
                     40		    0.01177
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            </tableData>
          </table>
       </product>
    </function>
    <function name="aero/c/CMM1">
    <description>BASIC PITCHING MOMENT</description>
    <product>
          <table>
            <independentVar lookup="row">aero/alpha-deg</independentVar>
            <tableData>
                    -30		    0.00000
                    -20		  -0.09446
                      0		  -0.00654
                     12		    0.02550
                     20		    0.02801
                     40		    0.18096
                     50		    0.20372
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            </tableData>
          </table>
       </product>
    </function>
    <function name="aero/c/CMMALPHADOT">
    <description>PITCH MOMENT DERIVATIVE FOR ALPHA DOT</description>
    <product>
          <property>aero/alphadot-rad_sec</property>
          <property>aero/ci2vel</property>
          <table>
            <independentVar lookup="row">aero/alpha-deg</independentVar>
            <tableData>
                    -20		    0.65072
                    -10		    0.31779
                      0		    0.05201
                     10		  -0.02421
                     15		    0.09877
                     20		    0.43960
                     30		    0.55653
                     50		    0.03569
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            </tableData>
          </table>
       </product>
    </function>
    <function name="aero/c/CMMBETADOT">
    <description>PITCH MOMENT DERIVATIVE FOR BETA DOT</description>
    <product>
          <property>aero/betadot-rad_sec</property>
          <property>aero/ci2vel</property>
          <table>
            <independentVar lookup="row">aero/alpha-deg</independentVar>
            <tableData>
                    -20		    0.02632
                    -10		  -0.04961
                      0		  -0.06038
                     10		    0.00685
                     15		    0.01660
                     20		    0.00683
                     30		  -0.05739
                     50		    0.13109
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            </tableData>
          </table>
       </product>
    </function>
    <function name="aero/c/CMMDED1L">
    <description>PITCH MOMENT DUE TO ELEVON 1L</description>
    <product>
          <table>
            <independentVar lookup="row">aero/alpha-deg</independentVar>
            <independentVar lookup="column">aero/beta-deg</independentVar>
            <independentVar lookup="table">fcs/elevon-1L-pos-deg</independentVar>
              <tableData breakPoint="-16">
                              -10	         0	        10
                    -20	    0.01616	    0.01522	    0.01114
                      0	    0.03399	    0.03652	    0.03005
                     12	    0.03535	    0.03309	    0.02991
                     20	    0.03161	    0.02653	    0.02192
                     40	    0.01064	    0.00590	    0.00427
                     50	    0.00578	    0.00510	    0.00273
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              </tableData>
              <tableData breakPoint="-13">
                              -10	         0	        10
                    -20	    0.01366	    0.01305	    0.00936
                      0	    0.02803	    0.03006	    0.02586
                     12	    0.02928	    0.02728	    0.02482
                     20	    0.02523	    0.02119	    0.01727
                     40	    0.00781	    0.00472	    0.00359
                     50	    0.00439	    0.00423	    0.00250
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              </tableData>
              <tableData breakPoint="-10">
                              -10	         0	        10
                    -20	    0.01087	    0.01063	    0.00748
                      0	    0.02178	    0.02315	    0.02043
                     12	    0.02288	    0.02164	    0.01944
                     20	    0.01918	    0.01607	    0.01262
                     40	    0.00601	    0.00370	    0.00279
                     50	    0.00390	    0.00331	    0.00185
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              </tableData>
              <tableData breakPoint="-5">
                              -10	         0	        10
                    -20	    0.00588	    0.00624	    0.00364
                      0	    0.01100	    0.01166	    0.01109
                     12	    0.01173	    0.01089	    0.00999
                     20	    0.00926	    0.00781	    0.00588
                     40	    0.00271	    0.00123	    0.00137
                     50	  -0.02140	    0.00169	  -0.00008
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              </tableData>
              <tableData breakPoint="0">
                              -10	         0	        10
                    -20	    0.00000	    0.00000	  -0.00001
                      0	    0.00001	  -0.00001	    0.00000
                     12	    0.00000	    0.00011	    0.00006
                     20	    0.00000	  -0.00003	    0.00000
                     40	    0.00000	    0.00001	    0.00000
                     50	    0.00000	    0.00004	    0.00000
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              </tableData>
              <tableData breakPoint="5">
                              -10	         0	        10
                    -20	  -0.00594	  -0.00490	  -0.00374
                      0	  -0.01106	  -0.01148	  -0.01080
                     12	  -0.01208	  -0.01268	  -0.01019
                     20	  -0.00862	  -0.00742	  -0.00541
                     40	  -0.00262	  -0.00311	  -0.00118
                     50	  -0.00254	  -0.00119	    0.00136
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              </tableData>
              <tableData breakPoint="10">
                              -10	         0	        10
                    -20	  -0.01238	  -0.00989	  -0.00761
                      0	  -0.02198	  -0.02277	  -0.02136
                     12	  -0.02423	  -0.02492	  -0.02075
                     20	  -0.01651	  -0.01417	  -0.01058
                     40	  -0.00483	  -0.00519	  -0.00206
                     50	    0.00731	  -0.00282	    0.00134
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              </tableData>
              <tableData breakPoint="15">
                              -10	         0	        10
                    -20	  -0.01878	  -0.01543	  -0.01156
                      0	  -0.03239	  -0.03350	  -0.03142
                     12	  -0.03534	  -0.03613	  -0.03095
                     20	  -0.02370	  -0.02044	  -0.01500
                     40	  -0.00708	  -0.00689	  -0.00345
                     50	  -0.00592	  -0.00399	  -0.00038
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              </tableData>
              <tableData breakPoint="16">
                              -10	         0	        10
                    -20	  -0.02010	  -0.01643	  -0.01233
                      0	  -0.03438	  -0.03555	  -0.03334
                     12	  -0.03756	  -0.03793	  -0.03275
                     20	  -0.02468	  -0.02160	  -0.01583
                     40	  -0.00748	  -0.00755	  -0.00367
                     50	  -0.00612	  -0.00421	  -0.00048
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              </tableData>
              <tableData breakPoint="20">
                              -10	         0	        10
                    -20	  -0.02531	  -0.02032	  -0.01528
                      0	  -0.04197	  -0.04336	  -0.04069
                     12	  -0.04511	  -0.04488	  -0.03911
                     20	  -0.03037	  -0.02617	  -0.01897
                     40	  -0.00883	  -0.00890	  -0.00444
                     50	  -0.00622	  -0.00504	  -0.00084
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              </tableData>
              <tableData breakPoint="25">
                              -10	         0	        10
                    -20	  -0.03182	  -0.02486	  -0.01870
                      0	  -0.05047	  -0.05208	  -0.04893
                     12	  -0.05338	  -0.05508	  -0.04558
                     20	  -0.03646	  -0.03064	  -0.02242
                     40	  -0.01163	  -0.01022	  -0.00535
                     50	  -0.00730	  -0.00650	  -0.00012
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              </tableData>
          </table>
       </product>
    </function>
    <function name="aero/c/CMMDED1R">
    <description>PITCH MOMENT DUE TO ELEVON 1R</description>
    <product>
          <table>
            <independentVar lookup="row">aero/alpha-deg</independentVar>
            <independentVar lookup="column">aero/beta-deg</independentVar>
            <independentVar lookup="table">fcs/elevon-1R-pos-deg</independentVar>
              <tableData breakPoint="-16">
                              -10	         0	        10
                    -20	    0.01616	    0.01522	    0.01114
                      0	    0.03399	    0.03652	    0.03005
                     12	    0.03535	    0.03309	    0.02991
                     20	    0.03161	    0.02653	    0.02192
                     40	    0.01064	    0.00590	    0.00427
                     50	    0.00578	    0.00510	    0.00273
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              </tableData>
              <tableData breakPoint="-13">
                              -10	         0	        10
                    -20	    0.01366	    0.01305	    0.00936
                      0	    0.02803	    0.03006	    0.02586
                     12	    0.02928	    0.02728	    0.02482
                     20	    0.02523	    0.02119	    0.01727
                     40	    0.00781	    0.00472	    0.00359
                     50	    0.00439	    0.00423	    0.00250
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              </tableData>
              <tableData breakPoint="-10">
                              -10	         0	        10
                    -20	    0.01087	    0.01063	    0.00748
                      0	    0.02178	    0.02315	    0.02043
                     12	    0.02288	    0.02164	    0.01944
                     20	    0.01918	    0.01607	    0.01262
                     40	    0.00601	    0.00370	    0.00279
                     50	    0.00390	    0.00331	    0.00185
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              </tableData>
              <tableData breakPoint="-5">
                              -10	         0	        10
                    -20	    0.00588	    0.00624	    0.00364
                      0	    0.01100	    0.01166	    0.01109
                     12	    0.01173	    0.01089	    0.00999
                     20	    0.00926	    0.00781	    0.00588
                     40	    0.00271	    0.00123	    0.00137
                     50	  -0.02140	    0.00169	  -0.00008
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              </tableData>
              <tableData breakPoint="0">
                              -10	         0	        10
                    -20	    0.00000	    0.00000	  -0.00001
                      0	    0.00001	  -0.00001	    0.00000
                     12	    0.00000	    0.00011	    0.00006
                     20	    0.00000	  -0.00003	    0.00000
                     40	    0.00000	    0.00001	    0.00000
                     50	    0.00000	    0.00004	    0.00000
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              </tableData>
              <tableData breakPoint="5">
                              -10	         0	        10
                    -20	  -0.00594	  -0.00490	  -0.00374
                      0	  -0.01106	  -0.01148	  -0.01080
                     12	  -0.01208	  -0.01268	  -0.01019
                     20	  -0.00862	  -0.00742	  -0.00541
                     40	  -0.00262	  -0.00311	  -0.00118
                     50	  -0.00254	  -0.00119	    0.00136
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              </tableData>
              <tableData breakPoint="10">
                              -10	         0	        10
                    -20	  -0.01238	  -0.00989	  -0.00761
                      0	  -0.02198	  -0.02277	  -0.02136
                     12	  -0.02423	  -0.02492	  -0.02075
                     20	  -0.01651	  -0.01417	  -0.01058
                     40	  -0.00483	  -0.00519	  -0.00206
                     50	    0.00731	  -0.00282	    0.00134
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              </tableData>
              <tableData breakPoint="15">
                              -10	         0	        10
                    -20	  -0.01878	  -0.01543	  -0.01156
                      0	  -0.03239	  -0.03350	  -0.03142
                     12	  -0.03534	  -0.03613	  -0.03095
                     20	  -0.02370	  -0.02044	  -0.01500
                     40	  -0.00708	  -0.00689	  -0.00345
                     50	  -0.00592	  -0.00399	  -0.00038
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              </tableData>
              <tableData breakPoint="16">
                              -10	         0	        10
                    -20	  -0.02010	  -0.01643	  -0.01233
                      0	  -0.03438	  -0.03555	  -0.03334
                     12	  -0.03756	  -0.03793	  -0.03275
                     20	  -0.02468	  -0.02160	  -0.01583
                     40	  -0.00748	  -0.00755	  -0.00367
                     50	  -0.00612	  -0.00421	  -0.00048
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              </tableData>
              <tableData breakPoint="20">
                              -10	         0	        10
                    -20	  -0.02531	  -0.02032	  -0.01528
                      0	  -0.04197	  -0.04336	  -0.04069
                     12	  -0.04511	  -0.04488	  -0.03911
                     20	  -0.03037	  -0.02617	  -0.01897
                     40	  -0.00883	  -0.00890	  -0.00444
                     50	  -0.00622	  -0.00504	  -0.00084
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              </tableData>
              <tableData breakPoint="25">
                              -10	         0	        10
                    -20	  -0.03182	  -0.02486	  -0.01870
                      0	  -0.05047	  -0.05208	  -0.04893
                     12	  -0.05338	  -0.05508	  -0.04558
                     20	  -0.03646	  -0.03064	  -0.02242
                     40	  -0.01163	  -0.01022	  -0.00535
                     50	  -0.00730	  -0.00650	  -0.00012
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              </tableData>
          </table>
       </product>
    </function>
    <function name="aero/c/CMMDED2L">
    <description>PITCH MOMENT DUE TO ELEVON 2L</description>
    <product>
          <table>
            <independentVar lookup="row">aero/alpha-deg</independentVar>
            <independentVar lookup="column">aero/beta-deg</independentVar>
            <independentVar lookup="table">fcs/elevon-2L-pos-deg</independentVar>
              <tableData breakPoint="-16">
                              -10	         0	        10
                    -20	    0.03651	    0.03887	    0.03477
                      0	    0.04418	    0.04172	    0.03861
                     12	    0.04038	    0.03966	    0.03022
                     20	    0.04263	    0.04054	    0.03335
                     40	    0.03202	    0.02429	    0.01820
                     50	    0.02413	  -0.02648	    0.01063
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              </tableData>
              <tableData breakPoint="-13">
                              -10	         0	        10
                    -20	    0.02897	    0.03268	    0.02785
                      0	    0.03657	    0.03426	    0.03157
                     12	    0.03341	    0.03277	    0.02560
                     20	    0.03510	    0.03300	    0.02761
                     40	    0.02654	    0.02131	    0.01551
                     50	    0.01999	  -0.01027	    0.00905
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              </tableData>
              <tableData breakPoint="-10">
                              -10	         0	        10
                    -20	    0.02301	    0.02423	    0.02218
                      0	    0.02858	    0.02649	    0.02407
                     12	    0.02610	    0.02559	    0.02047
                     20	    0.02731	    0.02555	    0.02157
                     40	    0.02085	    0.01572	    0.01258
                     50	    0.01612	    0.00850	    0.00653
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              </tableData>
              <tableData breakPoint="-5">
                              -10	         0	        10
                    -20	    0.01128	    0.01339	    0.01090
                      0	    0.01467	    0.01369	    0.01206
                     12	    0.01314	    0.01309	    0.01063
                     20	    0.01418	    0.01282	    0.01095
                     40	    0.01030	    0.00641	    0.00640
                     50	    0.00746	    0.00803	    0.00248
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              </tableData>
              <tableData breakPoint="0">
                              -10	         0	        10
                    -20	  -0.00004	    0.00003	  -0.00052
                      0	    0.00009	    0.00002	    0.00040
                     12	    0.00000	    0.00025	    0.00010
                     20	    0.00064	    0.00021	    0.00059
                     40	    0.00042	  -0.00112	    0.00053
                     50	    0.00004	    0.00006	    0.00005
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              </tableData>
              <tableData breakPoint="5">
                              -10	         0	        10
                    -20	  -0.01197	  -0.01197	  -0.01185
                      0	  -0.01422	  -0.01331	  -0.01122
                     12	  -0.01326	  -0.01282	  -0.01070
                     20	  -0.01312	  -0.01417	  -0.00983
                     40	  -0.00780	  -0.00934	  -0.00522
                     50	  -0.00939	  -0.00439	  -0.00076
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              </tableData>
              <tableData breakPoint="10">
                              -10	         0	        10
                    -20	  -0.02389	  -0.02581	  -0.02393
                      0	  -0.02752	  -0.02630	  -0.02238
                     12	  -0.02640	  -0.02597	  -0.02149
                     20	  -0.02724	  -0.02837	  -0.02016
                     40	  -0.01575	  -0.01737	  -0.01062
                     50	  -0.01677	  -0.00969	    0.00158
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              </tableData>
              <tableData breakPoint="15">
                              -10	         0	        10
                    -20	  -0.03745	  -0.03987	  -0.03647
                      0	  -0.04031	  -0.03860	  -0.03299
                     12	  -0.03902	  -0.03793	  -0.03206
                     20	  -0.04577	  -0.04148	  -0.02987
                     40	  -0.02429	  -0.02328	  -0.01543
                     50	  -0.02246	  -0.04472	    0.00055
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              </tableData>
              <tableData breakPoint="16">
                              -10	         0	        10
                    -20	  -0.04046	  -0.04095	  -0.03899
                      0	  -0.04272	  -0.04091	  -0.03503
                     12	  -0.04143	  -0.04022	  -0.03408
                     20	  -0.04888	  -0.04421	  -0.03164
                     40	  -0.02570	  -0.02428	  -0.01604
                     50	  -0.02367	  -0.04598	    0.00029
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              </tableData>
              <tableData breakPoint="20">
                              -10	         0	        10
                    -20	  -0.04970	  -0.05057	  -0.04859
                      0	  -0.05175	  -0.04991	  -0.04278
                     12	  -0.05033	  -0.04914	  -0.04200
                     20	  -0.05858	  -0.05588	  -0.03842
                     40	  -0.03083	  -0.02830	  -0.01923
                     50	  -0.02752	  -0.04959	  -0.00264
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              </tableData>
              <tableData breakPoint="25">
                              -10	         0	        10
                    -20	  -0.06022	  -0.06312	  -0.05917
                      0	  -0.06152	  -0.05918	  -0.05147
                     12	  -0.06068	  -0.05875	  -0.05085
                     20	  -0.06643	  -0.06640	  -0.04612
                     40	  -0.03606	  -0.02956	  -0.02357
                     50	  -0.03118	  -0.10310	  -0.00380
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              </tableData>
          </table>
       </product>
    </function>
    <function name="aero/c/CMMDED2R">
    <description>PITCH MOMENT DUE TO ELEVON 2R</description>
    <product>
          <table>
            <independentVar lookup="row">aero/alpha-deg</independentVar>
            <independentVar lookup="column">aero/beta-deg</independentVar>
            <independentVar lookup="table">fcs/elevon-2R-pos-deg</independentVar>
              <tableData breakPoint="-16">
                              -10	         0	        10
                    -20	    0.03651	    0.03887	    0.03477
                      0	    0.04418	    0.04172	    0.03861
                     12	    0.04038	    0.03966	    0.03022
                     20	    0.04263	    0.04054	    0.03335
                     40	    0.03202	    0.02429	    0.01820
                     50	    0.02413	  -0.02648	    0.01063
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              </tableData>
              <tableData breakPoint="-13">
                              -10	         0	        10
                    -20	    0.02897	    0.03268	    0.02785
                      0	    0.03657	    0.03426	    0.03157
                     12	    0.03341	    0.03277	    0.02560
                     20	    0.03510	    0.03300	    0.02761
                     40	    0.02654	    0.02131	    0.01551
                     50	    0.01999	  -0.01027	    0.00905
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              </tableData>
              <tableData breakPoint="-10">
                              -10	         0	        10
                    -20	    0.02301	    0.02423	    0.02218
                      0	    0.02858	    0.02649	    0.02407
                     12	    0.02610	    0.02559	    0.02047
                     20	    0.02731	    0.02555	    0.02157
                     40	    0.02085	    0.01572	    0.01258
                     50	    0.01612	    0.00850	    0.00653
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              </tableData>
              <tableData breakPoint="-5">
                              -10	         0	        10
                    -20	    0.01128	    0.01339	    0.01090
                      0	    0.01467	    0.01369	    0.01206
                     12	    0.01314	    0.01309	    0.01063
                     20	    0.01418	    0.01282	    0.01095
                     40	    0.01030	    0.00641	    0.00640
                     50	    0.00746	    0.00803	    0.00248
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              </tableData>
              <tableData breakPoint="0">
                              -10	         0	        10
                    -20	  -0.00004	    0.00003	  -0.00052
                      0	    0.00009	    0.00002	    0.00040
                     12	    0.00000	    0.00025	    0.00010
                     20	    0.00064	    0.00021	    0.00059
                     40	    0.00042	  -0.00112	    0.00053
                     50	    0.00004	    0.00006	    0.00005
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              </tableData>
              <tableData breakPoint="5">
                              -10	         0	        10
                    -20	  -0.01197	  -0.01197	  -0.01185
                      0	  -0.01422	  -0.01331	  -0.01122
                     12	  -0.01326	  -0.01282	  -0.01070
                     20	  -0.01312	  -0.01417	  -0.00983
                     40	  -0.00780	  -0.00934	  -0.00522
                     50	  -0.00939	  -0.00439	  -0.00076
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              </tableData>
              <tableData breakPoint="10">
                              -10	         0	        10
                    -20	  -0.02389	  -0.02581	  -0.02393
                      0	  -0.02752	  -0.02630	  -0.02238
                     12	  -0.02640	  -0.02597	  -0.02149
                     20	  -0.02724	  -0.02837	  -0.02016
                     40	  -0.01575	  -0.01737	  -0.01062
                     50	  -0.01677	  -0.00969	    0.00158
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              </tableData>
              <tableData breakPoint="15">
                              -10	         0	        10
                    -20	  -0.03745	  -0.03987	  -0.03647
                      0	  -0.04031	  -0.03860	  -0.03299
                     12	  -0.03902	  -0.03793	  -0.03206
                     20	  -0.04577	  -0.04148	  -0.02987
                     40	  -0.02429	  -0.02328	  -0.01543
                     50	  -0.02246	  -0.04472	    0.00055
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              </tableData>
              <tableData breakPoint="16">
                              -10	         0	        10
                    -20	  -0.04046	  -0.04095	  -0.03899
                      0	  -0.04272	  -0.04091	  -0.03503
                     12	  -0.04143	  -0.04022	  -0.03408
                     20	  -0.04888	  -0.04421	  -0.03164
                     40	  -0.02570	  -0.02428	  -0.01604
                     50	  -0.02367	  -0.04598	    0.00029
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              </tableData>
              <tableData breakPoint="20">
                              -10	         0	        10
                    -20	  -0.04970	  -0.05057	  -0.04859
                      0	  -0.05175	  -0.04991	  -0.04278
                     12	  -0.05033	  -0.04914	  -0.04200
                     20	  -0.05858	  -0.05588	  -0.03842
                     40	  -0.03083	  -0.02830	  -0.01923
                     50	  -0.02752	  -0.04959	  -0.00264
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              </tableData>
              <tableData breakPoint="25">
                              -10	         0	        10
                    -20	  -0.06022	  -0.06312	  -0.05917
                      0	  -0.06152	  -0.05918	  -0.05147
                     12	  -0.06068	  -0.05875	  -0.05085
                     20	  -0.06643	  -0.06640	  -0.04612
                     40	  -0.03606	  -0.02956	  -0.02357
                     50	  -0.03118	  -0.10310	  -0.00380
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              </tableData>
          </table>
       </product>
    </function>
    <function name="aero/c/CMMDSBL">
    <description>PITCH MOMENT DUE TO LOWER SPEEDBRAKE DEFLECTION</description>
    <product>
          <table>
            <independentVar lookup="row">aero/alpha-deg</independentVar>
            <independentVar lookup="column">fcs/airbrake-upper</independentVar>
            <tableData>
                                  0	          5	         10	         15	         20	         25	         30	         35	         40	         45	         50	         55
                    -20	  -0.00046	  -0.00003	    0.00032	    0.00049	    0.00081	    0.00109	    0.00132	    0.00144	    0.00151	    0.00156	    0.00157	    0.00155
                      0	  -0.00084	  -0.00031	    0.00003	    0.00045	    0.00042	    0.00038	    0.00044	    0.00036	    0.00032	    0.00030	    0.00029	    0.00030
                     12	  -0.00178	  -0.00066	  -0.00068	  -0.00109	  -0.00236	  -0.00345	  -0.00405	  -0.00440	  -0.00464	  -0.00476	  -0.00480	  -0.00473
                     20	  -0.00015	  -0.00004	  -0.00034	  -0.00053	  -0.00088	  -0.00109	  -0.00137	  -0.00157	  -0.00172	  -0.00183	  -0.00185	  -0.00181
                     40	  -0.00092	  -0.00047	  -0.00059	  -0.00137	  -0.00151	  -0.00165	  -0.00183	  -0.00194	  -0.00205	  -0.00212	  -0.00214	  -0.00211
                     50	    0.00036	    0.00018	    0.00014	    0.00011	    0.00001	  -0.00010	  -0.00028	  -0.00043	  -0.00052	  -0.00057	  -0.00123	  -0.00056
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            </tableData>
          </table>
       </product>
    </function>
    <function name="aero/c/CMMDSBU">
    <description>PITCH MOMENT DUE TO UPPER SPEEDBRAKE DEFLECTION</description>
    <product>
          <table>
            <independentVar lookup="row">aero/alpha-deg</independentVar>
            <independentVar lookup="column">fcs/airbrake-lower</independentVar>
            <tableData>
                                  0	          5	         11	         17	         22	         28	         34	         39	         45	         50	         56	         62	         67
                    -20	    0.00075	    0.00067	    0.00028	  -0.00040	  -0.00037	  -0.00084	    0.00021	    0.00014	    0.00008	    0.00007	    0.00010	    0.00018	  -0.00094
                      0	  -0.00020	  -0.00030	  -0.00049	  -0.00069	  -0.00084	  -0.00091	  -0.00094	  -0.00096	  -0.00098	  -0.00098	  -0.00097	  -0.00095	  -0.00092
                     12	    0.00047	    0.00066	    0.00069	  -0.00314	    0.00070	    0.00079	    0.00087	    0.00091	    0.00093	    0.00094	    0.00093	  -0.00355	    0.00082
                     20	    0.00215	    0.00256	    0.00268	    0.00251	    0.00216	    0.00234	    0.00252	    0.00266	    0.00275	    0.00277	    0.00272	    0.00260	    0.00241
                     40	  -0.00122	  -0.00060	  -0.00045	  -0.00085	  -0.00254	  -0.00099	  -0.00104	  -0.00106	  -0.00107	  -0.00107	  -0.00107	  -0.00105	  -0.00100
                     50	    0.00076	    0.00090	    0.00067	    0.00072	    0.00073	    0.00076	    0.00077	    0.00081	    0.00081	    0.00081	    0.00081	    0.00077	    0.00077
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            </tableData>
          </table>
       </product>
    </function>
    <function name="aero/c/CMMDSD1L">
    <description>PITCH MOMENT DUE TO LE SLAT 1L</description>
    <product>
          <table>
            <independentVar lookup="row">aero/alpha-deg</independentVar>
            <independentVar lookup="column">fcs/slat-1L-pos-deg</independentVar>
            <tableData>
                                -17	        -14	        -10	         -7	         -3	          0	          3	          7	         10	         14	         17
                    -20	  -0.00473	  -0.00412	  -0.00317	  -0.00233	  -0.00103	    0.00004	    0.00108	    0.00266	    0.00389	    0.00556	    0.00673
                      0	  -0.00264	  -0.00222	  -0.00162	  -0.00109	  -0.00049	    0.00002	    0.00052	    0.00119	    0.00165	    0.00226	    0.00269
                     12	  -0.00212	  -0.00176	  -0.00123	  -0.00080	  -0.00021	    0.00025	    0.00072	    0.00135	    0.00181	    0.00241	    0.00284
                     20	  -0.00442	  -0.00369	  -0.00265	  -0.00182	  -0.00067	    0.00021	    0.00108	    0.00227	    0.00313	    0.00423	    0.00500
                     40	  -0.00641	  -0.00548	  -0.00420	  -0.00325	  -0.00201	  -0.00113	  -0.00028	    0.00076	    0.00148	    0.00234	    0.00291
                     50	  -0.00499	  -0.00406	  -0.00283	  -0.00193	  -0.00077	    0.00007	    0.00084	    0.00178	    0.00241	    0.00315	    0.00363
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            </tableData>
          </table>
       </product>
    </function>
    <function name="aero/c/CMMDSD1R">
    <description>PITCH MOMENT DUE TO LE SLAT 1R</description>
    <product>
          <table>
            <independentVar lookup="row">aero/alpha-deg</independentVar>
            <independentVar lookup="column">fcs/slat-1R-pos-deg</independentVar>
            <tableData>
                                -17	        -14	        -10	         -7	         -3	          0	          3	          7	         10	         14	         17
                    -20	  -0.00473	  -0.00412	  -0.00317	  -0.00233	  -0.00103	    0.00004	    0.00108	    0.00266	    0.00389	    0.00556	    0.00673
                      0	  -0.00264	  -0.00222	  -0.00162	  -0.00109	  -0.00049	    0.00002	    0.00052	    0.00119	    0.00165	    0.00226	    0.00269
                     12	  -0.00212	  -0.00176	  -0.00123	  -0.00080	  -0.00021	    0.00025	    0.00072	    0.00135	    0.00181	    0.00241	    0.00284
                     20	  -0.00442	  -0.00369	  -0.00265	  -0.00182	  -0.00067	    0.00021	    0.00108	    0.00227	    0.00313	    0.00423	    0.00500
                     40	  -0.00641	  -0.00548	  -0.00420	  -0.00325	  -0.00201	  -0.00113	  -0.00028	    0.00076	    0.00148	    0.00234	    0.00291
                     50	  -0.00499	  -0.00406	  -0.00283	  -0.00193	  -0.00077	    0.00007	    0.00084	    0.00178	    0.00241	    0.00315	    0.00363
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            </tableData>
          </table>
       </product>
    </function>
    <function name="aero/c/CMMDSD2L">
    <description>PITCH MOMENT DUE TO LE SLAT 2L</description>
    <product>
          <table>
            <independentVar lookup="row">aero/alpha-deg</independentVar>
            <independentVar lookup="column">fcs/slat-2L-pos-deg</independentVar>
            <tableData>
                                -17	        -14	        -10	         -7	         -3	          0	          3	          7	         10	         14	         17
                    -20	  -0.00111	  -0.00096	  -0.00072	  -0.00052	  -0.00022	    0.00003	    0.00030	    0.00068	    0.00090	    0.00130	    0.00161
                      0	  -0.00023	  -0.00021	  -0.00017	  -0.00012	  -0.00005	    0.00002	    0.00009	    0.00021	    0.00030	    0.00043	    0.00054
                     12	    0.00023	    0.00026	    0.00029	    0.00030	    0.00028	    0.00025	    0.00021	    0.00013	    0.00006	  -0.00005	  -0.00014
                     20	    0.00019	    0.00009	    0.00016	    0.00023	    0.00019	    0.00021	    0.00060	    0.00066	    0.00069	    0.00073	    0.00096
                     40	  -0.00072	  -0.00079	  -0.00089	  -0.00098	  -0.00106	  -0.00112	  -0.00120	  -0.00126	  -0.00131	  -0.00136	  -0.00140
                     50	    0.00084	    0.00070	    0.00050	    0.00036	    0.00018	    0.00006	  -0.00005	  -0.00019	  -0.00029	  -0.00040	  -0.00047
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            </tableData>
          </table>
       </product>
    </function>
    <function name="aero/c/CMMDSD2R">
    <description>PITCH MOMENT DUE TO LE SLAT 2R</description>
    <product>
          <table>
            <independentVar lookup="row">aero/alpha-deg</independentVar>
            <independentVar lookup="column">fcs/slat-2R-pos-deg</independentVar>
            <tableData>
                                -17	        -14	        -10	         -7	         -3	          0	          3	          7	         10	         14	         17
                    -20	  -0.00111	  -0.00096	  -0.00072	  -0.00052	  -0.00022	    0.00003	    0.00030	    0.00068	    0.00090	    0.00130	    0.00161
                      0	  -0.00023	  -0.00021	  -0.00017	  -0.00012	  -0.00005	    0.00002	    0.00009	    0.00021	    0.00030	    0.00043	    0.00054
                     12	    0.00023	    0.00026	    0.00029	    0.00030	    0.00028	    0.00025	    0.00021	    0.00013	    0.00006	  -0.00005	  -0.00014
                     20	    0.00019	    0.00009	    0.00016	    0.00023	    0.00019	    0.00021	    0.00060	    0.00066	    0.00069	    0.00073	    0.00096
                     40	  -0.00072	  -0.00079	  -0.00089	  -0.00098	  -0.00106	  -0.00112	  -0.00120	  -0.00126	  -0.00131	  -0.00136	  -0.00140
                     50	    0.00084	    0.00070	    0.00050	    0.00036	    0.00018	    0.00006	  -0.00005	  -0.00019	  -0.00029	  -0.00040	  -0.00047
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            </tableData>
          </table>
       </product>
    </function>
    <function name="aero/c/CMMGEAR">
    <description>PITCHING MOMENT INCREMENT DUE TO GEAR</description>
    <product>
          <property>gear/gear-pos-norm</property>
          <table>
            <independentVar lookup="row">aero/alpha-deg</independentVar>
            <tableData>
                    -20		    0.00012
                    -10		  -0.00105
                      0		  -0.00003
                     10		    0.00033
                     15		    0.00108
                     20		    0.00168
                     30		    0.00289
                     40		    0.00424
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            </tableData>
          </table>
       </product>
    </function>
    <function name="aero/c/CMMQ">
    <description>PITCH DAMPING DERIVATIVE</description>
    <product>
          <property>aero/qb</property>
          <table>
            <independentVar lookup="row">aero/alpha-deg</independentVar>
            <tableData>
                    -20		  -0.92613
                    -10		  -1.07178
                      0		  -1.02005
                     10		  -1.00891
                     15		  -1.01686
                     20		  -0.88433
                     30		  -0.65521
                     50		  -0.55848
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            </tableData>
          </table>
       </product>
    </function>
    <function name="aero/c/CML1">
    <description>BASIC ROLLING MOMENT</description>
    <product>
          <table>
            <independentVar lookup="row">aero/alpha-deg</independentVar>
            <independentVar lookup="column">aero/beta-deg</independentVar>
            <tableData>
                                -10	          0	         10
                    -20	    0.00359	    0.00000	  -0.00359
                      0	  -0.01750	    0.00000	    0.01750
                     12	    0.00480	    0.00000	  -0.00473
                     20	    0.00887	    0.00000	  -0.00886
                     40	  -0.02152	    0.00001	    0.02154
                     50	  -0.03638	    0.00002	    0.03626
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            </tableData>
          </table>
       </product>
    </function>
    <function name="aero/c/CMLBETADOT">
    <description>ROLL MOMENT DERIVATIVE FOR BETA DOT</description>
    <product>
          <property>aero/betadot-rad_sec</property>
          <property>aero/bi2vel</property>
          <table>
            <independentVar lookup="row">aero/alpha-deg</independentVar>
            <tableData>
                    -20		  -0.00372
                    -10		    0.19780
                      0		    0.11774
                     10		  -0.00317
                     15		  -0.01458
                     20		  -0.02485
                     30		    0.03118
                     50		    0.26018
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            </tableData>
          </table>
       </product>
    </function>
    <function name="aero/c/CMLDED1L">
    <description>ROLLING MOMENT DUE TO ELEVON 1L DEFLECTION</description>
    <product>
          <table>
            <independentVar lookup="row">aero/alpha-deg</independentVar>
            <independentVar lookup="column">aero/beta-deg</independentVar>
            <independentVar lookup="table">fcs/elevon-1L-pos-deg</independentVar>
              <tableData breakPoint="-16">
                              -10	         0	        10
                    -20	  -0.00233	  -0.00034	  -0.00056
                      0	  -0.01774	  -0.02155	  -0.01850
                     12	  -0.01953	  -0.02005	  -0.01954
                     20	  -0.01439	  -0.01272	  -0.01143
                     40	  -0.00005	  -0.00072	  -0.00039
                     50	  -0.00065	  -0.00043	  -0.00011
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              </tableData>
              <tableData breakPoint="-13">
                              -10	         0	        10
                    -20	  -0.00181	  -0.00009	  -0.00038
                      0	  -0.01444	  -0.01750	  -0.01601
                     12	  -0.01623	  -0.01664	  -0.01614
                     20	  -0.01093	  -0.00962	  -0.00852
                     40	  -0.00054	  -0.00061	  -0.00028
                     50	  -0.00061	  -0.00029	  -0.00001
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              </tableData>
              <tableData breakPoint="-10">
                              -10	         0	        10
                    -20	  -0.00132	    0.00008	  -0.00031
                      0	  -0.01107	  -0.01341	  -0.01257
                     12	  -0.01274	  -0.01302	  -0.01257
                     20	  -0.00811	  -0.00709	  -0.00567
                     40	  -0.00048	  -0.00043	  -0.00019
                     50	  -0.00042	  -0.00018	    0.00006
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              </tableData>
              <tableData breakPoint="-5">
                              -10	         0	        10
                    -20	  -0.00042	    0.00053	  -0.00024
                      0	  -0.00549	  -0.00667	  -0.00682
                     12	  -0.00653	  -0.00667	  -0.00636
                     20	  -0.00365	  -0.00296	  -0.00242
                     40	  -0.00026	  -0.00021	  -0.00010
                     50	  -0.00372	    0.00004	    0.00008
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              </tableData>
              <tableData breakPoint="0">
                              -10	         0	        10
                    -20	    0.00000	    0.00000	    0.00000
                      0	    0.00000	    0.00000	    0.00000
                     12	    0.00000	    0.00000	    0.00008
                     20	    0.00000	  -0.00001	    0.00000
                     40	    0.00000	    0.00000	    0.00000
                     50	    0.00000	    0.00002	    0.00000
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              </tableData>
              <tableData breakPoint="5">
                              -10	         0	        10
                    -20	    0.00151	    0.00070	    0.00021
                      0	    0.00544	    0.00655	    0.00677
                     12	    0.00673	    0.00690	    0.00662
                     20	    0.00299	    0.00224	    0.00191
                     40	    0.00014	    0.00018	    0.00017
                     50	  -0.00083	    0.00010	    0.00045
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              </tableData>
              <tableData breakPoint="10">
                              -10	         0	        10
                    -20	    0.00297	    0.00135	    0.00046
                      0	    0.01078	    0.01289	    0.01335
                     12	    0.01349	    0.01384	    0.01331
                     20	    0.00546	    0.00370	    0.00366
                     40	    0.00024	    0.00008	    0.00034
                     50	  -0.00856	    0.00022	    0.00046
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              </tableData>
              <tableData breakPoint="15">
                              -10	         0	        10
                    -20	    0.00492	    0.00199	    0.00077
                      0	    0.01584	    0.01884	    0.01959
                     12	    0.01950	    0.01956	    0.01975
                     20	    0.00759	    0.00501	    0.00479
                     40	    0.00045	    0.00019	    0.00052
                     50	  -0.00083	    0.00030	    0.00047
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              </tableData>
              <tableData breakPoint="16">
                              -10	         0	        10
                    -20	    0.00534	    0.00219	    0.00083
                      0	    0.01680	    0.01997	    0.02077
                     12	    0.02072	    0.02045	    0.02084
                     20	    0.00792	    0.00528	    0.00501
                     40	    0.00048	    0.00030	    0.00055
                     50	  -0.00083	    0.00032	    0.00049
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              </tableData>
              <tableData breakPoint="20">
                              -10	         0	        10
                    -20	    0.00710	    0.00286	    0.00104
                      0	    0.02048	    0.02427	    0.02529
                     12	    0.02455	    0.02400	    0.02463
                     20	    0.00914	    0.00626	    0.00583
                     40	    0.00068	    0.00043	    0.00062
                     50	  -0.00089	    0.00039	    0.00055
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              </tableData>
              <tableData breakPoint="25">
                              -10	         0	        10
                    -20	    0.00949	    0.00364	    0.00134
                      0	    0.02459	    0.02905	    0.03033
                     12	    0.02841	    0.02441	    0.02834
                     20	    0.01064	    0.00723	    0.00676
                     40	    0.00010	    0.00057	    0.00071
                     50	  -0.00084	  -0.00279	    0.00055
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              </tableData>
          </table>
       </product>
    </function>
    <function name="aero/c/CMLDED1R">
    <description>ROLLING MOMENT DUE TO ELEVON 1R DEFLECTION</description>
    <product>
          <table>
            <independentVar lookup="row">aero/alpha-deg</independentVar>
            <independentVar lookup="column">aero/beta-deg</independentVar>
            <independentVar lookup="table">fcs/elevon-1R-pos-deg</independentVar>
              <tableData breakPoint="-16">
                              -10	         0	        10
                    -20	    0.00233	    0.00034	    0.00056
                      0	    0.01774	    0.02155	    0.01850
                     12	    0.01953	    0.02005	    0.01954
                     20	    0.01439	    0.01272	    0.01143
                     40	    0.00005	    0.00072	    0.00039
                     50	    0.00065	    0.00043	    0.00011
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              </tableData>
              <tableData breakPoint="-13">
                              -10	         0	        10
                    -20	    0.00181	    0.00009	    0.00038
                      0	    0.01444	    0.01750	    0.01601
                     12	    0.01623	    0.01664	    0.01614
                     20	    0.01093	    0.00962	    0.00852
                     40	    0.00054	    0.00061	    0.00028
                     50	    0.00061	    0.00029	    0.00001
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              </tableData>
              <tableData breakPoint="-10">
                              -10	         0	        10
                    -20	    0.00132	  -0.00008	    0.00031
                      0	    0.01107	    0.01341	    0.01257
                     12	    0.01274	    0.01302	    0.01257
                     20	    0.00811	    0.00709	    0.00567
                     40	    0.00048	    0.00043	    0.00019
                     50	    0.00042	    0.00018	  -0.00006
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              </tableData>
              <tableData breakPoint="-5">
                              -10	         0	        10
                    -20	    0.00042	  -0.00053	    0.00024
                      0	    0.00549	    0.00667	    0.00682
                     12	    0.00653	    0.00667	    0.00636
                     20	    0.00365	    0.00296	    0.00242
                     40	    0.00026	    0.00021	    0.00010
                     50	    0.00372	  -0.00004	  -0.00008
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              </tableData>
              <tableData breakPoint="0">
                              -10	         0	        10
                    -20	    0.00000	    0.00000	    0.00000
                      0	    0.00000	    0.00000	    0.00000
                     12	    0.00000	    0.00000	  -0.00008
                     20	    0.00000	    0.00001	    0.00000
                     40	    0.00000	    0.00000	    0.00000
                     50	    0.00000	  -0.00002	    0.00000
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              </tableData>
              <tableData breakPoint="5">
                              -10	         0	        10
                    -20	  -0.00151	  -0.00070	  -0.00021
                      0	  -0.00544	  -0.00655	  -0.00677
                     12	  -0.00673	  -0.00690	  -0.00662
                     20	  -0.00299	  -0.00224	  -0.00191
                     40	  -0.00014	  -0.00018	  -0.00017
                     50	    0.00083	  -0.00010	  -0.00045
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              </tableData>
              <tableData breakPoint="10">
                              -10	         0	        10
                    -20	  -0.00297	  -0.00135	  -0.00046
                      0	  -0.01078	  -0.01289	  -0.01335
                     12	  -0.01349	  -0.01384	  -0.01331
                     20	  -0.00546	  -0.00370	  -0.00366
                     40	  -0.00024	  -0.00008	  -0.00034
                     50	    0.00856	  -0.00022	  -0.00046
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              </tableData>
              <tableData breakPoint="15">
                              -10	         0	        10
                    -20	  -0.00492	  -0.00199	  -0.00077
                      0	  -0.01584	  -0.01884	  -0.01959
                     12	  -0.01950	  -0.01956	  -0.01975
                     20	  -0.00759	  -0.00501	  -0.00479
                     40	  -0.00045	  -0.00019	  -0.00052
                     50	    0.00083	  -0.00030	  -0.00047
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              </tableData>
              <tableData breakPoint="16">
                              -10	         0	        10
                    -20	  -0.00534	  -0.00219	  -0.00083
                      0	  -0.01680	  -0.01997	  -0.02077
                     12	  -0.02072	  -0.02045	  -0.02084
                     20	  -0.00792	  -0.00528	  -0.00501
                     40	  -0.00048	  -0.00030	  -0.00055
                     50	    0.00083	  -0.00032	  -0.00049
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              </tableData>
              <tableData breakPoint="20">
                              -10	         0	        10
                    -20	  -0.00710	  -0.00286	  -0.00104
                      0	  -0.02048	  -0.02427	  -0.02529
                     12	  -0.02455	  -0.02400	  -0.02463
                     20	  -0.00914	  -0.00626	  -0.00583
                     40	  -0.00068	  -0.00043	  -0.00062
                     50	    0.00089	  -0.00039	  -0.00055
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              </tableData>
              <tableData breakPoint="25">
                              -10	         0	        10
                    -20	  -0.00949	  -0.00364	  -0.00134
                      0	  -0.02459	  -0.02905	  -0.03033
                     12	  -0.02841	  -0.02441	  -0.02834
                     20	  -0.01064	  -0.00723	  -0.00676
                     40	  -0.00010	  -0.00057	  -0.00071
                     50	    0.00084	    0.00279	  -0.00055
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              </tableData>
          </table>
       </product>
    </function>
    <function name="aero/c/CMLDED2L">
    <description>ROLLING MOMENT DUE TO ELEVON 2L DEFLECTION</description>
    <product>
          <table>
            <independentVar lookup="row">aero/alpha-deg</independentVar>
            <independentVar lookup="column">aero/beta-deg</independentVar>
            <independentVar lookup="table">fcs/elevon-2L-pos-deg</independentVar>
              <tableData breakPoint="-16">
                              -10	         0	        10
                    -20	    0.00058	    0.00038	  -0.00152
                      0	  -0.00847	  -0.01367	  -0.01368
                     12	  -0.01160	  -0.01346	  -0.01206
                     20	  -0.01048	  -0.01220	  -0.00975
                     40	  -0.00015	  -0.00126	  -0.00016
                     50	  -0.00148	  -0.00413	  -0.00009
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              </tableData>
              <tableData breakPoint="-13">
                              -10	         0	        10
                    -20	  -0.00010	    0.00062	  -0.00096
                      0	  -0.00687	  -0.01122	  -0.01126
                     12	  -0.00963	  -0.01116	  -0.01003
                     20	  -0.00859	  -0.00999	  -0.00797
                     40	  -0.00011	  -0.00116	  -0.00024
                     50	  -0.00110	  -0.00210	  -0.00002
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              </tableData>
              <tableData breakPoint="-10">
                              -10	         0	        10
                    -20	    0.00017	  -0.00002	  -0.00078
                      0	  -0.00527	  -0.00867	  -0.00874
                     12	  -0.00758	  -0.00873	  -0.00785
                     20	  -0.00669	  -0.00770	  -0.00610
                     40	    0.00000	  -0.00075	  -0.00017
                     50	  -0.00063	    0.00091	  -0.00008
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              </tableData>
              <tableData breakPoint="-5">
                              -10	         0	        10
                    -20	  -0.00023	    0.00037	  -0.00046
                      0	  -0.00261	  -0.00443	  -0.00437
                     12	  -0.00395	  -0.00447	  -0.00393
                     20	  -0.00397	  -0.00363	  -0.00284
                     40	  -0.00036	  -0.00047	  -0.00005
                     50	  -0.00039	    0.00280	    0.00014
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              </tableData>
              <tableData breakPoint="0">
                              -10	         0	        10
                    -20	    0.00005	    0.00000	  -0.00010
                      0	    0.00001	    0.00000	    0.00004
                     12	  -0.00006	    0.00000	    0.00014
                     20	  -0.00027	  -0.00006	    0.00027
                     40	  -0.00011	  -0.00001	    0.00028
                     50	  -0.00046	  -0.00001	    0.00030
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              </tableData>
              <tableData breakPoint="5">
                              -10	         0	        10
                    -20	    0.00130	    0.00119	    0.00027
                      0	    0.00253	    0.00434	    0.00424
                     12	    0.00392	    0.00452	    0.00430
                     20	    0.00346	    0.00350	    0.00318
                     40	  -0.00009	    0.00008	    0.00048
                     50	  -0.00101	  -0.00314	    0.00062
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              </tableData>
              <tableData breakPoint="10">
                              -10	         0	        10
                    -20	    0.00393	    0.00238	    0.00068
                      0	    0.00497	    0.00848	    0.00836
                     12	    0.00784	    0.00901	    0.00859
                     20	    0.00680	    0.00673	    0.00589
                     40	    0.00019	    0.00027	    0.00084
                     50	  -0.00073	  -0.00187	    0.00086
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              </tableData>
              <tableData breakPoint="15">
                              -10	         0	        10
                    -20	    0.00736	    0.00381	    0.00112
                      0	    0.00721	    0.01229	    0.01224
                     12	    0.01156	    0.01332	    0.01278
                     20	    0.01090	    0.00957	    0.00836
                     40	  -0.00045	    0.00030	    0.00093
                     50	  -0.00072	  -0.00800	    0.00070
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              </tableData>
              <tableData breakPoint="16">
                              -10	         0	        10
                    -20	    0.00818	    0.00411	    0.00120
                      0	    0.00763	    0.01302	    0.01297
                     12	    0.01228	    0.01414	    0.01359
                     20	    0.01155	    0.01022	    0.00879
                     40	  -0.00043	    0.00040	    0.00096
                     50	  -0.00070	  -0.00783	    0.00076
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              </tableData>
              <tableData breakPoint="20">
                              -10	         0	        10
                    -20	    0.01063	    0.00543	    0.00153
                      0	    0.00921	    0.01574	    0.01577
                     12	    0.01494	    0.01732	    0.01675
                     20	    0.01379	    0.01363	    0.01044
                     40	  -0.00045	    0.00064	    0.00132
                     50	  -0.00083	  -0.00653	    0.00096
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              </tableData>
              <tableData breakPoint="25">
                              -10	         0	        10
                    -20	    0.01313	    0.00771	    0.00230
                      0	    0.01093	    0.01882	    0.01887
                     12	    0.01809	    0.02085	    0.02019
                     20	    0.01542	    0.01616	    0.01224
                     40	  -0.00043	  -0.00061	    0.00142
                     50	  -0.00063	  -0.00533	    0.00093
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              </tableData>
          </table>
       </product>
    </function>
    <function name="aero/c/CMLDED2R">
    <description>ROLLING MOMENT DUE TO ELEVON 2R DEFLECTION</description>
    <product>
          <table>
            <independentVar lookup="row">aero/alpha-deg</independentVar>
            <independentVar lookup="column">aero/beta-deg</independentVar>
            <independentVar lookup="table">fcs/elevon-2R-pos-deg</independentVar>
              <tableData breakPoint="-16">
                              -10	         0	        10
                    -20	  -0.00058	  -0.00038	    0.00152
                      0	    0.00847	    0.01367	    0.01368
                     12	    0.01160	    0.01346	    0.01206
                     20	    0.01048	    0.01220	    0.00975
                     40	    0.00015	    0.00126	    0.00016
                     50	    0.00148	    0.00413	    0.00009
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              </tableData>
              <tableData breakPoint="-13">
                              -10	         0	        10
                    -20	    0.00010	  -0.00062	    0.00096
                      0	    0.00687	    0.01122	    0.01126
                     12	    0.00963	    0.01116	    0.01003
                     20	    0.00859	    0.00999	    0.00797
                     40	    0.00011	    0.00116	    0.00024
                     50	    0.00110	    0.00210	    0.00002
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              </tableData>
              <tableData breakPoint="-10">
                              -10	         0	        10
                    -20	  -0.00017	    0.00002	    0.00078
                      0	    0.00527	    0.00867	    0.00874
                     12	    0.00758	    0.00873	    0.00785
                     20	    0.00669	    0.00770	    0.00610
                     40	    0.00000	    0.00075	    0.00017
                     50	    0.00063	  -0.00091	    0.00008
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              </tableData>
              <tableData breakPoint="-5">
                              -10	         0	        10
                    -20	    0.00023	  -0.00037	    0.00046
                      0	    0.00261	    0.00443	    0.00437
                     12	    0.00395	    0.00447	    0.00393
                     20	    0.00397	    0.00363	    0.00284
                     40	    0.00036	    0.00047	    0.00005
                     50	    0.00039	  -0.00280	  -0.00014
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              </tableData>
              <tableData breakPoint="0">
                              -10	         0	        10
                    -20	  -0.00005	    0.00000	    0.00010
                      0	  -0.00001	    0.00000	  -0.00004
                     12	    0.00006	    0.00000	  -0.00014
                     20	    0.00027	    0.00006	  -0.00027
                     40	    0.00011	    0.00001	  -0.00028
                     50	    0.00046	    0.00001	  -0.00030
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              </tableData>
              <tableData breakPoint="5">
                              -10	         0	        10
                    -20	  -0.00130	  -0.00119	  -0.00027
                      0	  -0.00253	  -0.00434	  -0.00424
                     12	  -0.00392	  -0.00452	  -0.00430
                     20	  -0.00346	  -0.00350	  -0.00318
                     40	    0.00009	  -0.00008	  -0.00048
                     50	    0.00101	    0.00314	  -0.00062
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              </tableData>
              <tableData breakPoint="10">
                              -10	         0	        10
                    -20	  -0.00393	  -0.00238	  -0.00068
                      0	  -0.00497	  -0.00848	  -0.00836
                     12	  -0.00784	  -0.00901	  -0.00859
                     20	  -0.00680	  -0.00673	  -0.00589
                     40	  -0.00019	  -0.00027	  -0.00084
                     50	    0.00073	    0.00187	  -0.00086
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              </tableData>
              <tableData breakPoint="15">
                              -10	         0	        10
                    -20	  -0.00736	  -0.00381	  -0.00112
                      0	  -0.00721	  -0.01229	  -0.01224
                     12	  -0.01156	  -0.01332	  -0.01278
                     20	  -0.01090	  -0.00957	  -0.00836
                     40	    0.00045	  -0.00030	  -0.00093
                     50	    0.00072	    0.00800	  -0.00070
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              </tableData>
              <tableData breakPoint="16">
                              -10	         0	        10
                    -20	  -0.00818	  -0.00411	  -0.00120
                      0	  -0.00763	  -0.01302	  -0.01297
                     12	  -0.01228	  -0.01414	  -0.01359
                     20	  -0.01155	  -0.01022	  -0.00879
                     40	    0.00043	  -0.00040	  -0.00096
                     50	    0.00070	    0.00783	  -0.00076
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              </tableData>
              <tableData breakPoint="20">
                              -10	         0	        10
                    -20	  -0.01063	  -0.00543	  -0.00153
                      0	  -0.00921	  -0.01574	  -0.01577
                     12	  -0.01494	  -0.01732	  -0.01675
                     20	  -0.01379	  -0.01363	  -0.01044
                     40	    0.00045	  -0.00064	  -0.00132
                     50	    0.00083	    0.00653	  -0.00096
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              </tableData>
              <tableData breakPoint="25">
                              -10	         0	        10
                    -20	  -0.01313	  -0.00771	  -0.00230
                      0	  -0.01093	  -0.01882	  -0.01887
                     12	  -0.01809	  -0.02085	  -0.02019
                     20	  -0.01542	  -0.01616	  -0.01224
                     40	    0.00043	    0.00061	  -0.00142
                     50	    0.00063	    0.00533	  -0.00093
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              </tableData>
          </table>
       </product>
    </function>
    <function name="aero/c/CMLDRD">
    <description>ROLLING MOMENT DUE TO RUDDER DEFLECTION</description>
    <product>
          <table>
            <independentVar lookup="row">aero/alpha-deg</independentVar>
            <independentVar lookup="column">aero/beta-deg</independentVar>
            <independentVar lookup="table">fcs/rudder-pos-deg</independentVar>
              <tableData breakPoint="-25">
                              -10	         0	        10
                    -20	    0.01010	    0.01040	    0.01130
                      0	    0.00885	    0.00736	    0.00834
                     12	    0.00658	    0.00446	    0.00535
                     20	    0.00443	    0.00306	    0.00391
                     40	    0.00077	    0.00093	    0.00065
                     50	    0.00005	    0.00167	  -0.00058
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              </tableData>
              <tableData breakPoint="-15">
                              -10	         0	        10
                    -20	    0.00677	    0.00669	    0.00731
                      0	    0.00568	    0.00471	    0.00543
                     12	    0.00449	    0.00286	    0.00349
                     20	    0.00284	    0.00198	    0.00259
                     40	    0.00049	    0.00057	  -0.00009
                     50	  -0.00002	    0.00172	  -0.00056
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              </tableData>
              <tableData breakPoint="-5">
                              -10	         0	        10
                    -20	    0.00252	    0.00225	    0.00253
                      0	    0.00193	    0.00160	    0.00190
                     12	    0.00134	    0.00097	    0.00119
                     20	    0.00096	    0.00068	    0.00093
                     40	    0.00018	    0.00020	    0.00012
                     50	    0.00017	  -0.00008	  -0.00016
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              </tableData>
              <tableData breakPoint="0">
                              -10	         0	        10
                    -20	    0.00000	    0.00000	    0.00000
                      0	    0.00000	    0.00000	    0.00000
                     12	    0.00000	    0.00000	  -0.00007
                     20	    0.00000	    0.00000	    0.00000
                     40	    0.00000	    0.00000	    0.00000
                     50	    0.00000	  -0.00004	    0.00000
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              </tableData>
              <tableData breakPoint="5">
                              -10	         0	        10
                    -20	  -0.00253	  -0.00222	  -0.00252
                      0	  -0.00190	  -0.00160	  -0.00197
                     12	  -0.00126	  -0.00097	  -0.00141
                     20	  -0.00093	  -0.00068	  -0.00097
                     40	  -0.00013	  -0.00021	  -0.00018
                     50	    0.00032	    0.00005	  -0.00002
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              </tableData>
              <tableData breakPoint="15">
                              -10	         0	        10
                    -20	  -0.00731	  -0.00669	  -0.00676
                      0	  -0.00543	  -0.00471	  -0.00568
                     12	  -0.00356	  -0.00286	  -0.00456
                     20	  -0.00260	  -0.00198	  -0.00285
                     40	  -0.00052	  -0.00057	  -0.00050
                     50	    0.00064	  -0.00173	    0.00018
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              </tableData>
              <tableData breakPoint="25">
                              -10	         0	        10
                    -20	  -0.01129	  -0.01039	  -0.01010
                      0	  -0.00833	  -0.00736	  -0.00884
                     12	  -0.00542	  -0.00446	  -0.00665
                     20	  -0.00392	  -0.00306	  -0.00444
                     40	  -0.00067	  -0.00094	  -0.00078
                     50	    0.00071	  -0.00168	    0.00010
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              </tableData>
          </table>
       </product>
    </function>
    <function name="aero/c/CMLDSBL">
    <description>ROLLING MOMENT DUE TO LOWER SPEEDBRAKE DEFLECTION</description>
    <product>
          <table>
            <independentVar lookup="row">aero/alpha-deg</independentVar>
            <independentVar lookup="column">fcs/airbrake-upper</independentVar>
            <tableData>
                                  0	          5	         10	         15	         20	         25	         30	         35	         40	         45	         50	         55
                    -20	    0.00001	    0.00037	    0.00053	    0.00074	    0.00096	    0.00118	    0.00134	    0.00147	    0.00149	    0.00149	    0.00150	    0.00149
                      0	    0.00000	  -0.00018	  -0.00033	  -0.00039	  -0.00025	  -0.00008	    0.00000	  -0.00003	  -0.00005	  -0.00006	  -0.00006	  -0.00006
                     12	    0.00000	    0.00033	    0.00032	    0.00016	  -0.00009	  -0.00038	  -0.00072	  -0.00098	  -0.00117	  -0.00130	  -0.00134	  -0.00127
                     20	  -0.00006	  -0.00004	  -0.00003	    0.00001	    0.00004	    0.00009	    0.00006	  -0.00010	  -0.00022	  -0.00032	  -0.00035	  -0.00030
                     40	  -0.00003	    0.00038	    0.00075	    0.00108	    0.00144	    0.00176	    0.00201	    0.00211	    0.00212	    0.00213	    0.00213	    0.00213
                     50	  -0.00006	    0.00033	    0.00066	    0.00100	    0.00133	    0.00164	    0.00188	    0.00203	    0.00209	    0.00209	    0.00141	    0.00209
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            </tableData>
          </table>
       </product>
    </function>
    <function name="aero/c/CMLDSBU">
    <description>ROLLING MOMENT DUE TO UPPER SPEEDBRAKE DEFLECTION</description>
    <product>
          <table>
            <independentVar lookup="row">aero/alpha-deg</independentVar>
            <independentVar lookup="column">fcs/airbrake-lower</independentVar>
            <tableData>
                                  0	          5	         11	         17	         22	         28	         34	         39	         45	         50	         56	         62	         67
                    -20	    0.00000	  -0.00014	  -0.00055	  -0.00074	  -0.00103	  -0.00123	  -0.00214	  -0.00214	  -0.00213	  -0.00213	  -0.00213	  -0.00214	  -0.00126
                      0	    0.00000	    0.00002	    0.00004	    0.00003	    0.00004	    0.00018	    0.00031	    0.00039	    0.00044	    0.00045	    0.00042	    0.00034	    0.00023
                     12	    0.00000	    0.00001	    0.00000	  -0.00418	  -0.00003	    0.00007	    0.00016	    0.00022	    0.00026	    0.00026	    0.00025	  -0.00568	    0.00011
                     20	    0.00000	    0.00012	    0.00017	    0.00010	    0.00013	    0.00029	    0.00047	    0.00057	    0.00066	    0.00068	    0.00063	    0.00048	    0.00035
                     40	  -0.00001	  -0.00028	  -0.00056	  -0.00084	  -0.00132	  -0.00103	  -0.00109	  -0.00110	  -0.00111	  -0.00111	  -0.00111	  -0.00109	  -0.00106
                     50	    0.00006	  -0.00020	  -0.00040	  -0.00055	  -0.00063	  -0.00068	  -0.00071	  -0.00073	  -0.00074	  -0.00074	  -0.00073	  -0.00072	  -0.00070
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            </tableData>
          </table>
       </product>
    </function>
    <function name="aero/c/CMLDSD1L">
    <description>ROLLING MOMENT DUE TO LE SLAT 1L DEFLECTION</description>
    <product>
          <table>
            <independentVar lookup="row">aero/alpha-deg</independentVar>
            <independentVar lookup="column">fcs/slat-1L-pos-deg</independentVar>
            <tableData>
                                -17	        -14	        -10	         -7	         -3	          0	          3	          7	         10	         14	         17
                    -20	  -0.00122	  -0.00109	  -0.00084	  -0.00066	  -0.00030	    0.00000	    0.00019	    0.00060	    0.00095	    0.00141	    0.00195
                      0	  -0.00067	  -0.00055	  -0.00040	  -0.00028	  -0.00012	    0.00000	    0.00011	    0.00025	    0.00035	    0.00047	    0.00055
                     12	  -0.00063	  -0.00054	  -0.00041	  -0.00030	  -0.00014	    0.00000	    0.00014	    0.00034	    0.00049	    0.00070	    0.00085
                     20	  -0.00303	  -0.00258	  -0.00192	  -0.00138	  -0.00064	  -0.00006	    0.00052	    0.00131	    0.00189	    0.00265	    0.00318
                     40	  -0.00214	  -0.00176	  -0.00124	  -0.00086	  -0.00037	  -0.00001	    0.00033	    0.00075	    0.00104	    0.00138	    0.00161
                     50	  -0.00257	  -0.00210	  -0.00147	  -0.00101	  -0.00042	  -0.00001	    0.00038	    0.00086	    0.00118	    0.00156	    0.00180
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            </tableData>
          </table>
       </product>
    </function>
    <function name="aero/c/CMLDSD1R">
    <description>ROLLING MOMENT DUE TO LE SLAT 1R DEFLECTION</description>
    <product>
          <table>
            <independentVar lookup="row">aero/alpha-deg</independentVar>
            <independentVar lookup="column">fcs/slat-1R-pos-deg</independentVar>
            <tableData>
                                -17	        -14	        -10	         -7	         -3	          0	          3	          7	         10	         14	         17
                    -20	    0.00122	    0.00109	    0.00084	    0.00066	    0.00030	    0.00000	  -0.00019	  -0.00060	  -0.00095	  -0.00141	  -0.00195
                      0	    0.00067	    0.00055	    0.00040	    0.00028	    0.00012	    0.00000	  -0.00011	  -0.00025	  -0.00035	  -0.00047	  -0.00055
                     12	    0.00063	    0.00054	    0.00041	    0.00030	    0.00014	    0.00000	  -0.00014	  -0.00034	  -0.00049	  -0.00070	  -0.00085
                     20	    0.00303	    0.00258	    0.00192	    0.00138	    0.00064	    0.00006	  -0.00052	  -0.00131	  -0.00189	  -0.00265	  -0.00318
                     40	    0.00214	    0.00176	    0.00124	    0.00086	    0.00037	    0.00001	  -0.00033	  -0.00075	  -0.00104	  -0.00138	  -0.00161
                     50	    0.00257	    0.00210	    0.00147	    0.00101	    0.00042	    0.00001	  -0.00038	  -0.00086	  -0.00118	  -0.00156	  -0.00180
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            </tableData>
          </table>
       </product>
    </function>
    <function name="aero/c/CMLDSD2L">
    <description>ROLLING MOMENT DUE TO LE SLAT 2L DEFLECTION</description>
    <product>
          <table>
            <independentVar lookup="row">aero/alpha-deg</independentVar>
            <independentVar lookup="column">fcs/slat-2L-pos-deg</independentVar>
            <tableData>
                                -17	        -14	        -10	         -7	         -3	          0	          3	          7	         10	         14	         17
                    -20	  -0.00039	  -0.00034	  -0.00026	  -0.00019	  -0.00009	    0.00000	    0.00009	    0.00022	    0.00020	    0.00035	    0.00045
                      0	  -0.00147	  -0.00122	  -0.00088	  -0.00061	  -0.00026	    0.00000	    0.00024	    0.00056	    0.00078	    0.00104	    0.00122
                     12	  -0.00170	  -0.00146	  -0.00110	  -0.00080	  -0.00036	    0.00000	    0.00037	    0.00089	    0.00128	    0.00181	    0.00220
                     20	  -0.00293	  -0.00232	  -0.00170	  -0.00136	  -0.00058	  -0.00006	  -0.00029	    0.00031	    0.00075	    0.00130	    0.00088
                     40	  -0.00172	  -0.00142	  -0.00100	  -0.00069	  -0.00029	  -0.00001	    0.00026	    0.00060	    0.00083	    0.00110	    0.00128
                     50	  -0.00196	  -0.00160	  -0.00112	  -0.00077	  -0.00032	  -0.00001	    0.00029	    0.00065	    0.00089	    0.00117	    0.00136
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            </tableData>
          </table>
       </product>
    </function>
    <function name="aero/c/CMLDSD2R">
    <description>ROLLING MOMENT DUE TO LE SLAT 2R DEFLECTION</description>
    <product>
          <table>
            <independentVar lookup="row">aero/alpha-deg</independentVar>
            <independentVar lookup="column">fcs/slat-2R-pos-deg</independentVar>
            <tableData>
                                -17	        -14	        -10	         -7	         -3	          0	          3	          7	         10	         14	         17
                    -20	    0.00039	    0.00034	    0.00026	    0.00019	    0.00009	    0.00000	  -0.00009	  -0.00022	  -0.00020	  -0.00035	  -0.00045
                      0	    0.00147	    0.00122	    0.00088	    0.00061	    0.00026	    0.00000	  -0.00024	  -0.00056	  -0.00078	  -0.00104	  -0.00122
                     12	    0.00170	    0.00146	    0.00110	    0.00080	    0.00036	    0.00000	  -0.00037	  -0.00089	  -0.00128	  -0.00181	  -0.00220
                     20	    0.00293	    0.00232	    0.00170	    0.00136	    0.00058	    0.00006	    0.00029	  -0.00031	  -0.00075	  -0.00130	  -0.00088
                     40	    0.00172	    0.00142	    0.00100	    0.00069	    0.00029	    0.00001	  -0.00026	  -0.00060	  -0.00083	  -0.00110	  -0.00128
                     50	    0.00196	    0.00160	    0.00112	    0.00077	    0.00032	    0.00001	  -0.00029	  -0.00065	  -0.00089	  -0.00117	  -0.00136
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            </tableData>
          </table>
       </product>
    </function>
    <function name="aero/c/CMLGEAR">
    <description>ROLLING MOMENT INCREMENT DUE TO GEAR</description>
    <product>
          <property>gear/gear-pos-norm</property>
          <table>
            <independentVar lookup="row">aero/alpha-deg</independentVar>
            <tableData>
                    -20		    0.00003
                    -10		    0.00000
                      0		    0.00000
                     10		    0.00001
                     15		    0.00031
                     20		    0.00001
                     30		  -0.00006
                     40		  -0.00009
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            </tableData>
          </table>
       </product>
    </function>
    <function name="aero/c/CMLP">
    <description>ROLL DAMPING DERIVATIVE</description>
    <product>
          <property>aero/pb</property>
          <table>
            <independentVar lookup="row">aero/alpha-deg</independentVar>
            <tableData>
                    -20		  -0.03763
                    -10		  -0.26592
                      0		  -0.31527
                     10		  -0.29400
                     15		  -0.38616
                     20		  -0.26524
                     30		  -0.06356
                     50		  -0.02232
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            </tableData>
          </table>
       </product>
    </function>
    <function name="aero/c/CMLR">
    <description>ROLLING MOMENT DUE TO YAW RATE</description>
    <product>
          <property>aero/rb</property>
          <table>
            <independentVar lookup="row">aero/alpha-deg</independentVar>
            <tableData>
                    -20		    0.04706
                    -10		  -0.08854
                      0		  -0.08103
                     10		    0.02079
                     15		    0.04349
                     20		    0.05276
                     30		    0.03139
                     50		  -0.00328
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            </tableData>
          </table>
       </product>
    </function>
    <function name="aero/c/CFYB">
    <description>BASIC SIDE FORCE</description>
    <product>
          <table>
            <independentVar lookup="row">aero/alpha-deg</independentVar>
            <independentVar lookup="column">aero/beta-deg</independentVar>
            <tableData>
                                -10	          0	         10
                    -20	  -0.00247	    0.00002	    0.00244
                      0	    0.07546	    0.00000	  -0.07546
                     12	    0.08297	    0.00002	  -0.08309
                     20	    0.07300	    0.00001	  -0.07300
                     40	  -0.00335	  -0.00004	    0.00329
                     50	  -0.00994	  -0.00003	    0.01047
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            </tableData>
          </table>
       </product>
    </function>
    <function name="aero/c/CFYDED1L">
    <description>SIDE FORCE DUE TO ELEVON 1L DEFLECTION</description>
    <product>
          <table>
            <independentVar lookup="row">aero/alpha-deg</independentVar>
            <independentVar lookup="column">aero/beta-deg</independentVar>
            <independentVar lookup="table">fcs/elevon-1L-pos-deg</independentVar>
              <tableData breakPoint="-16">
                              -10	         0	        10
                    -20	  -0.03047	  -0.02489	  -0.01951
                      0	  -0.02203	  -0.02486	  -0.02247
                     12	  -0.01191	  -0.00801	  -0.01051
                     20	    0.00551	    0.00515	  -0.00422
                     40	    0.01105	    0.01219	    0.00742
                     50	    0.00474	    0.00030	    0.00491
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              </tableData>
              <tableData breakPoint="-13">
                              -10	         0	        10
                    -20	  -0.02569	  -0.02075	  -0.01650
                      0	  -0.01782	  -0.02033	  -0.01876
                     12	  -0.01016	  -0.00659	  -0.00866
                     20	    0.00577	    0.00529	  -0.00265
                     40	    0.01032	    0.00987	    0.00464
                     50	    0.00298	    0.00016	    0.00265
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              </tableData>
              <tableData breakPoint="-10">
                              -10	         0	        10
                    -20	  -0.02030	  -0.01629	  -0.01310
                      0	  -0.01359	  -0.01569	  -0.01451
                     12	  -0.00825	  -0.00513	  -0.00670
                     20	    0.00456	    0.00467	  -0.00126
                     40	    0.00788	    0.00738	    0.00343
                     50	    0.00209	    0.00011	    0.00162
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              </tableData>
              <tableData breakPoint="-5">
                              -10	         0	        10
                    -20	  -0.01085	  -0.00864	  -0.00684
                      0	  -0.00666	  -0.00781	  -0.00717
                     12	  -0.00407	  -0.00257	  -0.00332
                     20	    0.00267	    0.00272	    0.00001
                     40	    0.00348	    0.00420	    0.00157
                     50	  -0.02208	    0.00014	    0.00067
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              </tableData>
              <tableData breakPoint="0">
                              -10	         0	        10
                    -20	    0.00000	    0.00000	    0.00000
                      0	    0.00001	  -0.00001	    0.00000
                     12	    0.00000	    0.00000	    0.00011
                     20	    0.00000	    0.00003	    0.00000
                     40	    0.00000	    0.00003	    0.00000
                     50	    0.00000	    0.00005	    0.00000
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              </tableData>
              <tableData breakPoint="5">
                              -10	         0	        10
                    -20	    0.01174	    0.00857	    0.00738
                      0	    0.00630	    0.00758	    0.00721
                     12	    0.00404	    0.00250	    0.00352
                     20	  -0.00308	  -0.00311	  -0.00034
                     40	  -0.00264	  -0.00289	  -0.00191
                     50	  -0.00020	  -0.00008	    0.00322
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              </tableData>
              <tableData breakPoint="10">
                              -10	         0	        10
                    -20	    0.02384	    0.01796	    0.01501
                      0	    0.01206	    0.01478	    0.01418
                     12	    0.00782	    0.00505	    0.00681
                     20	  -0.00619	  -0.00639	  -0.00053
                     40	  -0.00549	  -0.00478	  -0.00280
                     50	    0.01625	    0.00033	    0.00257
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              </tableData>
              <tableData breakPoint="15">
                              -10	         0	        10
                    -20	    0.03599	    0.02759	    0.02250
                      0	    0.01719	    0.02141	    0.02071
                     12	    0.01109	    0.00627	    0.00991
                     20	  -0.00897	  -0.00913	  -0.00099
                     40	  -0.00731	  -0.00586	  -0.00415
                     50	  -0.00322	    0.00049	    0.00535
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              </tableData>
              <tableData breakPoint="16">
                              -10	         0	        10
                    -20	    0.03843	    0.02959	    0.02400
                      0	    0.01813	    0.02266	    0.02195
                     12	    0.01171	    0.00635	    0.01042
                     20	  -0.01002	  -0.00963	  -0.00102
                     40	  -0.00772	  -0.00793	  -0.00442
                     50	  -0.00322	    0.00051	    0.00524
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              </tableData>
              <tableData breakPoint="20">
                              -10	         0	        10
                    -20	    0.04805	    0.03694	    0.02981
                      0	    0.02157	    0.02733	    0.02664
                     12	    0.01307	    0.00684	    0.01208
                     20	  -0.01212	  -0.01150	  -0.00108
                     40	  -0.00920	  -0.00919	  -0.00546
                     50	  -0.00318	    0.00058	    0.00486
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              </tableData>
              <tableData breakPoint="25">
                              -10	         0	        10
                    -20	    0.05937	    0.04641	    0.03669
                      0	    0.02519	    0.03240	    0.03182
                     12	    0.01359	  -0.00047	    0.01371
                     20	  -0.01489	  -0.01329	  -0.00100
                     40	  -0.01000	  -0.01018	  -0.00665
                     50	  -0.00398	    0.03537	    0.00291
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              </tableData>
          </table>
       </product>
    </function>
    <function name="aero/c/CFYDED1R">
    <description>SIDE FORCE DUE TO ELEVON 1R DEFLECTION</description>
    <product>
          <table>
            <independentVar lookup="row">aero/alpha-deg</independentVar>
            <independentVar lookup="column">aero/beta-deg</independentVar>
            <independentVar lookup="table">fcs/elevon-1R-pos-deg</independentVar>
              <tableData breakPoint="-16">
                              -10	         0	        10
                    -20	    0.03047	    0.02489	    0.01951
                      0	    0.02203	    0.02486	    0.02247
                     12	    0.01191	    0.00801	    0.01051
                     20	  -0.00551	  -0.00515	    0.00422
                     40	  -0.01105	  -0.01219	  -0.00742
                     50	  -0.00474	  -0.00030	  -0.00491
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              </tableData>
              <tableData breakPoint="-13">
                              -10	         0	        10
                    -20	    0.02569	    0.02075	    0.01650
                      0	    0.01782	    0.02033	    0.01876
                     12	    0.01016	    0.00659	    0.00866
                     20	  -0.00577	  -0.00529	    0.00265
                     40	  -0.01032	  -0.00987	  -0.00464
                     50	  -0.00298	  -0.00016	  -0.00265
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              </tableData>
              <tableData breakPoint="-10">
                              -10	         0	        10
                    -20	    0.02030	    0.01629	    0.01310
                      0	    0.01359	    0.01569	    0.01451
                     12	    0.00825	    0.00513	    0.00670
                     20	  -0.00456	  -0.00467	    0.00126
                     40	  -0.00788	  -0.00738	  -0.00343
                     50	  -0.00209	  -0.00011	  -0.00162
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              </tableData>
              <tableData breakPoint="-5">
                              -10	         0	        10
                    -20	    0.01085	    0.00864	    0.00684
                      0	    0.00666	    0.00781	    0.00717
                     12	    0.00407	    0.00257	    0.00332
                     20	  -0.00267	  -0.00272	  -0.00001
                     40	  -0.00348	  -0.00420	  -0.00157
                     50	    0.02208	  -0.00014	  -0.00067
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              </tableData>
              <tableData breakPoint="0">
                              -10	         0	        10
                    -20	    0.00000	    0.00000	    0.00000
                      0	  -0.00001	    0.00001	    0.00000
                     12	    0.00000	    0.00000	  -0.00011
                     20	    0.00000	  -0.00003	    0.00000
                     40	    0.00000	  -0.00003	    0.00000
                     50	    0.00000	  -0.00005	    0.00000
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              </tableData>
              <tableData breakPoint="5">
                              -10	         0	        10
                    -20	  -0.01174	  -0.00857	  -0.00738
                      0	  -0.00630	  -0.00758	  -0.00721
                     12	  -0.00404	  -0.00250	  -0.00352
                     20	    0.00308	    0.00311	    0.00034
                     40	    0.00264	    0.00289	    0.00191
                     50	    0.00020	    0.00008	  -0.00322
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              </tableData>
              <tableData breakPoint="10">
                              -10	         0	        10
                    -20	  -0.02384	  -0.01796	  -0.01501
                      0	  -0.01206	  -0.01478	  -0.01418
                     12	  -0.00782	  -0.00505	  -0.00681
                     20	    0.00619	    0.00639	    0.00053
                     40	    0.00549	    0.00478	    0.00280
                     50	  -0.01625	  -0.00033	  -0.00257
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              </tableData>
              <tableData breakPoint="15">
                              -10	         0	        10
                    -20	  -0.03599	  -0.02759	  -0.02250
                      0	  -0.01719	  -0.02141	  -0.02071
                     12	  -0.01109	  -0.00627	  -0.00991
                     20	    0.00897	    0.00913	    0.00099
                     40	    0.00731	    0.00586	    0.00415
                     50	    0.00322	  -0.00049	  -0.00535
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              </tableData>
              <tableData breakPoint="16">
                              -10	         0	        10
                    -20	  -0.03843	  -0.02959	  -0.02400
                      0	  -0.01813	  -0.02266	  -0.02195
                     12	  -0.01171	  -0.00635	  -0.01042
                     20	    0.01002	    0.00963	    0.00102
                     40	    0.00772	    0.00793	    0.00442
                     50	    0.00322	  -0.00051	  -0.00524
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              </tableData>
              <tableData breakPoint="20">
                              -10	         0	        10
                    -20	  -0.04805	  -0.03694	  -0.02981
                      0	  -0.02157	  -0.02733	  -0.02664
                     12	  -0.01307	  -0.00684	  -0.01208
                     20	    0.01212	    0.01150	    0.00108
                     40	    0.00920	    0.00919	    0.00546
                     50	    0.00318	  -0.00058	  -0.00486
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              </tableData>
              <tableData breakPoint="25">
                              -10	         0	        10
                    -20	  -0.05937	  -0.04641	  -0.03669
                      0	  -0.02519	  -0.03240	  -0.03182
                     12	  -0.01359	    0.00047	  -0.01371
                     20	    0.01489	    0.01329	    0.00100
                     40	    0.01000	    0.01018	    0.00665
                     50	    0.00398	  -0.03537	  -0.00291
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              </tableData>
          </table>
       </product>
    </function>
    <function name="aero/c/CFYDED2L">
    <description>SIDE FORCE DUE TO ELEVON 2L DEFLECTION</description>
    <product>
          <table>
            <independentVar lookup="row">aero/alpha-deg</independentVar>
            <independentVar lookup="column">aero/beta-deg</independentVar>
            <independentVar lookup="table">fcs/elevon-2L-pos-deg</independentVar>
              <tableData breakPoint="-16">
                              -10	         0	        10
                    -20	  -0.02304	  -0.02202	  -0.02008
                      0	  -0.02067	  -0.01539	  -0.01684
                     12	  -0.01744	  -0.00865	  -0.00672
                     20	  -0.01034	  -0.00786	  -0.01569
                     40	    0.00904	    0.02136	    0.00664
                     50	    0.00089	  -0.05261	    0.01335
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              </tableData>
              <tableData breakPoint="-13">
                              -10	         0	        10
                    -20	  -0.01914	  -0.01812	  -0.01626
                      0	  -0.01717	  -0.01295	  -0.01403
                     12	  -0.01493	  -0.00731	  -0.00478
                     20	  -0.00859	  -0.00719	  -0.01284
                     40	    0.00832	    0.01958	    0.00613
                     50	    0.00010	  -0.06208	    0.00637
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              </tableData>
              <tableData breakPoint="-10">
                              -10	         0	        10
                    -20	  -0.01518	  -0.01380	  -0.01396
                      0	  -0.01348	  -0.01031	  -0.01104
                     12	  -0.01211	  -0.00577	  -0.00316
                     20	  -0.00784	  -0.00626	  -0.01001
                     40	    0.00561	    0.01460	    0.00531
                     50	    0.00007	  -0.04469	    0.00562
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              </tableData>
              <tableData breakPoint="-5">
                              -10	         0	        10
                    -20	  -0.00727	  -0.00712	  -0.00664
                      0	  -0.00699	  -0.00529	  -0.00567
                     12	  -0.00704	  -0.00312	  -0.00181
                     20	  -0.00471	  -0.00331	  -0.00459
                     40	    0.00155	    0.00613	    0.00310
                     50	  -0.00121	  -0.04301	    0.00064
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              </tableData>
              <tableData breakPoint="0">
                              -10	         0	        10
                    -20	    0.00062	  -0.00002	  -0.00055
                      0	    0.00001	    0.00000	    0.00005
                     12	    0.00026	    0.00006	  -0.00005
                     20	  -0.00208	  -0.00029	    0.00185
                     40	  -0.00062	  -0.00018	    0.00162
                     50	    0.00169	  -0.00020	  -0.00256
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              </tableData>
              <tableData breakPoint="5">
                              -10	         0	        10
                    -20	    0.00903	    0.00624	    0.00586
                      0	    0.00692	    0.00534	    0.00609
                     12	    0.00760	    0.00320	    0.00216
                     20	    0.00162	    0.00249	    0.00699
                     40	  -0.00297	  -0.00458	  -0.00004
                     50	  -0.00025	    0.03862	    0.00350
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              </tableData>
              <tableData breakPoint="10">
                              -10	         0	        10
                    -20	    0.01932	    0.01552	    0.01260
                      0	    0.01337	    0.01057	    0.01213
                     12	    0.01475	    0.00608	    0.00461
                     20	    0.00556	    0.00560	    0.01149
                     40	  -0.00513	  -0.00571	  -0.00224
                     50	  -0.00114	    0.04163	    0.00115
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              </tableData>
              <tableData breakPoint="15">
                              -10	         0	        10
                    -20	    0.02842	    0.02489	    0.02087
                      0	    0.01980	    0.01563	    0.01790
                     12	    0.02149	    0.00894	    0.00670
                     20	    0.00896	    0.00933	    0.01638
                     40	  -0.00529	  -0.00709	  -0.00139
                     50	  -0.00168	    0.12037	    0.00265
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              </tableData>
              <tableData breakPoint="16">
                              -10	         0	        10
                    -20	    0.03095	    0.02620	    0.02260
                      0	    0.02104	    0.01661	    0.01901
                     12	    0.02279	    0.00946	    0.00714
                     20	    0.00973	    0.00923	    0.01709
                     40	  -0.00552	  -0.00778	  -0.00290
                     50	  -0.00204	    0.11997	    0.00269
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              </tableData>
              <tableData breakPoint="20">
                              -10	         0	        10
                    -20	    0.03807	    0.03096	    0.03019
                      0	    0.02574	    0.02042	    0.02326
                     12	    0.02660	    0.01156	    0.00935
                     20	    0.01262	    0.00951	    0.01949
                     40	  -0.00732	  -0.01066	  -0.00393
                     50	  -0.00152	    0.11173	    0.00533
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              </tableData>
              <tableData breakPoint="25">
                              -10	         0	        10
                    -20	    0.04631	    0.03750	    0.03727
                      0	    0.03090	    0.02470	    0.02803
                     12	    0.03209	    0.01405	    0.01135
                     20	    0.01561	    0.01118	    0.02241
                     40	  -0.00877	    0.01175	  -0.00391
                     50	  -0.00269	    0.11920	    0.00687
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              </tableData>
          </table>
       </product>
    </function>
    <function name="aero/c/CFYDED2R">
    <description>SIDE FORCE DUE TO ELEVON 2R DEFLECTION</description>
    <product>
          <table>
            <independentVar lookup="row">aero/alpha-deg</independentVar>
            <independentVar lookup="column">aero/beta-deg</independentVar>
            <independentVar lookup="table">fcs/elevon-2R-pos-deg</independentVar>
              <tableData breakPoint="-16">
                              -10	         0	        10
                    -20	    0.02304	    0.02202	    0.02008
                      0	    0.02067	    0.01539	    0.01684
                     12	    0.01744	    0.00865	    0.00672
                     20	    0.01034	    0.00786	    0.01569
                     40	  -0.00904	  -0.02136	  -0.00664
                     50	  -0.00089	    0.05261	  -0.01335
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              </tableData>
              <tableData breakPoint="-13">
                              -10	         0	        10
                    -20	    0.01914	    0.01812	    0.01626
                      0	    0.01717	    0.01295	    0.01403
                     12	    0.01493	    0.00731	    0.00478
                     20	    0.00859	    0.00719	    0.01284
                     40	  -0.00832	  -0.01958	  -0.00613
                     50	  -0.00010	    0.06208	  -0.00637
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              </tableData>
              <tableData breakPoint="-10">
                              -10	         0	        10
                    -20	    0.01518	    0.01380	    0.01396
                      0	    0.01348	    0.01031	    0.01104
                     12	    0.01211	    0.00577	    0.00316
                     20	    0.00784	    0.00626	    0.01001
                     40	  -0.00561	  -0.01460	  -0.00531
                     50	  -0.00007	    0.04469	  -0.00562
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              </tableData>
              <tableData breakPoint="-5">
                              -10	         0	        10
                    -20	    0.00727	    0.00712	    0.00664
                      0	    0.00699	    0.00529	    0.00567
                     12	    0.00704	    0.00312	    0.00181
                     20	    0.00471	    0.00331	    0.00459
                     40	  -0.00155	  -0.00613	  -0.00310
                     50	    0.00121	    0.04301	  -0.00064
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              </tableData>
              <tableData breakPoint="0">
                              -10	         0	        10
                    -20	  -0.00062	    0.00002	    0.00055
                      0	  -0.00001	    0.00000	  -0.00005
                     12	  -0.00026	  -0.00006	    0.00005
                     20	    0.00208	    0.00029	  -0.00185
                     40	    0.00062	    0.00018	  -0.00162
                     50	  -0.00169	    0.00020	    0.00256
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              </tableData>
              <tableData breakPoint="5">
                              -10	         0	        10
                    -20	  -0.00903	  -0.00624	  -0.00586
                      0	  -0.00692	  -0.00534	  -0.00609
                     12	  -0.00760	  -0.00320	  -0.00216
                     20	  -0.00162	  -0.00249	  -0.00699
                     40	    0.00297	    0.00458	    0.00004
                     50	    0.00025	  -0.03862	  -0.00350
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              </tableData>
              <tableData breakPoint="10">
                              -10	         0	        10
                    -20	  -0.01932	  -0.01552	  -0.01260
                      0	  -0.01337	  -0.01057	  -0.01213
                     12	  -0.01475	  -0.00608	  -0.00461
                     20	  -0.00556	  -0.00560	  -0.01149
                     40	    0.00513	    0.00571	    0.00224
                     50	    0.00114	  -0.04163	  -0.00115
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              </tableData>
              <tableData breakPoint="15">
                              -10	         0	        10
                    -20	  -0.02842	  -0.02489	  -0.02087
                      0	  -0.01980	  -0.01563	  -0.01790
                     12	  -0.02149	  -0.00894	  -0.00670
                     20	  -0.00896	  -0.00933	  -0.01638
                     40	    0.00529	    0.00709	    0.00139
                     50	    0.00168	  -0.12037	  -0.00265
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              </tableData>
              <tableData breakPoint="16">
                              -10	         0	        10
                    -20	  -0.03095	  -0.02620	  -0.02260
                      0	  -0.02104	  -0.01661	  -0.01901
                     12	  -0.02279	  -0.00946	  -0.00714
                     20	  -0.00973	  -0.00923	  -0.01709
                     40	    0.00552	    0.00778	    0.00290
                     50	    0.00204	  -0.11997	  -0.00269
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              </tableData>
              <tableData breakPoint="20">
                              -10	         0	        10
                    -20	  -0.03807	  -0.03096	  -0.03019
                      0	  -0.02574	  -0.02042	  -0.02326
                     12	  -0.02660	  -0.01156	  -0.00935
                     20	  -0.01262	  -0.00951	  -0.01949
                     40	    0.00732	    0.01066	    0.00393
                     50	    0.00152	  -0.11173	  -0.00533
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              </tableData>
              <tableData breakPoint="25">
                              -10	         0	        10
                    -20	  -0.04631	  -0.03750	  -0.03727
                      0	  -0.03090	  -0.02470	  -0.02803
                     12	  -0.03209	  -0.01405	  -0.01135
                     20	  -0.01561	  -0.01118	  -0.02241
                     40	    0.00877	  -0.01175	    0.00391
                     50	    0.00269	  -0.11920	  -0.00687
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              </tableData>
          </table>
       </product>
    </function>
    <function name="aero/c/CFYDRD">
    <description>SIDE FORCE DUE TO RUDDER DEFLECTION</description>
    <product>
          <table>
            <independentVar lookup="row">aero/alpha-deg</independentVar>
            <independentVar lookup="column">aero/beta-deg</independentVar>
            <independentVar lookup="table">fcs/rudder-pos-deg</independentVar>
              <tableData breakPoint="0">
                              -25	       -15	        -5	         0	         5	        15	        25
                    -20	  -0.04366	  -0.02775	  -0.00934	    0.00000	    0.00944	    0.02782	    0.04370
                      0	  -0.04343	  -0.02786	  -0.00954	    0.00000	    0.00954	    0.02786	    0.04343
                     12	  -0.03933	  -0.02535	  -0.00872	    0.00000	    0.00876	    0.02539	    0.03937
                     20	  -0.02622	  -0.01693	  -0.00584	    0.00002	    0.00586	    0.01695	    0.02624
                     40	  -0.01349	  -0.00890	  -0.00305	  -0.00014	    0.00299	    0.00883	    0.01340
                     50	  -0.04771	  -0.04635	    0.00197	  -0.00125	  -0.00204	    0.04629	    0.04765
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              </tableData>
          </table>
       </product>
    </function>
    <function name="aero/c/CFYDSBL">
    <description>SIDE FORCE DUE TO LOWER SPEEDBRAKE DEFLECTION</description>
    <product>
          <table>
            <independentVar lookup="row">aero/alpha-deg</independentVar>
            <independentVar lookup="column">fcs/airbrake-upper</independentVar>
            <tableData>
                                  0	          5	         10	         15	         20	         25	         30	         35	         40	         45	         50	         55
                    -20	    0.00001	  -0.00057	  -0.00103	  -0.00149	  -0.00189	  -0.00221	  -0.00253	  -0.00257	  -0.00261	  -0.00263	  -0.00263	  -0.00262
                      0	    0.00000	  -0.00032	  -0.00058	  -0.00086	  -0.00120	  -0.00152	  -0.00178	  -0.00188	  -0.00195	  -0.00199	  -0.00201	  -0.00198
                     12	  -0.00005	  -0.00027	  -0.00024	  -0.00024	  -0.00051	  -0.00066	  -0.00084	  -0.00090	  -0.00093	  -0.00091	  -0.00091	  -0.00092
                     20	    0.00017	    0.00019	    0.00015	    0.00027	    0.00033	    0.00036	    0.00039	    0.00044	    0.00045	    0.00059	    0.00062	    0.00055
                     40	  -0.00056	  -0.00106	  -0.00275	  -0.00296	  -0.00390	  -0.00477	  -0.00539	  -0.00573	  -0.00579	  -0.00589	  -0.00590	  -0.00585
                     50	    0.00117	  -0.00042	  -0.00100	  -0.00159	  -0.00212	  -0.00204	  -0.00237	  -0.00221	  -0.00308	  -0.00338	  -0.00195	  -0.00338
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            </tableData>
          </table>
       </product>
    </function>
    <function name="aero/c/CFYDSBU">
    <description>SIDE FORCE DUE TO UPPER SPEEDBRAKE DEFLECTION</description>
    <product>
          <table>
            <independentVar lookup="row">aero/alpha-deg</independentVar>
            <independentVar lookup="column">fcs/airbrake-lower</independentVar>
            <tableData>
                                  0	          5	         11	         17	         22	         28	         34	         39	         45	         50	         56	         62	         67
                    -20	  -0.00002	    0.00028	    0.00078	    0.00081	    0.00040	    0.00088	    0.00045	    0.00053	    0.00058	    0.00059	    0.00056	    0.00049	    0.00095
                      0	    0.00000	  -0.00009	  -0.00019	  -0.00030	  -0.00038	  -0.00045	  -0.00051	  -0.00055	  -0.00057	  -0.00058	  -0.00056	  -0.00053	  -0.00048
                     12	    0.00001	  -0.00014	  -0.00029	  -0.00083	  -0.00050	  -0.00053	  -0.00055	  -0.00058	  -0.00059	  -0.00059	  -0.00059	  -0.00131	  -0.00054
                     20	  -0.00003	  -0.00045	  -0.00077	  -0.00083	  -0.00055	  -0.00041	  -0.00034	  -0.00031	  -0.00030	  -0.00029	  -0.00030	  -0.00045	  -0.00035
                     40	  -0.00046	    0.00058	    0.00005	    0.00256	    0.00751	    0.00329	    0.00346	    0.00356	    0.00362	    0.00363	    0.00360	    0.00351	    0.00333
                     50	  -0.00046	    0.00003	    0.00018	    0.00024	  -0.00034	  -0.00034	  -0.00038	  -0.00027	  -0.00028	  -0.00029	  -0.00028	  -0.00038	  -0.00035
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            </tableData>
          </table>
       </product>
    </function>
    <function name="aero/c/CFYDSD1L">
    <description>SIDE FORCE DUE TO LE SLAT 1L DEFLECTION</description>
    <product>
          <table>
            <independentVar lookup="row">aero/alpha-deg</independentVar>
            <independentVar lookup="column">fcs/slat-1L-pos-deg</independentVar>
            <tableData>
                                -17	        -14	        -10	         -7	         -3	          0	          3	          7	         10	         14	         17
                    -20	    0.00127	    0.00116	    0.00095	    0.00055	    0.00024	  -0.00001	  -0.00026	  -0.00062	  -0.00092	  -0.00136	  -0.00178
                      0	  -0.00039	  -0.00033	  -0.00023	  -0.00016	  -0.00007	    0.00000	    0.00007	    0.00015	    0.00021	    0.00028	    0.00033
                     12	  -0.00023	  -0.00020	  -0.00015	  -0.00010	  -0.00002	    0.00006	    0.00014	    0.00027	    0.00037	    0.00051	    0.00062
                     20	  -0.00315	  -0.00273	  -0.00211	  -0.00159	  -0.00087	  -0.00029	    0.00025	    0.00109	    0.00169	    0.00246	    0.00302
                     40	    0.00154	    0.00123	    0.00082	    0.00051	    0.00011	  -0.00019	  -0.00046	  -0.00080	  -0.00103	  -0.00132	  -0.00152
                     50	    0.00123	    0.00097	    0.00063	    0.00038	    0.00005	  -0.00019	  -0.00041	  -0.00068	  -0.00086	  -0.00107	  -0.00122
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            </tableData>
          </table>
       </product>
    </function>
    <function name="aero/c/CFYDSD1R">
    <description>SIDE FORCE DUE TO LE SLAT 1R DEFLECTION</description>
    <product>
          <table>
            <independentVar lookup="row">aero/alpha-deg</independentVar>
            <independentVar lookup="column">fcs/slat-1R-pos-deg</independentVar>
            <tableData>
                                -17	        -14	        -10	         -7	         -3	          0	          3	          7	         10	         14	         17
                    -20	  -0.00127	  -0.00116	  -0.00095	  -0.00055	  -0.00024	    0.00001	    0.00026	    0.00062	    0.00092	    0.00136	    0.00178
                      0	    0.00039	    0.00033	    0.00023	    0.00016	    0.00007	    0.00000	  -0.00007	  -0.00015	  -0.00021	  -0.00028	  -0.00033
                     12	    0.00023	    0.00020	    0.00015	    0.00010	    0.00002	  -0.00006	  -0.00014	  -0.00027	  -0.00037	  -0.00051	  -0.00062
                     20	    0.00315	    0.00273	    0.00211	    0.00159	    0.00087	    0.00029	  -0.00025	  -0.00109	  -0.00169	  -0.00246	  -0.00302
                     40	  -0.00154	  -0.00123	  -0.00082	  -0.00051	  -0.00011	    0.00019	    0.00046	    0.00080	    0.00103	    0.00132	    0.00152
                     50	  -0.00123	  -0.00097	  -0.00063	  -0.00038	  -0.00005	    0.00019	    0.00041	    0.00068	    0.00086	    0.00107	    0.00122
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            </tableData>
          </table>
       </product>
    </function>
    <function name="aero/c/CFYDSD2L">
    <description>SIDE FORCE DUE TO LE SLAT 2L DEFLECTION</description>
    <product>
          <table>
            <independentVar lookup="row">aero/alpha-deg</independentVar>
            <independentVar lookup="column">fcs/slat-2L-pos-deg</independentVar>
            <tableData>
                                -17	        -14	        -10	         -7	         -3	          0	          3	          7	         10	         14	         17
                    -20	  -0.00051	  -0.00045	  -0.00034	  -0.00025	  -0.00012	  -0.00002	    0.00009	    0.00025	    0.00039	    0.00055	    0.00067
                      0	  -0.00047	  -0.00039	  -0.00028	  -0.00020	  -0.00008	    0.00000	    0.00008	    0.00018	    0.00025	    0.00034	    0.00040
                     12	  -0.00091	  -0.00078	  -0.00058	  -0.00040	  -0.00015	    0.00006	    0.00028	    0.00059	    0.00082	    0.00114	    0.00137
                     20	  -0.00191	  -0.00159	  -0.00138	  -0.00092	  -0.00053	  -0.00029	  -0.00036	  -0.00007	    0.00013	    0.00041	    0.00024
                     40	    0.00080	    0.00062	    0.00039	    0.00021	  -0.00002	  -0.00018	  -0.00034	  -0.00055	  -0.00071	  -0.00091	  -0.00103
                     50	    0.00035	    0.00025	    0.00012	    0.00002	  -0.00010	  -0.00019	  -0.00026	  -0.00035	  -0.00038	  -0.00048	  -0.00053
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            </tableData>
          </table>
       </product>
    </function>
    <function name="aero/c/CFYDSD2R">
    <description>SIDE FORCE DUE TO LE SLAT 2R DEFLECTION</description>
    <product>
          <table>
            <independentVar lookup="row">aero/alpha-deg</independentVar>
            <independentVar lookup="column">fcs/slat-2R-pos-deg</independentVar>
            <tableData>
                                -17	        -14	        -10	         -7	         -3	          0	          3	          7	         10	         14	         17
                    -20	    0.00051	    0.00045	    0.00034	    0.00025	    0.00012	    0.00002	  -0.00009	  -0.00025	  -0.00039	  -0.00055	  -0.00067
                      0	    0.00047	    0.00039	    0.00028	    0.00020	    0.00008	    0.00000	  -0.00008	  -0.00018	  -0.00025	  -0.00034	  -0.00040
                     12	    0.00091	    0.00078	    0.00058	    0.00040	    0.00015	  -0.00006	  -0.00028	  -0.00059	  -0.00082	  -0.00114	  -0.00137
                     20	    0.00191	    0.00159	    0.00138	    0.00092	    0.00053	    0.00029	    0.00036	    0.00007	  -0.00013	  -0.00041	  -0.00024
                     40	  -0.00080	  -0.00062	  -0.00039	  -0.00021	    0.00002	    0.00018	    0.00034	    0.00055	    0.00071	    0.00091	    0.00103
                     50	  -0.00035	  -0.00025	  -0.00012	  -0.00002	    0.00010	    0.00019	    0.00026	    0.00035	    0.00038	    0.00048	    0.00053
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            </tableData>
          </table>
       </product>
    </function>
    <function name="aero/c/CFYGEAR">
    <description>SIDE FORCE INCREMENT DUE TO GEAR</description>
    <product>
          <property>gear/gear-pos-norm</property>
          <table>
            <independentVar lookup="row">aero/alpha-deg</independentVar>
            <tableData>
                    -20		    0.00029
                    -10		   0.00000
                      0		    0.00000
                     10		  -0.00002
                     15		    0.00104
                     20		  -0.00015
                     30		  -0.00060
                     40		    0.00013
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            </tableData>
          </table>
       </product>
    </function>
    <function name="aero/c/CFYP">
    <description>SIDE FORCE DUE TO ROLL RATE</description>
    <product>
          <property>aero/pb</property>
          <table>
            <independentVar lookup="row">aero/alpha-deg</independentVar>
            <tableData>
                    -20		  -0.26566
                    -10		  -0.23047
                      0		    0.04031
                     10		    0.21052
                     15		    0.42046
                     20		    0.41420
                     30		    0.46010
                     50		    0.16089
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            </tableData>
          </table>
       </product>
    </function>
    <function name="aero/c/CFYR">
    <description>SIDE FORCE DUE TO YAW RATE</description>
    <product>
          <property>aero/rb</property>
          <table>
            <independentVar lookup="row">aero/alpha-deg</independentVar>
            <tableData>
                    -20		    0.52477
                    -10		    0.42836
                      0		    0.40353
                     10		    0.40244
                     15		    0.35615
                     20		    0.30998
                     30		    0.32700
                     50		    0.31554
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            </tableData>
          </table>
       </product>
    </function>
    <function name="aero/c/CMN1">
    <description>BASIC YAWING MOMENT</description>
    <product>
          <table>
            <independentVar lookup="row">aero/alpha-deg</independentVar>
            <independentVar lookup="column">aero/beta-deg</independentVar>
            <tableData>
                                -10	          0	         10
                    -20	  -0.00532	  -0.00001	    0.00534
                      0	  -0.00774	    0.00000	    0.00774
                     12	  -0.01040	  -0.00001	    0.01044
                     20	  -0.00977	    0.00000	    0.00977
                     40	    0.00905	    0.00001	  -0.00906
                     50	  -0.00101	  -0.00001	    0.00094
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            </tableData>
          </table>
       </product>
    </function>
    <function name="aero/c/CMNBETADOT">
    <description>YAW MOMENT DERIVATIVE FOR BETA DOT</description>
    <product>
          <property>aero/betadot-rad_sec</property>
          <property>aero/bi2vel</property>
          <table>
            <independentVar lookup="row">aero/alpha-deg</independentVar>
            <tableData>
                    -20		  -0.04035
                    -10		  -0.02483
                      0		  -0.04051
                     10		    0.01217
                     15		    0.02271
                     20		  -0.00057
                     30		  -0.10295
                     50		  -0.54489
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            </tableData>
          </table>
       </product>
    </function>
    <function name="aero/c/CMNDED1L">
    <description>YAW MOMENT DUE TO ELEVON 1L</description>
    <product>
          <table>
            <independentVar lookup="row">aero/alpha-deg</independentVar>
            <independentVar lookup="column">aero/beta-deg</independentVar>
            <independentVar lookup="table">fcs/elevon-1L-pos-deg</independentVar>
              <tableData breakPoint="-16">
                              -10	         0	        10
                    -20	  -0.00390	  -0.00105	  -0.00170
                      0	  -0.00939	  -0.00739	  -0.00857
                     12	  -0.00935	  -0.00804	  -0.00768
                     20	  -0.00606	  -0.00667	  -0.00735
                     40	  -0.00248	    0.00044	  -0.00191
                     50	  -0.00181	  -0.00301	  -0.00096
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              </tableData>
              <tableData breakPoint="-13">
                              -10	         0	        10
                    -20	  -0.00318	  -0.00072	  -0.00139
                      0	  -0.00736	  -0.00564	  -0.00685
                     12	  -0.00760	  -0.00643	  -0.00613
                     20	  -0.00443	  -0.00492	  -0.00561
                     40	  -0.00115	    0.00040	  -0.00214
                     50	  -0.00171	  -0.00254	  -0.00136
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              </tableData>
              <tableData breakPoint="-10">
                              -10	         0	        10
                    -20	  -0.00238	  -0.00039	  -0.00104
                      0	  -0.00540	  -0.00406	  -0.00505
                     12	  -0.00585	  -0.00485	  -0.00460
                     20	  -0.00321	  -0.00343	  -0.00395
                     40	  -0.00084	    0.00019	  -0.00170
                     50	  -0.00146	  -0.00198	  -0.00118
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              </tableData>
              <tableData breakPoint="-5">
                              -10	         0	        10
                    -20	  -0.00108	    0.00017	  -0.00062
                      0	  -0.00248	  -0.00181	  -0.00245
                     12	  -0.00282	  -0.00233	  -0.00217
                     20	  -0.00137	  -0.00140	  -0.00169
                     40	  -0.00059	    0.00032	  -0.00087
                     50	  -0.01072	  -0.00100	  -0.00044
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              </tableData>
              <tableData breakPoint="0">
                              -10	         0	        10
                    -20	    0.00000	    0.00000	    0.00000
                      0	    0.00000	    0.00000	    0.00000
                     12	    0.00000	    0.00000	    0.00004
                     20	    0.00000	    0.00002	    0.00000
                     40	    0.00000	    0.00001	    0.00000
                     50	    0.00000	  -0.00001	    0.00000
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              </tableData>
              <tableData breakPoint="5">
                              -10	         0	        10
                    -20	    0.00144	    0.00028	    0.00063
                      0	    0.00214	    0.00142	    0.00209
                     12	    0.00263	    0.00206	    0.00194
                     20	    0.00102	    0.00101	    0.00126
                     40	    0.00071	    0.00013	    0.00050
                     50	    0.00158	    0.00077	    0.00206
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              </tableData>
              <tableData breakPoint="10">
                              -10	         0	        10
                    -20	    0.00264	    0.00078	    0.00112
                      0	    0.00388	    0.00243	    0.00382
                     12	    0.00495	    0.00378	    0.00333
                     20	    0.00172	    0.00168	    0.00228
                     40	    0.00109	    0.00083	    0.00135
                     50	    0.01033	    0.00158	    0.00258
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              </tableData>
              <tableData breakPoint="15">
                              -10	         0	        10
                    -20	    0.00391	    0.00105	    0.00139
                      0	    0.00524	    0.00303	    0.00517
                     12	    0.00686	    0.00452	    0.00428
                     20	    0.00227	    0.00217	    0.00296
                     40	    0.00148	    0.00147	    0.00173
                     50	    0.00232	    0.00222	    0.00462
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              </tableData>
              <tableData breakPoint="16">
                              -10	         0	        10
                    -20	    0.00414	    0.00124	    0.00151
                      0	    0.00546	    0.00310	    0.00540
                     12	    0.00721	    0.00457	    0.00437
                     20	    0.00218	    0.00224	    0.00309
                     40	    0.00156	    0.00067	    0.00179
                     50	    0.00248	    0.00233	    0.00468
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              </tableData>
              <tableData breakPoint="20">
                              -10	         0	        10
                    -20	    0.00499	    0.00156	    0.00177
                      0	    0.00620	    0.00327	    0.00615
                     12	    0.00805	    0.00456	    0.00448
                     20	    0.00272	    0.00258	    0.00354
                     40	    0.00192	    0.00074	    0.00205
                     50	    0.00315	    0.00275	    0.00494
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              </tableData>
              <tableData breakPoint="25">
                              -10	         0	        10
                    -20	    0.00587	    0.00209	    0.00201
                      0	    0.00683	    0.00326	    0.00679
                     12	    0.00850	    0.00214	    0.00431
                     20	    0.00267	    0.00291	    0.00399
                     40	    0.00308	    0.00098	    0.00226
                     50	    0.00333	    0.02172	    0.00441
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              </tableData>
          </table>
       </product>
    </function>
    <function name="aero/c/CMNDED1R">
    <description>YAW MOMENT DUE TO ELEVON 1R</description>
    <product>
          <table>
            <independentVar lookup="row">aero/alpha-deg</independentVar>
            <independentVar lookup="column">aero/beta-deg</independentVar>
            <independentVar lookup="table">fcs/elevon-1R-pos-deg</independentVar>
              <tableData breakPoint="-16">
                              -10	         0	        10
                    -20	    0.00390	    0.00105	    0.00170
                      0	    0.00939	    0.00739	    0.00857
                     12	    0.00935	    0.00804	    0.00768
                     20	    0.00606	    0.00667	    0.00735
                     40	    0.00248	  -0.00044	    0.00191
                     50	    0.00181	    0.00301	    0.00096
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              </tableData>
              <tableData breakPoint="-13">
                              -10	         0	        10
                    -20	    0.00318	    0.00072	    0.00139
                      0	    0.00736	    0.00564	    0.00685
                     12	    0.00760	    0.00643	    0.00613
                     20	    0.00443	    0.00492	    0.00561
                     40	    0.00115	  -0.00040	    0.00214
                     50	    0.00171	    0.00254	    0.00136
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              </tableData>
              <tableData breakPoint="-10">
                              -10	         0	        10
                    -20	    0.00238	    0.00039	    0.00104
                      0	    0.00540	    0.00406	    0.00505
                     12	    0.00585	    0.00485	    0.00460
                     20	    0.00321	    0.00343	    0.00395
                     40	    0.00084	  -0.00019	    0.00170
                     50	    0.00146	    0.00198	    0.00118
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              </tableData>
              <tableData breakPoint="-5">
                              -10	         0	        10
                    -20	    0.00108	  -0.00017	    0.00062
                      0	    0.00248	    0.00181	    0.00245
                     12	    0.00282	    0.00233	    0.00217
                     20	    0.00137	    0.00140	    0.00169
                     40	    0.00059	  -0.00032	    0.00087
                     50	    0.01072	    0.00100	    0.00044
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              </tableData>
              <tableData breakPoint="0">
                              -10	         0	        10
                    -20	    0.00000	    0.00000	    0.00000
                      0	    0.00000	    0.00000	    0.00000
                     12	    0.00000	    0.00000	  -0.00004
                     20	    0.00000	  -0.00002	    0.00000
                     40	    0.00000	  -0.00001	    0.00000
                     50	    0.00000	    0.00001	    0.00000
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              </tableData>
              <tableData breakPoint="5">
                              -10	         0	        10
                    -20	  -0.00144	  -0.00028	  -0.00063
                      0	  -0.00214	  -0.00142	  -0.00209
                     12	  -0.00263	  -0.00206	  -0.00194
                     20	  -0.00102	  -0.00101	  -0.00126
                     40	  -0.00071	  -0.00013	  -0.00050
                     50	  -0.00158	  -0.00077	  -0.00206
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              </tableData>
              <tableData breakPoint="10">
                              -10	         0	        10
                    -20	  -0.00264	  -0.00078	  -0.00112
                      0	  -0.00388	  -0.00243	  -0.00382
                     12	  -0.00495	  -0.00378	  -0.00333
                     20	  -0.00172	  -0.00168	  -0.00228
                     40	  -0.00109	  -0.00083	  -0.00135
                     50	  -0.01033	  -0.00158	  -0.00258
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              </tableData>
              <tableData breakPoint="15">
                              -10	         0	        10
                    -20	  -0.00391	  -0.00105	  -0.00139
                      0	  -0.00524	  -0.00303	  -0.00517
                     12	  -0.00686	  -0.00452	  -0.00428
                     20	  -0.00227	  -0.00217	  -0.00296
                     40	  -0.00148	  -0.00147	  -0.00173
                     50	  -0.00232	  -0.00222	  -0.00462
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              </tableData>
              <tableData breakPoint="16">
                              -10	         0	        10
                    -20	  -0.00414	  -0.00124	  -0.00151
                      0	  -0.00546	  -0.00310	  -0.00540
                     12	  -0.00721	  -0.00457	  -0.00437
                     20	  -0.00218	  -0.00224	  -0.00309
                     40	  -0.00156	  -0.00067	  -0.00179
                     50	  -0.00248	  -0.00233	  -0.00468
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              </tableData>
              <tableData breakPoint="20">
                              -10	         0	        10
                    -20	  -0.00499	  -0.00156	  -0.00177
                      0	  -0.00620	  -0.00327	  -0.00615
                     12	  -0.00805	  -0.00456	  -0.00448
                     20	  -0.00272	  -0.00258	  -0.00354
                     40	  -0.00192	  -0.00074	  -0.00205
                     50	  -0.00315	  -0.00275	  -0.00494
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              </tableData>
              <tableData breakPoint="25">
                              -10	         0	        10
                    -20	  -0.00587	  -0.00209	  -0.00201
                      0	  -0.00683	  -0.00326	  -0.00679
                     12	  -0.00850	  -0.00214	  -0.00431
                     20	  -0.00267	  -0.00291	  -0.00399
                     40	  -0.00308	  -0.00098	  -0.00226
                     50	  -0.00333	  -0.02172	  -0.00441
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              </tableData>
          </table>
       </product>
    </function>
    <function name="aero/c/CMNDED2L">
    <description>YAW MOMENT DUE TO ELEVON 2L</description>
    <product>
          <table>
            <independentVar lookup="row">aero/alpha-deg</independentVar>
            <independentVar lookup="column">aero/beta-deg</independentVar>
            <independentVar lookup="table">fcs/elevon-2L-pos-deg</independentVar>
              <tableData breakPoint="-16">
                              -10	         0	        10
                    -20	  -0.00082	    0.00103	  -0.00169
                      0	  -0.00707	  -0.00281	  -0.00622
                     12	  -0.00982	  -0.00672	  -0.00594
                     20	  -0.00894	  -0.00986	  -0.01109
                     40	  -0.00421	    0.00318	  -0.00602
                     50	  -0.00394	  -0.02696	    0.00103
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              </tableData>
              <tableData breakPoint="-13">
                              -10	         0	        10
                    -20	  -0.00077	    0.00122	  -0.00122
                      0	  -0.00581	  -0.00228	  -0.00501
                     12	  -0.00821	  -0.00546	  -0.00462
                     20	  -0.00726	  -0.00852	  -0.00914
                     40	  -0.00307	    0.00420	  -0.00444
                     50	  -0.00344	  -0.03187	  -0.00118
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              </tableData>
              <tableData breakPoint="-10">
                              -10	         0	        10
                    -20	  -0.00034	    0.00076	  -0.00116
                      0	  -0.00450	  -0.00170	  -0.00369
                     12	  -0.00641	  -0.00416	  -0.00342
                     20	  -0.00555	  -0.00698	  -0.00712
                     40	  -0.00303	    0.00300	  -0.00310
                     50	  -0.00270	  -0.02360	  -0.00045
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              </tableData>
              <tableData breakPoint="-5">
                              -10	         0	        10
                    -20	  -0.00011	    0.00104	  -0.00007
                      0	  -0.00229	  -0.00075	  -0.00175
                     12	  -0.00335	  -0.00202	  -0.00182
                     20	  -0.00278	  -0.00377	  -0.00349
                     40	  -0.00171	    0.00121	  -0.00144
                     50	  -0.00145	  -0.02311	  -0.00129
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              </tableData>
              <tableData breakPoint="0">
                              -10	         0	        10
                    -20	    0.00011	    0.00000	  -0.00026
                      0	    0.00001	    0.00000	    0.00002
                     12	    0.00015	    0.00000	  -0.00014
                     20	  -0.00003	  -0.00006	  -0.00001
                     40	    0.00018	    0.00000	    0.00012
                     50	    0.00136	  -0.00004	  -0.00144
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              </tableData>
              <tableData breakPoint="5">
                              -10	         0	        10
                    -20	    0.00079	  -0.00042	  -0.00043
                      0	    0.00228	    0.00071	    0.00151
                     12	    0.00372	    0.00216	    0.00146
                     20	    0.00277	    0.00314	    0.00301
                     40	    0.00163	  -0.00024	    0.00142
                     50	    0.00249	    0.02103	    0.00233
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              </tableData>
              <tableData breakPoint="10">
                              -10	         0	        10
                    -20	    0.00259	  -0.00027	  -0.00071
                      0	    0.00454	    0.00125	    0.00278
                     12	    0.00715	    0.00386	    0.00283
                     20	    0.00564	    0.00652	    0.00606
                     40	    0.00266	    0.00074	    0.00182
                     50	    0.00321	    0.02186	    0.00200
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              </tableData>
              <tableData breakPoint="15">
                              -10	         0	        10
                    -20	    0.00413	    0.00020	  -0.00062
                      0	    0.00661	    0.00154	    0.00377
                     12	    0.01037	    0.00560	    0.00359
                     20	    0.00770	    0.00998	    0.00859
                     40	    0.00497	    0.00111	    0.00349
                     50	    0.00408	    0.06416	    0.00355
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              </tableData>
              <tableData breakPoint="16">
                              -10	         0	        10
                    -20	    0.00478	    0.00027	  -0.00061
                      0	    0.00700	    0.00161	    0.00394
                     12	    0.01098	    0.00588	    0.00373
                     20	    0.00831	    0.01025	    0.00897
                     40	    0.00501	    0.00094	    0.00298
                     50	    0.00409	    0.06398	    0.00366
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              </tableData>
              <tableData breakPoint="20">
                              -10	         0	        10
                    -20	    0.00604	  -0.00009	  -0.00042
                      0	    0.00851	    0.00180	    0.00452
                     12	    0.01310	    0.00695	    0.00418
                     20	    0.01040	    0.01156	    0.01026
                     40	    0.00543	    0.00034	    0.00290
                     50	    0.00477	    0.06014	    0.00529
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              </tableData>
              <tableData breakPoint="25">
                              -10	         0	        10
                    -20	    0.00725	  -0.00050	  -0.00096
                      0	    0.01013	    0.00207	    0.00507
                     12	    0.01552	    0.00827	    0.00482
                     20	    0.01258	    0.01345	    0.01184
                     40	    0.00625	    0.01312	    0.00362
                     50	    0.00449	    0.06525	    0.00610
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              </tableData>
          </table>
       </product>
    </function>
    <function name="aero/c/CMNDED2R">
    <description>YAW MOMENT DUE TO ELEVON 2R</description>
    <product>
          <table>
            <independentVar lookup="row">aero/alpha-deg</independentVar>
            <independentVar lookup="column">aero/beta-deg</independentVar>
            <independentVar lookup="table">fcs/elevon-2R-pos-deg</independentVar>
              <tableData breakPoint="-16">
                              -10	         0	        10
                    -20	    0.00082	  -0.00103	    0.00169
                      0	    0.00707	    0.00281	    0.00622
                     12	    0.00982	    0.00672	    0.00594
                     20	    0.00894	    0.00986	    0.01109
                     40	    0.00421	  -0.00318	    0.00602
                     50	    0.00394	    0.02696	  -0.00103
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              </tableData>
              <tableData breakPoint="-13">
                              -10	         0	        10
                    -20	    0.00077	  -0.00122	    0.00122
                      0	    0.00581	    0.00228	    0.00501
                     12	    0.00821	    0.00546	    0.00462
                     20	    0.00726	    0.00852	    0.00914
                     40	    0.00307	  -0.00420	    0.00444
                     50	    0.00344	    0.03187	    0.00118
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              </tableData>
              <tableData breakPoint="-10">
                              -10	         0	        10
                    -20	    0.00034	  -0.00076	    0.00116
                      0	    0.00450	    0.00170	    0.00369
                     12	    0.00641	    0.00416	    0.00342
                     20	    0.00555	    0.00698	    0.00712
                     40	    0.00303	  -0.00300	    0.00310
                     50	    0.00270	    0.02360	    0.00045
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              </tableData>
              <tableData breakPoint="-5">
                              -10	         0	        10
                    -20	    0.00011	  -0.00104	    0.00007
                      0	    0.00229	    0.00075	    0.00175
                     12	    0.00335	    0.00202	    0.00182
                     20	    0.00278	    0.00377	    0.00349
                     40	    0.00171	  -0.00121	    0.00144
                     50	    0.00145	    0.02311	    0.00129
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              </tableData>
              <tableData breakPoint="0">
                              -10	         0	        10
                    -20	  -0.00011	    0.00000	    0.00026
                      0	  -0.00001	    0.00000	  -0.00002
                     12	  -0.00015	    0.00000	    0.00014
                     20	    0.00003	    0.00006	    0.00001
                     40	  -0.00018	    0.00000	  -0.00012
                     50	  -0.00136	    0.00004	    0.00144
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              </tableData>
              <tableData breakPoint="5">
                              -10	         0	        10
                    -20	  -0.00079	    0.00042	    0.00043
                      0	  -0.00228	  -0.00071	  -0.00151
                     12	  -0.00372	  -0.00216	  -0.00146
                     20	  -0.00277	  -0.00314	  -0.00301
                     40	  -0.00163	    0.00024	  -0.00142
                     50	  -0.00249	  -0.02103	  -0.00233
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              </tableData>
              <tableData breakPoint="10">
                              -10	         0	        10
                    -20	  -0.00259	    0.00027	    0.00071
                      0	  -0.00454	  -0.00125	  -0.00278
                     12	  -0.00715	  -0.00386	  -0.00283
                     20	  -0.00564	  -0.00652	  -0.00606
                     40	  -0.00266	  -0.00074	  -0.00182
                     50	  -0.00321	  -0.02186	  -0.00200
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              </tableData>
              <tableData breakPoint="15">
                              -10	         0	        10
                    -20	  -0.00413	  -0.00020	    0.00062
                      0	  -0.00661	  -0.00154	  -0.00377
                     12	  -0.01037	  -0.00560	  -0.00359
                     20	  -0.00770	  -0.00998	  -0.00859
                     40	  -0.00497	  -0.00111	  -0.00349
                     50	  -0.00408	  -0.06416	  -0.00355
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              </tableData>
              <tableData breakPoint="16">
                              -10	         0	        10
                    -20	  -0.00478	  -0.00027	    0.00061
                      0	  -0.00700	  -0.00161	  -0.00394
                     12	  -0.01098	  -0.00588	  -0.00373
                     20	  -0.00831	  -0.01025	  -0.00897
                     40	  -0.00501	  -0.00094	  -0.00298
                     50	  -0.00409	  -0.06398	  -0.00366
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              </tableData>
              <tableData breakPoint="20">
                              -10	         0	        10
                    -20	  -0.00604	    0.00009	    0.00042
                      0	  -0.00851	  -0.00180	  -0.00452
                     12	  -0.01310	  -0.00695	  -0.00418
                     20	  -0.01040	  -0.01156	  -0.01026
                     40	  -0.00543	  -0.00034	  -0.00290
                     50	  -0.00477	  -0.06014	  -0.00529
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              </tableData>
              <tableData breakPoint="25">
                              -10	         0	        10
                    -20	  -0.00725	    0.00050	    0.00096
                      0	  -0.01013	  -0.00207	  -0.00507
                     12	  -0.01552	  -0.00827	  -0.00482
                     20	  -0.01258	  -0.01345	  -0.01184
                     40	  -0.00625	  -0.01312	  -0.00362
                     50	  -0.00449	  -0.06525	  -0.00610
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              </tableData>
          </table>
       </product>
    </function>
    <function name="aero/c/CMNDRDr">
    <description>YAWING MOMENT DUE TO RUDDER DEFLECTION</description>
    <product>
          <table>
            <independentVar lookup="row">aero/alpha-deg</independentVar>
            <independentVar lookup="column">aero/beta-deg</independentVar>
            <independentVar lookup="table">fcs/rudder-pos-deg</independentVar>
              <tableData breakPoint="-25">
                              -10	         0	        10
                    -20	  -0.02456	  -0.02281	  -0.02585
                      0	  -0.02565	  -0.02235	  -0.02477
                     12	  -0.02610	  -0.01987	  -0.02333
                     20	  -0.02044	  -0.01707	  -0.02006
                     40	  -0.00727	  -0.00782	  -0.00848
                     50	  -0.00406	  -0.02349	  -0.00561
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              </tableData>
              <tableData breakPoint="-15">
                              -10	         0	        10
                    -20	  -0.01622	  -0.01451	  -0.01680
                      0	  -0.01653	  -0.01435	  -0.01607
                     12	  -0.01778	  -0.01280	  -0.01515
                     20	  -0.01329	  -0.01104	  -0.01304
                     40	  -0.00484	  -0.00511	  -0.00441
                     50	  -0.00283	  -0.02295	  -0.00415
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              </tableData>
              <tableData breakPoint="-5">
                              -10	         0	        10
                    -20	  -0.00587	  -0.00486	  -0.00585
                      0	  -0.00566	  -0.00492	  -0.00558
                     12	  -0.00550	  -0.00438	  -0.00533
                     20	  -0.00460	  -0.00382	  -0.00455
                     40	  -0.00177	  -0.00177	  -0.00148
                     50	  -0.00155	    0.00092	  -0.00124
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              </tableData>
              <tableData breakPoint="0">
                              -10	         0	        10
                    -20	    0.00000	    0.00000	    0.00000
                      0	    0.00000	    0.00000	    0.00000
                     12	    0.00000	    0.00000	  -0.00004
                     20	    0.00000	    0.00001	    0.00000
                     40	    0.00000	  -0.00005	    0.00000
                     50	    0.00000	  -0.00041	    0.00000
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              </tableData>
              <tableData breakPoint="5">
                              -10	         0	        10
                    -20	    0.00585	    0.00493	    0.00587
                      0	    0.00558	    0.00492	    0.00569
                     12	    0.00529	    0.00440	    0.00546
                     20	    0.00454	    0.00382	    0.00459
                     40	    0.00153	    0.00173	    0.00178
                     50	    0.00134	  -0.00091	    0.00162
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              </tableData>
              <tableData breakPoint="15">
                              -10	         0	        10
                    -20	    0.01680	    0.01455	    0.01623
                      0	    0.01607	    0.01435	    0.01652
                     12	    0.01511	    0.01282	    0.01775
                     20	    0.01303	    0.01104	    0.01328
                     40	    0.00567	    0.00508	    0.00486
                     50	    0.00354	    0.02295	    0.00291
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              </tableData>
              <tableData breakPoint="25">
                              -10	         0	        10
                    -20	    0.02584	    0.02284	    0.02456
                      0	    0.02477	    0.02235	    0.02565
                     12	    0.02329	    0.01989	    0.02606
                     20	    0.02004	    0.01708	    0.02044
                     40	    0.00821	    0.00779	    0.00730
                     50	    0.00566	    0.02348	    0.00415
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              </tableData>
          </table>
       </product>
    </function>
    <function name="aero/c/CMNDSBL">
    <description>YAW MOMENT DUE TO LOWER SPEEDBRAKE DEFLECTION</description>
    <product>
          <table>
            <independentVar lookup="row">aero/alpha-deg</independentVar>
            <independentVar lookup="column">fcs/airbrake-upper</independentVar>
            <tableData>
                                  0	          5	         10	         15	         20	         25	         30	         35	         40	         45	         50	         55
                    -20	    0.00001	    0.00003	    0.00000	    0.00003	    0.00005	    0.00007	    0.00004	    0.00007	    0.00008	    0.00008	    0.00008	    0.00008
                      0	    0.00000	    0.00007	    0.00013	    0.00015	    0.00003	  -0.00009	  -0.00021	  -0.00028	  -0.00033	  -0.00036	  -0.00036	  -0.00035
                     12	  -0.00002	  -0.00023	  -0.00025	  -0.00022	  -0.00027	  -0.00031	  -0.00032	  -0.00030	  -0.00028	  -0.00027	  -0.00026	  -0.00027
                     20	    0.00008	    0.00002	  -0.00011	  -0.00020	  -0.00031	  -0.00042	  -0.00045	  -0.00048	  -0.00050	  -0.00050	  -0.00050	  -0.00050
                     40	  -0.00030	  -0.00030	  -0.00091	  -0.00082	  -0.00109	  -0.00136	  -0.00161	  -0.00181	  -0.00172	  -0.00173	  -0.00172	  -0.00172
                     50	    0.00035	  -0.00005	  -0.00011	  -0.00020	  -0.00027	  -0.00011	  -0.00018	  -0.00016	  -0.00048	  -0.00052	  -0.00001	  -0.00054
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            </tableData>
          </table>
       </product>
    </function>
    <function name="aero/c/CMNDSBU">
    <description>YAW MOMENT DUE TO UPPER SPEEDBRAKE DEFLECTION</description>
    <product>
          <table>
            <independentVar lookup="row">aero/alpha-deg</independentVar>
            <independentVar lookup="column">fcs/airbrake-lower</independentVar>
            <tableData>
                                  0	          5	         11	         17	         22	         28	         34	         39	         45	         50	         56	         62	         67
                    -20	  -0.00004	    0.00001	  -0.00004	  -0.00013	  -0.00026	  -0.00028	    0.00024	    0.00023	    0.00022	    0.00022	    0.00022	    0.00024	  -0.00030
                      0	    0.00000	  -0.00005	  -0.00013	  -0.00022	  -0.00029	  -0.00036	  -0.00042	  -0.00045	  -0.00047	  -0.00047	  -0.00046	  -0.00043	  -0.00039
                     12	    0.00001	  -0.00003	  -0.00010	    0.00011	  -0.00022	  -0.00027	  -0.00031	  -0.00033	  -0.00035	  -0.00035	  -0.00035	  -0.00001	  -0.00029
                     20	  -0.00001	  -0.00017	  -0.00026	  -0.00023	  -0.00012	  -0.00013	  -0.00015	  -0.00016	  -0.00018	  -0.00018	  -0.00017	  -0.00024	  -0.00014
                     40	  -0.00023	    0.00016	  -0.00021	    0.00086	    0.00305	    0.00105	    0.00108	    0.00110	    0.00112	    0.00112	    0.00111	    0.00109	    0.00105
                     50	  -0.00014	  -0.00003	    0.00001	  -0.00001	  -0.00023	  -0.00024	  -0.00027	  -0.00022	  -0.00023	  -0.00024	  -0.00023	  -0.00027	  -0.00025
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            </tableData>
          </table>
       </product>
    </function>
    <function name="aero/c/CMNDSD1L">
    <description>YAW MOMENT DUE TO LE SLAT 1L</description>
    <product>
          <table>
            <independentVar lookup="row">aero/alpha-deg</independentVar>
            <independentVar lookup="column">fcs/slat-1L-pos-deg</independentVar>
            <tableData>
                                -17	        -14	        -10	         -7	         -3	          0	          3	          7	         10	         14	         17
                    -20	  -0.00133	  -0.00117	  -0.00090	  -0.00064	  -0.00029	    0.00000	    0.00033	    0.00076	    0.00109	    0.00153	    0.00183
                      0	  -0.00006	  -0.00005	  -0.00004	  -0.00002	  -0.00001	    0.00000	    0.00001	    0.00003	    0.00004	    0.00005	    0.00006
                     12	    0.00040	    0.00033	    0.00024	    0.00017	    0.00007	    0.00000	  -0.00008	  -0.00019	  -0.00026	  -0.00036	  -0.00043
                     20	    0.00121	    0.00101	    0.00072	    0.00049	    0.00018	  -0.00006	  -0.00032	  -0.00063	  -0.00087	  -0.00117	  -0.00138
                     40	    0.00333	    0.00273	    0.00193	    0.00133	    0.00055	  -0.00001	  -0.00053	  -0.00119	  -0.00164	  -0.00218	  -0.00253
                     50	    0.00276	    0.00224	    0.00156	    0.00106	    0.00042	  -0.00003	  -0.00046	  -0.00097	  -0.00132	  -0.00172	  -0.00199
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            </tableData>
          </table>
       </product>
    </function>
    <function name="aero/c/CMNDSD1R">
    <description>YAW MOMENT DUE TO LE SLAT 1R</description>
    <product>
          <table>
            <independentVar lookup="row">aero/alpha-deg</independentVar>
            <independentVar lookup="column">fcs/slat-1R-pos-deg</independentVar>
            <tableData>
                                -17	        -14	        -10	         -7	         -3	          0	          3	          7	         10	         14	         17
                    -20	    0.00133	    0.00117	    0.00090	    0.00064	    0.00029	    0.00000	  -0.00033	  -0.00076	  -0.00109	  -0.00153	  -0.00183
                      0	    0.00006	    0.00005	    0.00004	    0.00002	    0.00001	    0.00000	  -0.00001	  -0.00003	  -0.00004	  -0.00005	  -0.00006
                     12	  -0.00040	  -0.00033	  -0.00024	  -0.00017	  -0.00007	    0.00000	    0.00008	    0.00019	    0.00026	    0.00036	    0.00043
                     20	  -0.00121	  -0.00101	  -0.00072	  -0.00049	  -0.00018	    0.00006	    0.00032	    0.00063	    0.00087	    0.00117	    0.00138
                     40	  -0.00333	  -0.00273	  -0.00193	  -0.00133	  -0.00055	    0.00001	    0.00053	    0.00119	    0.00164	    0.00218	    0.00253
                     50	  -0.00276	  -0.00224	  -0.00156	  -0.00106	  -0.00042	    0.00003	    0.00046	    0.00097	    0.00132	    0.00172	    0.00199
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            </tableData>
          </table>
       </product>
    </function>
    <function name="aero/c/CMNDSD2L">
    <description>YAW MOMENT DUE TO LE SLAT 2L</description>
    <product>
          <table>
            <independentVar lookup="row">aero/alpha-deg</independentVar>
            <independentVar lookup="column">fcs/slat-2L-pos-deg</independentVar>
            <tableData>
                                -17	        -14	        -10	         -7	         -3	          0	          3	          7	         10	         14	         17
                    -20	  -0.00104	  -0.00091	  -0.00069	  -0.00051	  -0.00023	    0.00000	    0.00024	    0.00059	    0.00089	    0.00127	    0.00155
                      0	  -0.00037	  -0.00031	  -0.00022	  -0.00015	  -0.00006	    0.00000	    0.00007	    0.00015	    0.00021	    0.00028	    0.00033
                     12	    0.00026	    0.00021	    0.00015	    0.00010	    0.00004	    0.00000	  -0.00005	  -0.00010	  -0.00013	  -0.00018	  -0.00020
                     20	    0.00142	    0.00119	    0.00079	    0.00059	    0.00023	  -0.00006	  -0.00039	  -0.00076	  -0.00103	  -0.00135	  -0.00161
                     40	    0.00235	    0.00193	    0.00136	    0.00093	    0.00039	    0.00000	  -0.00037	  -0.00084	  -0.00117	  -0.00156	  -0.00181
                     50	    0.00182	    0.00148	    0.00102	    0.00069	    0.00027	  -0.00003	  -0.00031	  -0.00065	  -0.00086	  -0.00114	  -0.00132
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            </tableData>
          </table>
       </product>
    </function>
    <function name="aero/c/CMNDSD2R">
    <description>YAW MOMENT DUE TO LE SLAT 2R</description>
    <product>
          <table>
            <independentVar lookup="row">aero/alpha-deg</independentVar>
            <independentVar lookup="column">fcs/slat-2R-pos-deg</independentVar>
            <tableData>
                                -17	        -14	        -10	         -7	         -3	          0	          3	          7	         10	         14	         17
                    -20	    0.00104	    0.00091	    0.00069	    0.00051	    0.00023	    0.00000	  -0.00024	  -0.00059	  -0.00089	  -0.00127	  -0.00155
                      0	    0.00037	    0.00031	    0.00022	    0.00015	    0.00006	    0.00000	  -0.00007	  -0.00015	  -0.00021	  -0.00028	  -0.00033
                     12	  -0.00026	  -0.00021	  -0.00015	  -0.00010	  -0.00004	    0.00000	    0.00005	    0.00010	    0.00013	    0.00018	    0.00020
                     20	  -0.00142	  -0.00119	  -0.00079	  -0.00059	  -0.00023	    0.00006	    0.00039	    0.00076	    0.00103	    0.00135	    0.00161
                     40	  -0.00235	  -0.00193	  -0.00136	  -0.00093	  -0.00039	    0.00000	    0.00037	    0.00084	    0.00117	    0.00156	    0.00181
                     50	  -0.00182	  -0.00148	  -0.00102	  -0.00069	  -0.00027	    0.00003	    0.00031	    0.00065	    0.00086	    0.00114	    0.00132
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            </tableData>
          </table>
       </product>
    </function>
    <function name="aero/c/CMNGEAR">
    <description>YAWING MOMENT INCREMENT DUE TO GEAR</description>
    <product>
          <property>gear/gear-pos-norm</property>
          <table>
            <independentVar lookup="row">aero/alpha-deg</independentVar>
            <tableData>
                    -20		  -0.00023
                    -10		  -0.00001
                      0		    0.00000
                     10		    0.00002
                     15		    0.00014
                     20		  -0.00002
                     30		  -0.00012
                     40		   0.00000
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            </tableData>
          </table>
       </product>
    </function>
    <function name="aero/c/CMNP">
    <description>YAWING MOMENT DUE TO ROLL RATE</description>
    <product>
          <property>aero/pb</property>
          <table>
            <independentVar lookup="row">aero/alpha-deg</independentVar>
            <tableData>
                    -20		  -0.01147
                    -10		    0.00848
                      0		    0.02024
                     10		  -0.04346
                     15		  -0.06363
                     20		    0.00494
                     30		  -0.06897
                     50		    0.05386
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            </tableData>
          </table>
       </product>
    </function>
    <function name="aero/c/CMNR">
    <description>YAW DAMPING DERIVATIVE</description>
    <product>
          <property>aero/rb</property>
          <table>
            <independentVar lookup="row">aero/alpha-deg</independentVar>
            <tableData>
                    -20		  -0.13941
                    -10		  -0.15866
                      0		  -0.15767
                     10		  -0.16341
                     15		  -0.17282
                     20		  -0.16896
                     30		  -0.14401
                     50		  -0.07459
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            </tableData>
          </table>
       </product>
    </function>
    <function name="aero/coefficients/CLIFT">
      <sum>
          <property>aero/c/CFZB</property>
          <property>aero/c/CFZDED1L</property>
          <property>aero/c/CFZDED1R</property>
          <property>aero/c/CFZDE2L</property>
          <property>aero/c/CFZDE2R</property>
          <property>aero/c/CFZDSD1L</property>
          <property>aero/c/CFZDSD1R</property>
          <property>aero/c/CFZDSBU</property>
          <property>aero/c/CFZDEL</property>
          <property>aero/c/CFZGEAR</property>
       </sum>
    </function>
  <axis name="LIFT">
    <function name="aero/force/LIFT">
    <product>
          <property>aero/qbar-psf</property>
          <property>metrics/Sw-sqft</property>
          <property>aero/coefficients/CLIFT</property>
       </product>
    </function>
  </axis>
    <function name="aero/coefficients/CDRAG">
      <sum>
          <property>aero/c/CFXB</property>
          <property>aero/c/CFXDED1L</property>
          <property>aero/c/CFXDED1R</property>
          <property>aero/c/CFXDED2L</property>
          <property>aero/c/CFXDED2R</property>
          <property>aero/c/CFXDSD1L</property>
          <property>aero/c/CFXDSD1R</property>
          <property>aero/c/CFXDSD2L</property>
          <property>aero/c/CFXDSD2R</property>
          <property>aero/c/CFXDSBU</property>
          <property>aero/c/CFXDSBL</property>
          <property>aero/c/CFXGEAR</property>
       </sum>
    </function>
  <axis name="DRAG">
    <function name="aero/force/DRAG">
    <product>
          <property>aero/qbar-psf</property>
          <property>metrics/Sw-sqft</property>
          <property>aero/coefficients/CDRAG</property>
       </product>
    </function>
  </axis>
    <function name="aero/coefficients/CSIDE">
      <sum>
          <property>aero/c/CFYB</property>
          <property>aero/c/CFYP</property>
          <property>aero/c/CFYR</property>
          <property>aero/c/CFYDED1L</property>
          <property>aero/c/CFYDED1R</property>
          <property>aero/c/CFYDED2L</property>
          <property>aero/c/CFYDED2R</property>
          <property>aero/c/CFYDRD</property>
          <property>aero/c/CFYDSD1L</property>
          <property>aero/c/CFYDSD1R</property>
          <property>aero/c/CFYDSD2L</property>
          <property>aero/c/CFYDSD2R</property>
          <property>aero/c/CFYDSBU</property>
          <property>aero/c/CFYDSBL</property>
          <property>aero/c/CFYGEAR</property>
       </sum>
    </function>
  <axis name="SIDE">
    <function name="aero/force/SIDE">
    <product>
          <property>aero/qbar-psf</property>
          <property>metrics/Sw-sqft</property>
          <property>aero/coefficients/CSIDE</property>
       </product>
    </function>
  </axis>
    <function name="aero/coefficients/CROLL">
      <sum>
          <property>aero/c/CML1</property>
          <property>aero/c/CMLP</property>
          <property>aero/c/CMLR</property>
          <property>aero/c/CMLBETADOT</property>
          <property>aero/c/CMLDED1L</property>
          <property>aero/c/CMLDED1R</property>
          <property>aero/c/CMLDED2L</property>
          <property>aero/c/CMLDED2R</property>
          <property>aero/c/CMLDRD</property>
          <property>aero/c/CMLDSD1L</property>
          <property>aero/c/CMLDSD1R</property>
          <property>aero/c/CMLDSD2L</property>
          <property>aero/c/CMLDSD2R</property>
          <property>aero/c/CMLDSBU</property>
          <property>aero/c/CMLDSBL</property>
          <property>aero/c/CMLGEAR</property>
       </sum>
    </function>
  <axis name="ROLL">
    <function name="aero/force/ROLL">
    <product>
          <property>aero/qbar-psf</property>
          <property>metrics/Sw-sqft</property>
          <property>metrics/bw-ft</property>
          <property>aero/coefficients/CROLL</property>
       </product>
    </function>
  </axis>
    <function name="aero/coefficients/CPITCH">
      <sum>
          <property>aero/c/CMM1</property>
          <property>aero/c/CMMQ</property>
          <property>aero/c/CMMALPHADOT</property>
          <property>aero/c/CMMBETADOT</property>
          <property>aero/c/CMMDED1L</property>
          <property>aero/c/CMMDED1R</property>
          <property>aero/c/CMMDED2L</property>
          <property>aero/c/CMMDED2R</property>
          <property>aero/c/CMMDSD1L</property>
          <property>aero/c/CMMDSD1R</property>
          <property>aero/c/CMMDSD2L</property>
          <property>aero/c/CMMDSD2R</property>
          <property>aero/c/CMMDSBU</property>
          <property>aero/c/CMMDSBL</property>
          <property>aero/c/CMMGEAR</property>
       </sum>
    </function>
  <axis name="PITCH">
    <function name="aero/force/PITCH">
    <product>
          <property>aero/qbar-psf</property>
          <property>metrics/Sw-sqft</property>
          <property>metrics/cbarw-ft</property>
          <property>aero/coefficients/CPITCH</property>
       </product>
    </function>
  </axis>
    <function name="aero/coefficients/CYAW">
      <sum>
          <property>aero/c/CMN1</property>
          <property>aero/c/CMNBETADOT</property>
          <property>aero/c/CMNDED1L</property>
          <property>aero/c/CMNDED1R</property>
          <property>aero/c/CMNDED2L</property>
          <property>aero/c/CMNDED2R</property>
          <property>aero/c/CMNDSD1L</property>
          <property>aero/c/CMNDSD1R</property>
          <property>aero/c/CMNDSD2L</property>
          <property>aero/c/CMNDSD2R</property>
          <property>aero/c/CMNDSBU</property>
          <property>aero/c/CMNDSBL</property>
          <property>aero/c/CMNGEAR</property>
          <property>aero/c/CMNDRDr</property>
          <property>aero/c/CMNP</property>
          <property>aero/c/CMNR</property>
       </sum>
    </function>
  <axis name="YAW">
    <function name="aero/force/YAW">
    <product>
          <property>aero/qbar-psf</property>
          <property>metrics/Sw-sqft</property>
          <property>metrics/bw-ft</property>
          <property>aero/coefficients/CYAW</property>
       </product>
    </function>
  </axis>
</aerodynamics>
    <output name="c:/temp/JSBOut.csv" type="CSV" rate="10">
        <property caption="alpha-deg">aero/alpha-deg</property>
        <property caption="alphadot-rad_sec">aero/alphadot-rad_sec</property>
        <property caption="beta-deg">aero/beta-deg</property>
        <property caption="betadot-rad_sec">aero/betadot-rad_sec</property>
        <property caption="bi2vel">aero/bi2vel</property>
        <property caption="CFXB">aero/c/CFXB</property>
        <property caption="CFXDED1L">aero/c/CFXDED1L</property>
        <property caption="CFXDED1R">aero/c/CFXDED1R</property>
        <property caption="CFXDED2L">aero/c/CFXDED2L</property>
        <property caption="CFXDED2R">aero/c/CFXDED2R</property>
        <property caption="CFXDSBL">aero/c/CFXDSBL</property>
        <property caption="CFXDSBU">aero/c/CFXDSBU</property>
        <property caption="CFXDSD1L">aero/c/CFXDSD1L</property>
        <property caption="CFXDSD1R">aero/c/CFXDSD1R</property>
        <property caption="CFXDSD2L">aero/c/CFXDSD2L</property>
        <property caption="CFXDSD2R">aero/c/CFXDSD2R</property>
        <property caption="CFXGEAR">aero/c/CFXGEAR</property>
        <property caption="CFYB">aero/c/CFYB</property>
        <property caption="CFYDED1L">aero/c/CFYDED1L</property>
        <property caption="CFYDED1R">aero/c/CFYDED1R</property>
        <property caption="CFYDED2L">aero/c/CFYDED2L</property>
        <property caption="CFYDED2R">aero/c/CFYDED2R</property>
        <property caption="CFYDRD">aero/c/CFYDRD</property>
        <property caption="CFYDSBL">aero/c/CFYDSBL</property>
        <property caption="CFYDSBU">aero/c/CFYDSBU</property>
        <property caption="CFYDSD1L">aero/c/CFYDSD1L</property>
        <property caption="CFYDSD1R">aero/c/CFYDSD1R</property>
        <property caption="CFYDSD2L">aero/c/CFYDSD2L</property>
        <property caption="CFYDSD2R">aero/c/CFYDSD2R</property>
        <property caption="CFYGEAR">aero/c/CFYGEAR</property>
        <property caption="CFYP">aero/c/CFYP</property>
        <property caption="CFYR">aero/c/CFYR</property>
        <property caption="CFZB">aero/c/CFZB</property>
        <property caption="CFZDE2L">aero/c/CFZDE2L</property>
        <property caption="CFZDE2R">aero/c/CFZDE2R</property>
        <property caption="CFZDED1L">aero/c/CFZDED1L</property>
        <property caption="CFZDED1R">aero/c/CFZDED1R</property>
        <property caption="CFZDEL">aero/c/CFZDEL</property>
        <property caption="CFZDSBU">aero/c/CFZDSBU</property>
        <property caption="CFZDSD1L">aero/c/CFZDSD1L</property>
        <property caption="CFZDSD1R">aero/c/CFZDSD1R</property>
        <property caption="CFZGEAR">aero/c/CFZGEAR</property>
        <property caption="CML1">aero/c/CML1</property>
        <property caption="CMLBETADOT">aero/c/CMLBETADOT</property>
        <property caption="CMLDED1L">aero/c/CMLDED1L</property>
        <property caption="CMLDED1R">aero/c/CMLDED1R</property>
        <property caption="CMLDED2L">aero/c/CMLDED2L</property>
        <property caption="CMLDED2R">aero/c/CMLDED2R</property>
        <property caption="CMLDRD">aero/c/CMLDRD</property>
        <property caption="CMLDSBL">aero/c/CMLDSBL</property>
        <property caption="CMLDSBU">aero/c/CMLDSBU</property>
        <property caption="CMLDSD1L">aero/c/CMLDSD1L</property>
        <property caption="CMLDSD1R">aero/c/CMLDSD1R</property>
        <property caption="CMLDSD2L">aero/c/CMLDSD2L</property>
        <property caption="CMLDSD2R">aero/c/CMLDSD2R</property>
        <property caption="CMLGEAR">aero/c/CMLGEAR</property>
        <property caption="CMLP">aero/c/CMLP</property>
        <property caption="CMLR">aero/c/CMLR</property>
        <property caption="CMM1">aero/c/CMM1</property>
        <property caption="CMMALPHADOT">aero/c/CMMALPHADOT</property>
        <property caption="CMMBETADOT">aero/c/CMMBETADOT</property>
        <property caption="CMMDED1L">aero/c/CMMDED1L</property>
        <property caption="CMMDED1R">aero/c/CMMDED1R</property>
        <property caption="CMMDED2L">aero/c/CMMDED2L</property>
        <property caption="CMMDED2R">aero/c/CMMDED2R</property>
        <property caption="CMMDSBL">aero/c/CMMDSBL</property>
        <property caption="CMMDSBU">aero/c/CMMDSBU</property>
        <property caption="CMMDSD1L">aero/c/CMMDSD1L</property>
        <property caption="CMMDSD1R">aero/c/CMMDSD1R</property>
        <property caption="CMMDSD2L">aero/c/CMMDSD2L</property>
        <property caption="CMMDSD2R">aero/c/CMMDSD2R</property>
        <property caption="CMMGEAR">aero/c/CMMGEAR</property>
        <property caption="CMMQ">aero/c/CMMQ</property>
        <property caption="CMN1">aero/c/CMN1</property>
        <property caption="CMNBETADOT">aero/c/CMNBETADOT</property>
        <property caption="CMNDED1L">aero/c/CMNDED1L</property>
        <property caption="CMNDED1R">aero/c/CMNDED1R</property>
        <property caption="CMNDED2L">aero/c/CMNDED2L</property>
        <property caption="CMNDED2R">aero/c/CMNDED2R</property>
        <property caption="CMNDRDr">aero/c/CMNDRDr</property>
        <property caption="CMNDSBL">aero/c/CMNDSBL</property>
        <property caption="CMNDSBU">aero/c/CMNDSBU</property>
        <property caption="CMNDSD1L">aero/c/CMNDSD1L</property>
        <property caption="CMNDSD1R">aero/c/CMNDSD1R</property>
        <property caption="CMNDSD2L">aero/c/CMNDSD2L</property>
        <property caption="CMNDSD2R">aero/c/CMNDSD2R</property>
        <property caption="CMNGEAR">aero/c/CMNGEAR</property>
        <property caption="CMNP">aero/c/CMNP</property>
        <property caption="CMNR">aero/c/CMNR</property>
        <property caption="ci2vel">aero/ci2vel</property>
        <property caption="CDRAG">aero/coefficients/CDRAG</property>
        <property caption="CLIFT">aero/coefficients/CLIFT</property>
        <property caption="CPITCH">aero/coefficients/CPITCH</property>
        <property caption="CROLL">aero/coefficients/CROLL</property>
        <property caption="CSIDE">aero/coefficients/CSIDE</property>
        <property caption="CYAW">aero/coefficients/CYAW</property>
        <property caption="pb">aero/pb</property>
        <property caption="qb">aero/qb</property>
        <property caption="qbar-psf">aero/qbar-psf</property>
        <property caption="rb">aero/rb</property>
        <property caption="phi-deg">attitude/phi-deg</property>
        <property caption="psi-deg">attitude/psi-deg</property>
        <property caption="theta-deg">attitude/theta-deg</property>
        <property caption="airbrake-lower">fcs/airbrake-lower</property>
        <property caption="airbrake-upper">fcs/airbrake-upper</property>
        <property caption="elevon-1L-pos-deg">fcs/elevon-1L-pos-deg</property>
        <property caption="elevon-1R-pos-deg">fcs/elevon-1R-pos-deg</property>
        <property caption="elevon-2L-pos-deg">fcs/elevon-2L-pos-deg</property>
        <property caption="elevon-2R-pos-deg">fcs/elevon-2R-pos-deg</property>
        <property caption="rudder-pos-deg">fcs/rudder-pos-deg</property>
        <property caption="slat-1L-pos-deg">fcs/slat-1L-pos-deg</property>
        <property caption="slat-1R-pos-deg">fcs/slat-1R-pos-deg</property>
        <property caption="slat-2L-pos-deg">fcs/slat-2L-pos-deg</property>
        <property caption="slat-2R-pos-deg">fcs/slat-2R-pos-deg</property>
        <property caption="fbx-total-lbs">forces/fbx-total-lbs</property>
        <property caption="fby-total-lbs">forces/fby-total-lbs</property>
        <property caption="fbz-total-lbs">forces/fbz-total-lbs</property>
        <property caption="gear-pos-norm">gear/gear-pos-norm</property>
        <property caption="l-total-lbsft">moments/l-total-lbsft</property>
        <property caption="m-total-lbsft">moments/m-total-lbsft</property>
        <property caption="n-total-lbsft">moments/n-total-lbsft</property>
        <property caption="p-aero-rad_sec">velocities/p-aero-rad_sec</property>
        <property caption="q-aero-rad_sec">velocities/q-aero-rad_sec</property>
        <property caption="r-aero-rad_sec">velocities/r-aero-rad_sec</property>
        <property caption="vt-fps">velocities/vt-fps</property>
    </output>
</fdm_config>
